// SBML level 2 version 4

model fMGG_synthesis()

  // Compartments:
  compartment default = 1 volume;

  // Species:
  species fMettRNAfMetCAU in default = 0;
  species tRNAfMetCAU in default = 3.54767184;
  species fMet in default = 0;
  species elRS70SAGGU0002_fMettRNAfMetCAU in default = 0;
  species elRS70SAGGU0002_fMet in default = 0;
  species RS50S in default = 0;
  species RS30S in default = 0;
  species mRNA in default = 0.1;
  species RS50S_degraded in default = 0;
  species RS30S_degraded in default = 0;
  species fMettRNAfMetCAU_degraded in default = 0;
  species tRNAfMetCAU_degraded in default = 0;
  species fMet_degraded in default = 0;
  species mRNA_degraded in default = 0;
  species PO4 in default = 0;
  species EFTu_GTP_GlytRNAGlyGCC in default = 0;
  species GlytRNAGlyGCC in default = 0;
  species EFG_GTP in default = 0;
  species EFG_GDP in default = 0;
  species elRS70SAGGU0003_Pept0002tRNAGlyGCC in default = 0;
  species Pept0002tRNAGlyGCC in default = 0;
  species EFTu in default = 80;
  species GTP in default = 2500;
  species GDP in default = 0;
  species EFTu_GDP in default = 0;
  species EFG in default = 4.3;
  species EFTu_degraded in default = 0;
  species EFG_degraded in default = 0;
  species GlytRNAGlyGCC_degraded in default = 0;
  species Pept0002tRNAGlyGCC_degraded in default = 0;
  species elRS70SAGGU0002_fMet_EFTu_GTP_GlytRNAGlyGCC in default = 0;
  species elRS70SAGGU0002_fMet_EFTu_GDP_PO4_GlytRNAGlyGCC in default = 0;
  species elRS70SAGGU0002_fMet_EFTu_GDP_GlytRNAGlyGCC in default = 0;
  species elRS70SAGGU0002_fMet_EFTu_GDP in default = 0;
  species elRS70SAGGU0002_fMet_GlytRNAGlyGCC in default = 0;
  species elRS70SBGGU0002_Pept0002tRNAGlyGCC in default = 0;
  species elRS70SBGGU0002_Pept0002tRNAGlyGCC_EFG_GTP in default = 0;
  species elRS70SBGGU0002_Pept0002tRNAGlyGCC_EFG_GDP_PO4 in default = 0;
  species elRS70SCGGU0003_Pept0002tRNAGlyGCC_EFG_GDP in default = 0;
  species tRNAGlyGCC in default = 3.54767184;
  species Pept0002 in default = 0;
  species elRS70SAGGU0003_Pept0002 in default = 0;
  species tRNAGlyGCC_degraded in default = 0;
  species Pept0002_degraded in default = 0;
  species elRS70SAUAA0004_Pept0003tRNAGlyGCC in default = 0;
  species Pept0003tRNAGlyGCC in default = 0;
  species Pept0003tRNAGlyGCC_degraded in default = 0;
  species elRS70SAGGU0003_Pept0002_EFTu_GTP_GlytRNAGlyGCC in default = 0;
  species elRS70SAGGU0003_Pept0002_EFTu_GDP_PO4_GlytRNAGlyGCC in default = 0;
  species elRS70SAGGU0003_Pept0002_EFTu_GDP_GlytRNAGlyGCC in default = 0;
  species elRS70SAGGU0003_Pept0002_EFTu_GDP in default = 0;
  species elRS70SAGGU0003_Pept0002_GlytRNAGlyGCC in default = 0;
  species elRS70SBGGU0003_Pept0003tRNAGlyGCC in default = 0;
  species elRS70SBGGU0003_Pept0003tRNAGlyGCC_EFG_GTP in default = 0;
  species elRS70SBGGU0003_Pept0003tRNAGlyGCC_EFG_GDP_PO4 in default = 0;
  species elRS70SCUAA0004_Pept0003tRNAGlyGCC_EFG_GDP in default = 0;
  species AMP in default = 0;
  species ATP in default = 3750;
  species PPi in default = 0;
  species Gly in default = 300;
  species GlyRS in default = 0.35;
  species GlyRS_Gly_ATP in default = 0;
  species GlyRS_Gly in default = 0;
  species GlyRS_ATP in default = 0;
  species GlyAMP in default = 0;
  species GlyRS_GlyAMP_PPi in default = 0;
  species GlyRS_GlyAMP in default = 0;
  species GlyRS_degraded in default = 0;
  species GlyRS_AMP in default = 0;
  species Met in default = 300;
  species MetRS in default = 0.44;
  species MetRS_Met_ATP in default = 0;
  species MetRS_Met in default = 0;
  species MetRS_ATP in default = 0;
  species MetAMP in default = 0;
  species MetRS_MetAMP_PPi in default = 0;
  species MetRS_MetAMP in default = 0;
  species MetRS_degraded in default = 0;
  species MetRS_AMP in default = 0;
  species GlyRS_GlytRNAGlyGCC in default = 0;
  species GlyRS_AMP_GlytRNAGlyGCC in default = 0;
  species GlyRS_GlyAMP_tRNAGlyGCC in default = 0;
  species GlyRS_tRNAGlyGCC in default = 0;
  species GlyRS_Gly_tRNAGlyGCC in default = 0;
  species GlyRS_ATP_tRNAGlyGCC in default = 0;
  species GlyRS_Gly_ATP_tRNAGlyGCC in default = 0;
  species GlyRS_GlyAMP_PPi_tRNAGlyGCC in default = 0;
  species MetRS_MettRNAfMetCAU in default = 0;
  species MetRS_AMP_MettRNAfMetCAU in default = 0;
  species MettRNAfMetCAU in default = 0;
  species MetRS_MetAMP_tRNAfMetCAU in default = 0;
  species MetRS_tRNAfMetCAU in default = 0;
  species MetRS_Met_tRNAfMetCAU in default = 0;
  species MetRS_ATP_tRNAfMetCAU in default = 0;
  species MetRS_Met_ATP_tRNAfMetCAU in default = 0;
  species MetRS_MetAMP_PPi_tRNAfMetCAU in default = 0;
  species MettRNAfMetCAU_degraded in default = 0;
  species EFTs in default = 13;
  species EFTs_degraded in default = 0;
  species EFTu_EFTs in default = 0;
  species EFTu_GDP_EFTs in default = 0;
  species EFTu_GTP in default = 0;
  species EFTu_GTP_EFTs in default = 0;
  species EFTu_GTP_MettRNAfMetCAU in default = 0;
  species RS70S_EFG_GDP in default = 0;
  species RS50S_EFG_GDP in default = 0;
  species RS70S_EFG_GTP in default = 0;
  species RS50S_EFG_GTP in default = 0;
  species RS70S in default = 3;
  species RS70S_EFG_GDP_PO4 in default = 0;
  species RS50S_EFG_GDP_PO4 in default = 0;
  species CK_ADP in default = 0;
  species CK_ATP in default = 0;
  species CK_CP in default = 0;
  species CK_CP_ADP in default = 0;
  species CK_Cr in default = 0;
  species CK_Cr_ATP in default = 0;
  species CK_degraded in default = 0;
  species CK in default = 30;
  species ADP in default = 0;
  species CP in default = 50000;
  species Cr in default = 0;
  species NDK in default = 1.8;
  species NDK_degraded in default = 0;
  species NDK_GDP in default = 0;
  species NDK_ATP in default = 0;
  species NDK_GDP_ATP in default = 0;
  species NDK_GTP_ADP in default = 0;
  species NDK_ADP in default = 0;
  species NDK_GTP in default = 0;
  species MK in default = 5.6;
  species MK_degraded in default = 0;
  species MK_AMP in default = 0;
  species MK_ATP in default = 0;
  species MK_ATP_AMP in default = 0;
  species MK_ADP_1 in default = 0;
  species MK_ADP_2 in default = 0;
  species MK_ADP_ADP in default = 0;
  species PPiase in default = 0.16;
  species PPiase_PPi in default = 0;
  species PPiase_degraded in default = 0;
  species PPiase_PO4 in default = 0;
  species PPiase_PO4_PO4 in default = 0;
  species FD in default = 126.8499;
  species MTF in default = 2.4;
  species THF in default = 0;
  species MTF_FD in default = 0;
  species MTF_MettRNAfMetCAU in default = 0;
  species MTF_FD_MettRNAfMetCAU in default = 0;
  species MTF_THF_fMettRNAfMetCAU in default = 0;
  species MTF_THF in default = 0;
  species MTF_fMettRNAfMetCAU in default = 0;
  species MTF_degraded in default = 0;
  species IF2_GTP in default = 0;
  species IF2_GDP in default = 0;
  species IF2_GTP_fMettRNAfMetCAU in default = 0;
  species IF2_degraded in default = 0;
  species IF2 in default = 4.1;
  species RS30S_IF1 in default = 0;
  species RS30S_IF1_IF3 in default = 0;
  species RS30S_IF1_IF3_IF2_GTP in default = 0;
  species RS30S_IF1_IF3_IF2_GTP_fMettRNAfMetCAU in default = 0;
  species RS30S_IF1_IF3_IF2_GTP_fMettRNAfMetCAU_mRNA in default = 0;
  species RS30S_IF1_IF3_IF2_GTP_mRNA in default = 0;
  species RS30S_IF1_IF3_fMettRNAfMetCAU_mRNA in default = 0;
  species RS30S_IF1_IF3_mRNA in default = 0;
  species RS30S_IF3 in default = 0;
  species RS30S_IF3_IF2_GTP in default = 0;
  species RS30S_IF3_IF2_GTP_fMettRNAfMetCAU in default = 0;
  species RS30S_IF3_IF2_GTP_fMettRNAfMetCAU_mRNA in default = 0;
  species RS30S_IF3_IF2_GTP_mRNA in default = 0;
  species RS30S_IF3_fMettRNAfMetCAU_mRNA in default = 0;
  species RS30S_IF3_mRNA in default = 0;
  species RS70S_IF1 in default = 0;
  species RS70S_IF1_IF3 in default = 0;
  species RS70S_IF1_IF3_IF2_GTP_fMettRNAfMetCAU_mRNA in default = 0;
  species RS70S_IF3 in default = 0;
  species RS70S_IF3_IF2_GTP_fMettRNAfMetCAU_mRNA in default = 0;
  species IF1_degraded in default = 0;
  species IF3_degraded in default = 0;
  species IF1 in default = 99;
  species IF3 in default = 4.9;
  species RS30S_IF2_GTP in default = 0;
  species RS30S_IF2_GTP_fMettRNAfMetCAU in default = 0;
  species RS30S_mRNA in default = 0;
  species RS30S_fMettRNAfMetCAU_mRNA in default = 0;
  species RS30S_IF2_GTP_mRNA in default = 0;
  species RS30S_IF2_GTP_fMettRNAfMetCAU_mRNA in default = 0;
  species RS30S_IF1_IF2_GTP in default = 0;
  species RS30S_IF1_IF2_GTP_fMettRNAfMetCAU in default = 0;
  species RS30S_IF1_mRNA in default = 0;
  species RS30S_IF1_fMettRNAfMetCAU_mRNA in default = 0;
  species RS30S_IF1_IF2_GTP_mRNA in default = 0;
  species RS30S_IF1_IF2_GTP_fMettRNAfMetCAU_mRNA in default = 0;
  species RS70S_IF1_IF2_GDP_fMettRNAfMetCAU_mRNA in default = 0;
  species RS70S_IF1_IF3_IF2_GDP_PO4_fMettRNAfMetCAU_mRNA in default = 0;
  species RS70S_IF1_IF3_IF2_GDP_fMettRNAfMetCAU_mRNA in default = 0;
  species RS70S_IF1_IF3_fMettRNAfMetCAU_mRNA in default = 0;
  species RS70S_IF1_fMettRNAfMetCAU_mRNA in default = 0;
  species RS70S_IF2_GDP_fMettRNAfMetCAU_mRNA in default = 0;
  species RS70S_IF3_IF2_GDP_PO4_fMettRNAfMetCAU_mRNA in default = 0;
  species RS70S_IF3_IF2_GDP_fMettRNAfMetCAU_mRNA in default = 0;
  species RS70S_IF3_fMettRNAfMetCAU_mRNA in default = 0;
  species GMP in default = 0;
  species RF1 in default = 0.2;
  species Pept0003 in default = 0;
  species RF1_degraded in default = 0;
  species termRS70SUAA0004_tRNAGlyGCC in default = 0;
  species elRS70SAUAA0004_Pept0003tRNAGlyGCC_RF1 in default = 0;
  species termRS70SUAA0004_tRNAGlyGCC_RF1 in default = 0;
  species RF2 in default = 0.2;
  species RF2_degraded in default = 0;
  species elRS70SAUAA0004_Pept0003tRNAGlyGCC_RF2 in default = 0;
  species termRS70SUAA0004_tRNAGlyGCC_RF2 in default = 0;
  species RF3 in default = 0.7;
  species RF3_degraded in default = 0;
  species RF3_GDP in default = 0;
  species RF3_GTP in default = 0;
  species termRS70SUAA0004_tRNAGlyGCC_RF1_RF3_GDP in default = 0;
  species termRS70SUAA0004_tRNAGlyGCC_RF1_RF3_GTP in default = 0;
  species termRS70SUAA0004_tRNAGlyGCC_RF1_RF3 in default = 0;
  species termRS70SUAA0004_tRNAGlyGCC_RF3_GTP in default = 0;
  species termRS70SUAA0004_tRNAGlyGCC_RF3_GDP in default = 0;
  species termRS70SUAA0004_tRNAGlyGCC_RF3_GDP_PO4 in default = 0;
  species termRS70SUAA0004_tRNAGlyGCC_RF2_RF3_GDP in default = 0;
  species termRS70SUAA0004_tRNAGlyGCC_RF2_RF3_GTP in default = 0;
  species termRS70SUAA0004_tRNAGlyGCC_RF2_RF3 in default = 0;
  species RRF in default = 16;
  species RRF_degraded in default = 0;
  species RS50S_RRF in default = 0;
  species RS50S_RRF_EFG_GDP in default = 0;
  species RS50S_tRNAGlyGCC in default = 0;
  species RS50S_tRNAGlyGCC_EFG_GDP in default = 0;
  species RS50S_tRNAGlyGCC_RRF in default = 0;
  species RS50S_tRNAGlyGCC_RRF_EFG_GDP in default = 0;
  species termRS70SUAA0004_tRNAGlyGCC_EFG_GTP in default = 0;
  species termRS70SUAA0004_tRNAGlyGCC_RRF in default = 0;
  species termRS70SUAA0004_tRNAGlyGCC_RRF_EFG_GDP in default = 0;
  species termRS70SUAA0004_tRNAGlyGCC_RRF_EFG_GDP_PO4 in default = 0;
  species termRS70SUAA0004_tRNAGlyGCC_RRF_EFG_GTP in default = 0;
  species termRS30S_mRNA in default = 0;

  // Reactions:
  re0000000001: elRS70SAGGU0002_fMettRNAfMetCAU => elRS70SAGGU0002_fMet + tRNAfMetCAU; re0000000001_k1*elRS70SAGGU0002_fMettRNAfMetCAU;
    re0000000001_k1 = 1000 substance;
  re0000000002: elRS70SAGGU0002_fMet + tRNAfMetCAU => elRS70SAGGU0002_fMettRNAfMetCAU; re0000000002_k1*elRS70SAGGU0002_fMet*tRNAfMetCAU;
    re0000000002_k1 = 0 substance;
  re0000000003: RS50S => RS50S_degraded; re0000000003_k1*RS50S;
    re0000000003_k1 = 0 substance;
  re0000000004: RS30S => RS30S_degraded; re0000000004_k1*RS30S;
    re0000000004_k1 = 0 substance;
  re0000000005: fMettRNAfMetCAU => fMettRNAfMetCAU_degraded; re0000000005_k1*fMettRNAfMetCAU;
    re0000000005_k1 = 0 substance;
  re0000000006: tRNAfMetCAU => tRNAfMetCAU_degraded; re0000000006_k1*tRNAfMetCAU;
    re0000000006_k1 = 0 substance;
  re0000000007: fMet => fMet_degraded; re0000000007_k1*fMet;
    re0000000007_k1 = 0 substance;
  re0000000008: mRNA => mRNA_degraded; re0000000008_k1*mRNA;
    re0000000008_k1 = 0 substance;
  re0000000009: elRS70SAGGU0002_fMettRNAfMetCAU => RS50S_degraded + mRNA + RS30S + fMettRNAfMetCAU; re0000000009_k1*elRS70SAGGU0002_fMettRNAfMetCAU;
    re0000000009_k1 = 0 substance;
  re0000000010: elRS70SAGGU0002_fMettRNAfMetCAU => RS30S_degraded + RS50S + mRNA + fMettRNAfMetCAU; re0000000010_k1*elRS70SAGGU0002_fMettRNAfMetCAU;
    re0000000010_k1 = 0 substance;
  re0000000011: elRS70SAGGU0002_fMet => RS50S_degraded + mRNA + RS30S + fMet; re0000000011_k1*elRS70SAGGU0002_fMet;
    re0000000011_k1 = 0 substance;
  re0000000012: elRS70SAGGU0002_fMet => RS30S_degraded + RS50S + mRNA + fMet; re0000000012_k1*elRS70SAGGU0002_fMet;
    re0000000012_k1 = 0 substance;
  re0000000013: EFTu_GTP_GlytRNAGlyGCC + elRS70SAGGU0002_fMet => elRS70SAGGU0002_fMet_EFTu_GTP_GlytRNAGlyGCC; re0000000013_k1*EFTu_GTP_GlytRNAGlyGCC*elRS70SAGGU0002_fMet;
    re0000000013_k1 = 140 substance;
  re0000000014: elRS70SAGGU0002_fMet_EFTu_GTP_GlytRNAGlyGCC => elRS70SAGGU0002_fMet_EFTu_GDP_PO4_GlytRNAGlyGCC; re0000000014_k1*elRS70SAGGU0002_fMet_EFTu_GTP_GlytRNAGlyGCC;
    re0000000014_k1 = 260 substance;
  re0000000015: elRS70SAGGU0002_fMet_EFTu_GDP_PO4_GlytRNAGlyGCC => elRS70SAGGU0002_fMet_EFTu_GTP_GlytRNAGlyGCC; re0000000015_k1*elRS70SAGGU0002_fMet_EFTu_GDP_PO4_GlytRNAGlyGCC;
    re0000000015_k1 = 0 substance;
  re0000000016: elRS70SAGGU0002_fMet_EFTu_GDP_PO4_GlytRNAGlyGCC => PO4 + elRS70SAGGU0002_fMet_EFTu_GDP_GlytRNAGlyGCC; re0000000016_k1*elRS70SAGGU0002_fMet_EFTu_GDP_PO4_GlytRNAGlyGCC;
    re0000000016_k1 = 1000 substance;
  re0000000017: elRS70SAGGU0002_fMet_EFTu_GDP_GlytRNAGlyGCC => EFTu_GDP + elRS70SAGGU0002_fMet_GlytRNAGlyGCC; re0000000017_k1*elRS70SAGGU0002_fMet_EFTu_GDP_GlytRNAGlyGCC;
    re0000000017_k1 = 7 substance;
  re0000000018: elRS70SAGGU0002_fMet_GlytRNAGlyGCC => elRS70SBGGU0002_Pept0002tRNAGlyGCC; re0000000018_k1*elRS70SAGGU0002_fMet_GlytRNAGlyGCC;
    re0000000018_k1 = 1000 substance;
  re0000000019: elRS70SBGGU0002_Pept0002tRNAGlyGCC + EFG_GTP => elRS70SBGGU0002_Pept0002tRNAGlyGCC_EFG_GTP; re0000000019_k1*elRS70SBGGU0002_Pept0002tRNAGlyGCC*EFG_GTP;
    re0000000019_k1 = 30 substance;
  re0000000020: elRS70SBGGU0002_Pept0002tRNAGlyGCC_EFG_GTP => EFG_GTP + elRS70SBGGU0002_Pept0002tRNAGlyGCC; re0000000020_k1*elRS70SBGGU0002_Pept0002tRNAGlyGCC_EFG_GTP;
    re0000000020_k1 = 25 substance;
  re0000000021: elRS70SAGGU0002_fMet_EFTu_GTP_GlytRNAGlyGCC => EFTu_GTP_GlytRNAGlyGCC + elRS70SAGGU0002_fMet; re0000000021_k1*elRS70SAGGU0002_fMet_EFTu_GTP_GlytRNAGlyGCC;
    re0000000021_k1 = 0.23 substance;
  re0000000022: elRS70SBGGU0002_Pept0002tRNAGlyGCC_EFG_GTP => elRS70SBGGU0002_Pept0002tRNAGlyGCC_EFG_GDP_PO4; re0000000022_k1*elRS70SBGGU0002_Pept0002tRNAGlyGCC_EFG_GTP;
    re0000000022_k1 = 31 substance;
  re0000000023: elRS70SBGGU0002_Pept0002tRNAGlyGCC_EFG_GDP_PO4 => elRS70SBGGU0002_Pept0002tRNAGlyGCC_EFG_GTP; re0000000023_k1*elRS70SBGGU0002_Pept0002tRNAGlyGCC_EFG_GDP_PO4;
    re0000000023_k1 = 5 substance;
  re0000000024: elRS70SBGGU0002_Pept0002tRNAGlyGCC_EFG_GDP_PO4 => PO4 + elRS70SCGGU0003_Pept0002tRNAGlyGCC_EFG_GDP; re0000000024_k1*elRS70SBGGU0002_Pept0002tRNAGlyGCC_EFG_GDP_PO4;
    re0000000024_k1 = 5 substance;
  re0000000025: elRS70SCGGU0003_Pept0002tRNAGlyGCC_EFG_GDP => elRS70SAGGU0003_Pept0002tRNAGlyGCC + EFG_GDP; re0000000025_k1*elRS70SCGGU0003_Pept0002tRNAGlyGCC_EFG_GDP;
    re0000000025_k1 = 1000 substance;
  re0000000026: elRS70SAGGU0002_fMet_EFTu_GDP_GlytRNAGlyGCC => elRS70SAGGU0002_fMet_EFTu_GDP + GlytRNAGlyGCC; re0000000026_k1*elRS70SAGGU0002_fMet_EFTu_GDP_GlytRNAGlyGCC;
    re0000000026_k1 = 0 substance;
  re0000000027: elRS70SAGGU0002_fMet_GlytRNAGlyGCC => elRS70SAGGU0002_fMet + GlytRNAGlyGCC; re0000000027_k1*elRS70SAGGU0002_fMet_GlytRNAGlyGCC;
    re0000000027_k1 = 0 substance;
  re0000000028: elRS70SAGGU0002_fMet_EFTu_GDP => elRS70SAGGU0002_fMet + EFTu_GDP; re0000000028_k1*elRS70SAGGU0002_fMet_EFTu_GDP;
    re0000000028_k1 = 1000 substance;
  re0000000029: EFTu => EFTu_degraded; re0000000029_k1*EFTu;
    re0000000029_k1 = 0 substance;
  re0000000030: EFG => EFG_degraded; re0000000030_k1*EFG;
    re0000000030_k1 = 0 substance;
  re0000000031: GlytRNAGlyGCC => GlytRNAGlyGCC_degraded; re0000000031_k1*GlytRNAGlyGCC;
    re0000000031_k1 = 0 substance;
  re0000000032: Pept0002tRNAGlyGCC => Pept0002tRNAGlyGCC_degraded; re0000000032_k1*Pept0002tRNAGlyGCC;
    re0000000032_k1 = 0 substance;
  re0000000033: elRS70SAGGU0002_fMet_EFTu_GTP_GlytRNAGlyGCC => RS50S_degraded + mRNA + RS30S + fMet + GlytRNAGlyGCC + EFTu + GTP; re0000000033_k1*elRS70SAGGU0002_fMet_EFTu_GTP_GlytRNAGlyGCC;
    re0000000033_k1 = 0 substance;
  re0000000034: elRS70SAGGU0002_fMet_EFTu_GTP_GlytRNAGlyGCC => RS30S_degraded + RS50S + mRNA + fMet + GlytRNAGlyGCC + EFTu + GTP; re0000000034_k1*elRS70SAGGU0002_fMet_EFTu_GTP_GlytRNAGlyGCC;
    re0000000034_k1 = 0 substance;
  re0000000035: elRS70SAGGU0002_fMet_EFTu_GTP_GlytRNAGlyGCC => EFTu_degraded + fMet + GlytRNAGlyGCC + mRNA + RS30S + RS50S + GTP; re0000000035_k1*elRS70SAGGU0002_fMet_EFTu_GTP_GlytRNAGlyGCC;
    re0000000035_k1 = 0 substance;
  re0000000036: elRS70SAGGU0002_fMet_EFTu_GDP_PO4_GlytRNAGlyGCC => RS50S_degraded + mRNA + RS30S + fMet + GlytRNAGlyGCC + EFTu + GDP + PO4; re0000000036_k1*elRS70SAGGU0002_fMet_EFTu_GDP_PO4_GlytRNAGlyGCC;
    re0000000036_k1 = 0 substance;
  re0000000037: elRS70SAGGU0002_fMet_EFTu_GDP_PO4_GlytRNAGlyGCC => RS30S_degraded + RS50S + mRNA + fMet + GlytRNAGlyGCC + EFTu + GDP + PO4; re0000000037_k1*elRS70SAGGU0002_fMet_EFTu_GDP_PO4_GlytRNAGlyGCC;
    re0000000037_k1 = 0 substance;
  re0000000038: elRS70SAGGU0002_fMet_EFTu_GDP_PO4_GlytRNAGlyGCC => EFTu_degraded + fMet + GlytRNAGlyGCC + mRNA + RS30S + RS50S + GDP + PO4; re0000000038_k1*elRS70SAGGU0002_fMet_EFTu_GDP_PO4_GlytRNAGlyGCC;
    re0000000038_k1 = 0 substance;
  re0000000039: elRS70SAGGU0002_fMet_EFTu_GDP_GlytRNAGlyGCC => RS50S_degraded + mRNA + RS30S + fMet + GlytRNAGlyGCC + EFTu + GDP; re0000000039_k1*elRS70SAGGU0002_fMet_EFTu_GDP_GlytRNAGlyGCC;
    re0000000039_k1 = 0 substance;
  re0000000040: elRS70SAGGU0002_fMet_EFTu_GDP_GlytRNAGlyGCC => RS30S_degraded + RS50S + mRNA + fMet + GlytRNAGlyGCC + EFTu + GDP; re0000000040_k1*elRS70SAGGU0002_fMet_EFTu_GDP_GlytRNAGlyGCC;
    re0000000040_k1 = 0 substance;
  re0000000041: elRS70SAGGU0002_fMet_EFTu_GDP_GlytRNAGlyGCC => EFTu_degraded + fMet + GlytRNAGlyGCC + mRNA + RS30S + RS50S + GDP; re0000000041_k1*elRS70SAGGU0002_fMet_EFTu_GDP_GlytRNAGlyGCC;
    re0000000041_k1 = 0 substance;
  re0000000042: elRS70SAGGU0002_fMet_EFTu_GDP => RS50S_degraded + mRNA + RS30S + fMet + EFTu + GDP; re0000000042_k1*elRS70SAGGU0002_fMet_EFTu_GDP;
    re0000000042_k1 = 0 substance;
  re0000000043: elRS70SAGGU0002_fMet_EFTu_GDP => RS30S_degraded + RS50S + mRNA + fMet + EFTu + GDP; re0000000043_k1*elRS70SAGGU0002_fMet_EFTu_GDP;
    re0000000043_k1 = 0 substance;
  re0000000044: elRS70SAGGU0002_fMet_EFTu_GDP => EFTu_degraded + fMet + mRNA + RS30S + RS50S + GDP; re0000000044_k1*elRS70SAGGU0002_fMet_EFTu_GDP;
    re0000000044_k1 = 0 substance;
  re0000000045: elRS70SAGGU0002_fMet_GlytRNAGlyGCC => RS50S_degraded + mRNA + RS30S + fMet + GlytRNAGlyGCC; re0000000045_k1*elRS70SAGGU0002_fMet_GlytRNAGlyGCC;
    re0000000045_k1 = 0 substance;
  re0000000046: elRS70SAGGU0002_fMet_GlytRNAGlyGCC => RS30S_degraded + RS50S + mRNA + fMet + GlytRNAGlyGCC; re0000000046_k1*elRS70SAGGU0002_fMet_GlytRNAGlyGCC;
    re0000000046_k1 = 0 substance;
  re0000000047: elRS70SBGGU0002_Pept0002tRNAGlyGCC => RS50S_degraded + mRNA + RS30S + Pept0002tRNAGlyGCC; re0000000047_k1*elRS70SBGGU0002_Pept0002tRNAGlyGCC;
    re0000000047_k1 = 0 substance;
  re0000000048: elRS70SBGGU0002_Pept0002tRNAGlyGCC => RS30S_degraded + RS50S + mRNA + Pept0002tRNAGlyGCC; re0000000048_k1*elRS70SBGGU0002_Pept0002tRNAGlyGCC;
    re0000000048_k1 = 0 substance;
  re0000000049: elRS70SBGGU0002_Pept0002tRNAGlyGCC_EFG_GTP => RS50S_degraded + mRNA + RS30S + Pept0002tRNAGlyGCC + EFG + GTP; re0000000049_k1*elRS70SBGGU0002_Pept0002tRNAGlyGCC_EFG_GTP;
    re0000000049_k1 = 0 substance;
  re0000000050: elRS70SBGGU0002_Pept0002tRNAGlyGCC_EFG_GTP => RS30S_degraded + RS50S + mRNA + Pept0002tRNAGlyGCC + EFG + GTP; re0000000050_k1*elRS70SBGGU0002_Pept0002tRNAGlyGCC_EFG_GTP;
    re0000000050_k1 = 0 substance;
  re0000000051: elRS70SBGGU0002_Pept0002tRNAGlyGCC_EFG_GTP => EFG_degraded + GTP + RS50S + RS30S + mRNA + Pept0002tRNAGlyGCC; re0000000051_k1*elRS70SBGGU0002_Pept0002tRNAGlyGCC_EFG_GTP;
    re0000000051_k1 = 0 substance;
  re0000000052: elRS70SCGGU0003_Pept0002tRNAGlyGCC_EFG_GDP => RS50S_degraded + mRNA + RS30S + Pept0002tRNAGlyGCC + EFG + GDP; re0000000052_k1*elRS70SCGGU0003_Pept0002tRNAGlyGCC_EFG_GDP;
    re0000000052_k1 = 0 substance;
  re0000000053: elRS70SCGGU0003_Pept0002tRNAGlyGCC_EFG_GDP => RS30S_degraded + RS50S + mRNA + Pept0002tRNAGlyGCC + EFG + GDP; re0000000053_k1*elRS70SCGGU0003_Pept0002tRNAGlyGCC_EFG_GDP;
    re0000000053_k1 = 0 substance;
  re0000000054: elRS70SCGGU0003_Pept0002tRNAGlyGCC_EFG_GDP => EFG_degraded + GDP + RS50S + RS30S + mRNA + Pept0002tRNAGlyGCC; re0000000054_k1*elRS70SCGGU0003_Pept0002tRNAGlyGCC_EFG_GDP;
    re0000000054_k1 = 0 substance;
  re0000000055: elRS70SBGGU0002_Pept0002tRNAGlyGCC_EFG_GDP_PO4 => RS50S_degraded + mRNA + RS30S + Pept0002tRNAGlyGCC + EFG + GDP + PO4; re0000000055_k1*elRS70SBGGU0002_Pept0002tRNAGlyGCC_EFG_GDP_PO4;
    re0000000055_k1 = 0 substance;
  re0000000056: elRS70SBGGU0002_Pept0002tRNAGlyGCC_EFG_GDP_PO4 => RS30S_degraded + RS50S + mRNA + Pept0002tRNAGlyGCC + EFG + GDP + PO4; re0000000056_k1*elRS70SBGGU0002_Pept0002tRNAGlyGCC_EFG_GDP_PO4;
    re0000000056_k1 = 0 substance;
  re0000000057: elRS70SBGGU0002_Pept0002tRNAGlyGCC_EFG_GDP_PO4 => EFG_degraded + GDP + RS50S + RS30S + mRNA + Pept0002tRNAGlyGCC + PO4; re0000000057_k1*elRS70SBGGU0002_Pept0002tRNAGlyGCC_EFG_GDP_PO4;
    re0000000057_k1 = 0 substance;
  re0000000058: elRS70SAGGU0003_Pept0002tRNAGlyGCC => RS50S_degraded + mRNA + RS30S + Pept0002tRNAGlyGCC; re0000000058_k1*elRS70SAGGU0003_Pept0002tRNAGlyGCC;
    re0000000058_k1 = 0 substance;
  re0000000059: elRS70SAGGU0003_Pept0002tRNAGlyGCC => RS30S_degraded + RS50S + mRNA + Pept0002tRNAGlyGCC; re0000000059_k1*elRS70SAGGU0003_Pept0002tRNAGlyGCC;
    re0000000059_k1 = 0 substance;
  re0000000060: elRS70SAGGU0002_fMet_EFTu_GDP_GlytRNAGlyGCC + PO4 => elRS70SAGGU0002_fMet_EFTu_GDP_PO4_GlytRNAGlyGCC; re0000000060_k1*elRS70SAGGU0002_fMet_EFTu_GDP_GlytRNAGlyGCC*PO4;
    re0000000060_k1 = 0 substance;
  re0000000061: EFTu_GDP + elRS70SAGGU0002_fMet_GlytRNAGlyGCC => elRS70SAGGU0002_fMet_EFTu_GDP_GlytRNAGlyGCC; re0000000061_k1*EFTu_GDP*elRS70SAGGU0002_fMet_GlytRNAGlyGCC;
    re0000000061_k1 = 0 substance;
  re0000000062: elRS70SBGGU0002_Pept0002tRNAGlyGCC => elRS70SAGGU0002_fMet_GlytRNAGlyGCC; re0000000062_k1*elRS70SBGGU0002_Pept0002tRNAGlyGCC;
    re0000000062_k1 = 0 substance;
  re0000000063: elRS70SAGGU0002_fMet_EFTu_GDP + GlytRNAGlyGCC => elRS70SAGGU0002_fMet_EFTu_GDP_GlytRNAGlyGCC; re0000000063_k1*elRS70SAGGU0002_fMet_EFTu_GDP*GlytRNAGlyGCC;
    re0000000063_k1 = 0 substance;
  re0000000064: elRS70SAGGU0002_fMet + GlytRNAGlyGCC => elRS70SAGGU0002_fMet_GlytRNAGlyGCC; re0000000064_k1*elRS70SAGGU0002_fMet*GlytRNAGlyGCC;
    re0000000064_k1 = 0 substance;
  re0000000065: elRS70SAGGU0002_fMet + EFTu_GDP => elRS70SAGGU0002_fMet_EFTu_GDP; re0000000065_k1*elRS70SAGGU0002_fMet*EFTu_GDP;
    re0000000065_k1 = 0 substance;
  re0000000066: PO4 + elRS70SCGGU0003_Pept0002tRNAGlyGCC_EFG_GDP => elRS70SBGGU0002_Pept0002tRNAGlyGCC_EFG_GDP_PO4; re0000000066_k1*PO4*elRS70SCGGU0003_Pept0002tRNAGlyGCC_EFG_GDP;
    re0000000066_k1 = 0 substance;
  re0000000067: elRS70SAGGU0003_Pept0002tRNAGlyGCC + EFG_GDP => elRS70SCGGU0003_Pept0002tRNAGlyGCC_EFG_GDP; re0000000067_k1*elRS70SAGGU0003_Pept0002tRNAGlyGCC*EFG_GDP;
    re0000000067_k1 = 0 substance;
  re0000000068: elRS70SAGGU0003_Pept0002tRNAGlyGCC => elRS70SAGGU0003_Pept0002 + tRNAGlyGCC; re0000000068_k1*elRS70SAGGU0003_Pept0002tRNAGlyGCC;
    re0000000068_k1 = 1000 substance;
  re0000000069: elRS70SAGGU0003_Pept0002 + tRNAGlyGCC => elRS70SAGGU0003_Pept0002tRNAGlyGCC; re0000000069_k1*elRS70SAGGU0003_Pept0002*tRNAGlyGCC;
    re0000000069_k1 = 0 substance;
  re0000000070: tRNAGlyGCC => tRNAGlyGCC_degraded; re0000000070_k1*tRNAGlyGCC;
    re0000000070_k1 = 0 substance;
  re0000000071: Pept0002 => Pept0002_degraded; re0000000071_k1*Pept0002;
    re0000000071_k1 = 0 substance;
  re0000000072: elRS70SAGGU0003_Pept0002 => RS50S_degraded + mRNA + RS30S + Pept0002; re0000000072_k1*elRS70SAGGU0003_Pept0002;
    re0000000072_k1 = 0 substance;
  re0000000073: elRS70SAGGU0003_Pept0002 => RS30S_degraded + RS50S + mRNA + Pept0002; re0000000073_k1*elRS70SAGGU0003_Pept0002;
    re0000000073_k1 = 0 substance;
  re0000000074: EFTu_GTP_GlytRNAGlyGCC + elRS70SAGGU0003_Pept0002 => elRS70SAGGU0003_Pept0002_EFTu_GTP_GlytRNAGlyGCC; re0000000074_k1*EFTu_GTP_GlytRNAGlyGCC*elRS70SAGGU0003_Pept0002;
    re0000000074_k1 = 140 substance;
  re0000000075: elRS70SAGGU0003_Pept0002_EFTu_GTP_GlytRNAGlyGCC => elRS70SAGGU0003_Pept0002_EFTu_GDP_PO4_GlytRNAGlyGCC; re0000000075_k1*elRS70SAGGU0003_Pept0002_EFTu_GTP_GlytRNAGlyGCC;
    re0000000075_k1 = 260 substance;
  re0000000076: elRS70SAGGU0003_Pept0002_EFTu_GDP_PO4_GlytRNAGlyGCC => elRS70SAGGU0003_Pept0002_EFTu_GTP_GlytRNAGlyGCC; re0000000076_k1*elRS70SAGGU0003_Pept0002_EFTu_GDP_PO4_GlytRNAGlyGCC;
    re0000000076_k1 = 0 substance;
  re0000000077: elRS70SAGGU0003_Pept0002_EFTu_GDP_PO4_GlytRNAGlyGCC => PO4 + elRS70SAGGU0003_Pept0002_EFTu_GDP_GlytRNAGlyGCC; re0000000077_k1*elRS70SAGGU0003_Pept0002_EFTu_GDP_PO4_GlytRNAGlyGCC;
    re0000000077_k1 = 1000 substance;
  re0000000078: elRS70SAGGU0003_Pept0002_EFTu_GDP_GlytRNAGlyGCC => EFTu_GDP + elRS70SAGGU0003_Pept0002_GlytRNAGlyGCC; re0000000078_k1*elRS70SAGGU0003_Pept0002_EFTu_GDP_GlytRNAGlyGCC;
    re0000000078_k1 = 7 substance;
  re0000000079: elRS70SAGGU0003_Pept0002_GlytRNAGlyGCC => elRS70SBGGU0003_Pept0003tRNAGlyGCC; re0000000079_k1*elRS70SAGGU0003_Pept0002_GlytRNAGlyGCC;
    re0000000079_k1 = 1000 substance;
  re0000000080: elRS70SBGGU0003_Pept0003tRNAGlyGCC + EFG_GTP => elRS70SBGGU0003_Pept0003tRNAGlyGCC_EFG_GTP; re0000000080_k1*elRS70SBGGU0003_Pept0003tRNAGlyGCC*EFG_GTP;
    re0000000080_k1 = 30 substance;
  re0000000081: elRS70SBGGU0003_Pept0003tRNAGlyGCC_EFG_GTP => EFG_GTP + elRS70SBGGU0003_Pept0003tRNAGlyGCC; re0000000081_k1*elRS70SBGGU0003_Pept0003tRNAGlyGCC_EFG_GTP;
    re0000000081_k1 = 25 substance;
  re0000000082: elRS70SAGGU0003_Pept0002_EFTu_GTP_GlytRNAGlyGCC => EFTu_GTP_GlytRNAGlyGCC + elRS70SAGGU0003_Pept0002; re0000000082_k1*elRS70SAGGU0003_Pept0002_EFTu_GTP_GlytRNAGlyGCC;
    re0000000082_k1 = 0.23 substance;
  re0000000083: elRS70SBGGU0003_Pept0003tRNAGlyGCC_EFG_GTP => elRS70SBGGU0003_Pept0003tRNAGlyGCC_EFG_GDP_PO4; re0000000083_k1*elRS70SBGGU0003_Pept0003tRNAGlyGCC_EFG_GTP;
    re0000000083_k1 = 31 substance;
  re0000000084: elRS70SBGGU0003_Pept0003tRNAGlyGCC_EFG_GDP_PO4 => elRS70SBGGU0003_Pept0003tRNAGlyGCC_EFG_GTP; re0000000084_k1*elRS70SBGGU0003_Pept0003tRNAGlyGCC_EFG_GDP_PO4;
    re0000000084_k1 = 5 substance;
  re0000000085: elRS70SBGGU0003_Pept0003tRNAGlyGCC_EFG_GDP_PO4 => PO4 + elRS70SCUAA0004_Pept0003tRNAGlyGCC_EFG_GDP; re0000000085_k1*elRS70SBGGU0003_Pept0003tRNAGlyGCC_EFG_GDP_PO4;
    re0000000085_k1 = 5 substance;
  re0000000086: elRS70SCUAA0004_Pept0003tRNAGlyGCC_EFG_GDP => elRS70SAUAA0004_Pept0003tRNAGlyGCC + EFG_GDP; re0000000086_k1*elRS70SCUAA0004_Pept0003tRNAGlyGCC_EFG_GDP;
    re0000000086_k1 = 1000 substance;
  re0000000087: elRS70SAGGU0003_Pept0002_EFTu_GDP_GlytRNAGlyGCC => elRS70SAGGU0003_Pept0002_EFTu_GDP + GlytRNAGlyGCC; re0000000087_k1*elRS70SAGGU0003_Pept0002_EFTu_GDP_GlytRNAGlyGCC;
    re0000000087_k1 = 0 substance;
  re0000000088: elRS70SAGGU0003_Pept0002_GlytRNAGlyGCC => elRS70SAGGU0003_Pept0002 + GlytRNAGlyGCC; re0000000088_k1*elRS70SAGGU0003_Pept0002_GlytRNAGlyGCC;
    re0000000088_k1 = 0 substance;
  re0000000089: elRS70SAGGU0003_Pept0002_EFTu_GDP => elRS70SAGGU0003_Pept0002 + EFTu_GDP; re0000000089_k1*elRS70SAGGU0003_Pept0002_EFTu_GDP;
    re0000000089_k1 = 1000 substance;
  re0000000090: Pept0003tRNAGlyGCC => Pept0003tRNAGlyGCC_degraded; re0000000090_k1*Pept0003tRNAGlyGCC;
    re0000000090_k1 = 0 substance;
  re0000000091: elRS70SAGGU0003_Pept0002_EFTu_GTP_GlytRNAGlyGCC => RS50S_degraded + mRNA + RS30S + Pept0002 + GlytRNAGlyGCC + EFTu + GTP; re0000000091_k1*elRS70SAGGU0003_Pept0002_EFTu_GTP_GlytRNAGlyGCC;
    re0000000091_k1 = 0 substance;
  re0000000092: elRS70SAGGU0003_Pept0002_EFTu_GTP_GlytRNAGlyGCC => RS30S_degraded + RS50S + mRNA + Pept0002 + GlytRNAGlyGCC + EFTu + GTP; re0000000092_k1*elRS70SAGGU0003_Pept0002_EFTu_GTP_GlytRNAGlyGCC;
    re0000000092_k1 = 0 substance;
  re0000000093: elRS70SAGGU0003_Pept0002_EFTu_GTP_GlytRNAGlyGCC => EFTu_degraded + Pept0002 + GlytRNAGlyGCC + mRNA + RS30S + RS50S + GTP; re0000000093_k1*elRS70SAGGU0003_Pept0002_EFTu_GTP_GlytRNAGlyGCC;
    re0000000093_k1 = 0 substance;
  re0000000094: elRS70SAGGU0003_Pept0002_EFTu_GDP_PO4_GlytRNAGlyGCC => RS50S_degraded + mRNA + RS30S + Pept0002 + GlytRNAGlyGCC + EFTu + GDP + PO4; re0000000094_k1*elRS70SAGGU0003_Pept0002_EFTu_GDP_PO4_GlytRNAGlyGCC;
    re0000000094_k1 = 0 substance;
  re0000000095: elRS70SAGGU0003_Pept0002_EFTu_GDP_PO4_GlytRNAGlyGCC => RS30S_degraded + RS50S + mRNA + Pept0002 + GlytRNAGlyGCC + EFTu + GDP + PO4; re0000000095_k1*elRS70SAGGU0003_Pept0002_EFTu_GDP_PO4_GlytRNAGlyGCC;
    re0000000095_k1 = 0 substance;
  re0000000096: elRS70SAGGU0003_Pept0002_EFTu_GDP_PO4_GlytRNAGlyGCC => EFTu_degraded + Pept0002 + GlytRNAGlyGCC + mRNA + RS30S + RS50S + GDP + PO4; re0000000096_k1*elRS70SAGGU0003_Pept0002_EFTu_GDP_PO4_GlytRNAGlyGCC;
    re0000000096_k1 = 0 substance;
  re0000000097: elRS70SAGGU0003_Pept0002_EFTu_GDP_GlytRNAGlyGCC => RS50S_degraded + mRNA + RS30S + Pept0002 + GlytRNAGlyGCC + EFTu + GDP; re0000000097_k1*elRS70SAGGU0003_Pept0002_EFTu_GDP_GlytRNAGlyGCC;
    re0000000097_k1 = 0 substance;
  re0000000098: elRS70SAGGU0003_Pept0002_EFTu_GDP_GlytRNAGlyGCC => RS30S_degraded + RS50S + mRNA + Pept0002 + GlytRNAGlyGCC + EFTu + GDP; re0000000098_k1*elRS70SAGGU0003_Pept0002_EFTu_GDP_GlytRNAGlyGCC;
    re0000000098_k1 = 0 substance;
  re0000000099: elRS70SAGGU0003_Pept0002_EFTu_GDP_GlytRNAGlyGCC => EFTu_degraded + Pept0002 + GlytRNAGlyGCC + mRNA + RS30S + RS50S + GDP; re0000000099_k1*elRS70SAGGU0003_Pept0002_EFTu_GDP_GlytRNAGlyGCC;
    re0000000099_k1 = 0 substance;
  re0000000100: elRS70SAGGU0003_Pept0002_EFTu_GDP => RS50S_degraded + mRNA + RS30S + Pept0002 + EFTu + GDP; re0000000100_k1*elRS70SAGGU0003_Pept0002_EFTu_GDP;
    re0000000100_k1 = 0 substance;
  re0000000101: elRS70SAGGU0003_Pept0002_EFTu_GDP => RS30S_degraded + RS50S + mRNA + Pept0002 + EFTu + GDP; re0000000101_k1*elRS70SAGGU0003_Pept0002_EFTu_GDP;
    re0000000101_k1 = 0 substance;
  re0000000102: elRS70SAGGU0003_Pept0002_EFTu_GDP => EFTu_degraded + Pept0002 + mRNA + RS30S + RS50S + GDP; re0000000102_k1*elRS70SAGGU0003_Pept0002_EFTu_GDP;
    re0000000102_k1 = 0 substance;
  re0000000103: elRS70SAGGU0003_Pept0002_GlytRNAGlyGCC => RS50S_degraded + mRNA + RS30S + Pept0002 + GlytRNAGlyGCC; re0000000103_k1*elRS70SAGGU0003_Pept0002_GlytRNAGlyGCC;
    re0000000103_k1 = 0 substance;
  re0000000104: elRS70SAGGU0003_Pept0002_GlytRNAGlyGCC => RS30S_degraded + RS50S + mRNA + Pept0002 + GlytRNAGlyGCC; re0000000104_k1*elRS70SAGGU0003_Pept0002_GlytRNAGlyGCC;
    re0000000104_k1 = 0 substance;
  re0000000105: elRS70SBGGU0003_Pept0003tRNAGlyGCC => RS50S_degraded + mRNA + RS30S + Pept0003tRNAGlyGCC; re0000000105_k1*elRS70SBGGU0003_Pept0003tRNAGlyGCC;
    re0000000105_k1 = 0 substance;
  re0000000106: elRS70SBGGU0003_Pept0003tRNAGlyGCC => RS30S_degraded + RS50S + mRNA + Pept0003tRNAGlyGCC; re0000000106_k1*elRS70SBGGU0003_Pept0003tRNAGlyGCC;
    re0000000106_k1 = 0 substance;
  re0000000107: elRS70SBGGU0003_Pept0003tRNAGlyGCC_EFG_GTP => RS50S_degraded + mRNA + RS30S + Pept0003tRNAGlyGCC + EFG + GTP; re0000000107_k1*elRS70SBGGU0003_Pept0003tRNAGlyGCC_EFG_GTP;
    re0000000107_k1 = 0 substance;
  re0000000108: elRS70SBGGU0003_Pept0003tRNAGlyGCC_EFG_GTP => RS30S_degraded + RS50S + mRNA + Pept0003tRNAGlyGCC + EFG + GTP; re0000000108_k1*elRS70SBGGU0003_Pept0003tRNAGlyGCC_EFG_GTP;
    re0000000108_k1 = 0 substance;
  re0000000109: elRS70SBGGU0003_Pept0003tRNAGlyGCC_EFG_GTP => EFG_degraded + GTP + RS50S + RS30S + mRNA + Pept0003tRNAGlyGCC; re0000000109_k1*elRS70SBGGU0003_Pept0003tRNAGlyGCC_EFG_GTP;
    re0000000109_k1 = 0 substance;
  re0000000110: elRS70SCUAA0004_Pept0003tRNAGlyGCC_EFG_GDP => RS50S_degraded + mRNA + RS30S + Pept0003tRNAGlyGCC + EFG + GDP; re0000000110_k1*elRS70SCUAA0004_Pept0003tRNAGlyGCC_EFG_GDP;
    re0000000110_k1 = 0 substance;
  re0000000111: elRS70SCUAA0004_Pept0003tRNAGlyGCC_EFG_GDP => RS30S_degraded + RS50S + mRNA + Pept0003tRNAGlyGCC + EFG + GDP; re0000000111_k1*elRS70SCUAA0004_Pept0003tRNAGlyGCC_EFG_GDP;
    re0000000111_k1 = 0 substance;
  re0000000112: elRS70SCUAA0004_Pept0003tRNAGlyGCC_EFG_GDP => EFG_degraded + GDP + RS50S + RS30S + mRNA + Pept0003tRNAGlyGCC; re0000000112_k1*elRS70SCUAA0004_Pept0003tRNAGlyGCC_EFG_GDP;
    re0000000112_k1 = 0 substance;
  re0000000113: elRS70SBGGU0003_Pept0003tRNAGlyGCC_EFG_GDP_PO4 => RS50S_degraded + mRNA + RS30S + Pept0003tRNAGlyGCC + EFG + GDP + PO4; re0000000113_k1*elRS70SBGGU0003_Pept0003tRNAGlyGCC_EFG_GDP_PO4;
    re0000000113_k1 = 0 substance;
  re0000000114: elRS70SBGGU0003_Pept0003tRNAGlyGCC_EFG_GDP_PO4 => RS30S_degraded + RS50S + mRNA + Pept0003tRNAGlyGCC + EFG + GDP + PO4; re0000000114_k1*elRS70SBGGU0003_Pept0003tRNAGlyGCC_EFG_GDP_PO4;
    re0000000114_k1 = 0 substance;
  re0000000115: elRS70SBGGU0003_Pept0003tRNAGlyGCC_EFG_GDP_PO4 => EFG_degraded + GDP + RS50S + RS30S + mRNA + Pept0003tRNAGlyGCC + PO4; re0000000115_k1*elRS70SBGGU0003_Pept0003tRNAGlyGCC_EFG_GDP_PO4;
    re0000000115_k1 = 0 substance;
  re0000000116: elRS70SAUAA0004_Pept0003tRNAGlyGCC => RS50S_degraded + mRNA + RS30S + Pept0003tRNAGlyGCC; re0000000116_k1*elRS70SAUAA0004_Pept0003tRNAGlyGCC;
    re0000000116_k1 = 0 substance;
  re0000000117: elRS70SAUAA0004_Pept0003tRNAGlyGCC => RS30S_degraded + RS50S + mRNA + Pept0003tRNAGlyGCC; re0000000117_k1*elRS70SAUAA0004_Pept0003tRNAGlyGCC;
    re0000000117_k1 = 0 substance;
  re0000000118: elRS70SAGGU0003_Pept0002_EFTu_GDP_GlytRNAGlyGCC + PO4 => elRS70SAGGU0003_Pept0002_EFTu_GDP_PO4_GlytRNAGlyGCC; re0000000118_k1*elRS70SAGGU0003_Pept0002_EFTu_GDP_GlytRNAGlyGCC*PO4;
    re0000000118_k1 = 0 substance;
  re0000000119: EFTu_GDP + elRS70SAGGU0003_Pept0002_GlytRNAGlyGCC => elRS70SAGGU0003_Pept0002_EFTu_GDP_GlytRNAGlyGCC; re0000000119_k1*EFTu_GDP*elRS70SAGGU0003_Pept0002_GlytRNAGlyGCC;
    re0000000119_k1 = 0 substance;
  re0000000120: elRS70SBGGU0003_Pept0003tRNAGlyGCC => elRS70SAGGU0003_Pept0002_GlytRNAGlyGCC; re0000000120_k1*elRS70SBGGU0003_Pept0003tRNAGlyGCC;
    re0000000120_k1 = 0 substance;
  re0000000121: elRS70SAGGU0003_Pept0002_EFTu_GDP + GlytRNAGlyGCC => elRS70SAGGU0003_Pept0002_EFTu_GDP_GlytRNAGlyGCC; re0000000121_k1*elRS70SAGGU0003_Pept0002_EFTu_GDP*GlytRNAGlyGCC;
    re0000000121_k1 = 0 substance;
  re0000000122: elRS70SAGGU0003_Pept0002 + GlytRNAGlyGCC => elRS70SAGGU0003_Pept0002_GlytRNAGlyGCC; re0000000122_k1*elRS70SAGGU0003_Pept0002*GlytRNAGlyGCC;
    re0000000122_k1 = 0 substance;
  re0000000123: elRS70SAGGU0003_Pept0002 + EFTu_GDP => elRS70SAGGU0003_Pept0002_EFTu_GDP; re0000000123_k1*elRS70SAGGU0003_Pept0002*EFTu_GDP;
    re0000000123_k1 = 0 substance;
  re0000000124: PO4 + elRS70SCUAA0004_Pept0003tRNAGlyGCC_EFG_GDP => elRS70SBGGU0003_Pept0003tRNAGlyGCC_EFG_GDP_PO4; re0000000124_k1*PO4*elRS70SCUAA0004_Pept0003tRNAGlyGCC_EFG_GDP;
    re0000000124_k1 = 0 substance;
  re0000000125: elRS70SAUAA0004_Pept0003tRNAGlyGCC + EFG_GDP => elRS70SCUAA0004_Pept0003tRNAGlyGCC_EFG_GDP; re0000000125_k1*elRS70SAUAA0004_Pept0003tRNAGlyGCC*EFG_GDP;
    re0000000125_k1 = 0 substance;
  re0000000126: GlyRS + Gly => GlyRS_Gly; re0000000126_k1*GlyRS*Gly;
    re0000000126_k1 = 20 substance;
  re0000000127: GlyRS_GlyAMP_PPi => GlyRS_GlyAMP + PPi; re0000000127_k1*GlyRS_GlyAMP_PPi;
    re0000000127_k1 = 1000 substance;
  re0000000128: GlyRS => GlyRS_degraded; re0000000128_k1*GlyRS;
    re0000000128_k1 = 0 substance;
  re0000000129: GlyRS_Gly_ATP => GlyRS_degraded + Gly + ATP; re0000000129_k1*GlyRS_Gly_ATP;
    re0000000129_k1 = 0 substance;
  re0000000130: GlyRS_GlyAMP => GlyRS_degraded + GlyAMP; re0000000130_k1*GlyRS_GlyAMP;
    re0000000130_k1 = 0 substance;
  re0000000131: GlyRS_Gly => GlyRS + Gly; re0000000131_k1*GlyRS_Gly;
    re0000000131_k1 = 470 substance;
  re0000000132: GlyRS + ATP => GlyRS_ATP; re0000000132_k1*GlyRS*ATP;
    re0000000132_k1 = 10 substance;
  re0000000133: GlyRS_ATP => GlyRS + ATP; re0000000133_k1*GlyRS_ATP;
    re0000000133_k1 = 8900 substance;
  re0000000134: GlyRS_ATP + Gly => GlyRS_Gly_ATP; re0000000134_k1*GlyRS_ATP*Gly;
    re0000000134_k1 = 0.024 substance;
  re0000000135: GlyRS_Gly_ATP => GlyRS_ATP + Gly; re0000000135_k1*GlyRS_Gly_ATP;
    re0000000135_k1 = 3.2 substance;
  re0000000136: GlyRS_Gly + ATP => GlyRS_Gly_ATP; re0000000136_k1*GlyRS_Gly*ATP;
    re0000000136_k1 = 10 substance;
  re0000000137: GlyRS_Gly_ATP => GlyRS_Gly + ATP; re0000000137_k1*GlyRS_Gly_ATP;
    re0000000137_k1 = 4500 substance;
  re0000000138: GlyRS_ATP => GlyRS_degraded + ATP; re0000000138_k1*GlyRS_ATP;
    re0000000138_k1 = 0 substance;
  re0000000139: GlyRS_Gly => GlyRS_degraded + Gly; re0000000139_k1*GlyRS_Gly;
    re0000000139_k1 = 0 substance;
  re0000000140: GlyRS_Gly_ATP => GlyRS_GlyAMP_PPi; re0000000140_k1*GlyRS_Gly_ATP;
    re0000000140_k1 = 29 substance;
  re0000000141: GlyRS_GlyAMP_PPi => GlyRS_Gly_ATP; re0000000141_k1*GlyRS_GlyAMP_PPi;
    re0000000141_k1 = 47 substance;
  re0000000142: GlyRS_GlyAMP_PPi => GlyRS_degraded + GlyAMP + PPi; re0000000142_k1*GlyRS_GlyAMP_PPi;
    re0000000142_k1 = 0 substance;
  re0000000143: GlyAMP => Gly + AMP; re0000000143_k1*GlyAMP;
    re0000000143_k1 = 0 substance;
  re0000000144: GlyRS_AMP => GlyRS_degraded + AMP; re0000000144_k1*GlyRS_AMP;
    re0000000144_k1 = 0 substance;
  re0000000145: GlyRS_AMP => GlyRS + AMP; re0000000145_k1*GlyRS_AMP;
    re0000000145_k1 = 1000 substance;
  re0000000146: GlyRS + AMP => GlyRS_AMP; re0000000146_k1*GlyRS*AMP;
    re0000000146_k1 = 0 substance;
  re0000000147: GlyRS_GlyAMP => GlyRS + GlyAMP; re0000000147_k1*GlyRS_GlyAMP;
    re0000000147_k1 = 0.07 substance;
  re0000000148: GlyRS + GlyAMP => GlyRS_GlyAMP; re0000000148_k1*GlyRS*GlyAMP;
    re0000000148_k1 = 2.4 substance;
  re0000000149: Gly + AMP => GlyAMP; re0000000149_k1*Gly*AMP;
    re0000000149_k1 = 0 substance;
  re0000000150: GlyRS_GlyAMP + PPi => GlyRS_GlyAMP_PPi; re0000000150_k1*GlyRS_GlyAMP*PPi;
    re0000000150_k1 = 0 substance;
  re0000000151: MetRS + Met => MetRS_Met; re0000000151_k1*MetRS*Met;
    re0000000151_k1 = 5 substance;
  re0000000152: MetRS_MetAMP_PPi => MetRS_MetAMP + PPi; re0000000152_k1*MetRS_MetAMP_PPi;
    re0000000152_k1 = 1000 substance;
  re0000000153: MetRS => MetRS_degraded; re0000000153_k1*MetRS;
    re0000000153_k1 = 0 substance;
  re0000000154: MetRS_Met_ATP => MetRS_degraded + Met + ATP; re0000000154_k1*MetRS_Met_ATP;
    re0000000154_k1 = 0 substance;
  re0000000155: MetRS_MetAMP => MetRS_degraded + MetAMP; re0000000155_k1*MetRS_MetAMP;
    re0000000155_k1 = 0 substance;
  re0000000156: MetRS_Met => MetRS + Met; re0000000156_k1*MetRS_Met;
    re0000000156_k1 = 350 substance;
  re0000000157: MetRS + ATP => MetRS_ATP; re0000000157_k1*MetRS*ATP;
    re0000000157_k1 = 10 substance;
  re0000000158: MetRS_ATP => MetRS + ATP; re0000000158_k1*MetRS_ATP;
    re0000000158_k1 = 2500 substance;
  re0000000159: MetRS_ATP + Met => MetRS_Met_ATP; re0000000159_k1*MetRS_ATP*Met;
    re0000000159_k1 = 5 substance;
  re0000000160: MetRS_Met_ATP => MetRS_ATP + Met; re0000000160_k1*MetRS_Met_ATP;
    re0000000160_k1 = 350 substance;
  re0000000161: MetRS_Met + ATP => MetRS_Met_ATP; re0000000161_k1*MetRS_Met*ATP;
    re0000000161_k1 = 10 substance;
  re0000000162: MetRS_Met_ATP => MetRS_Met + ATP; re0000000162_k1*MetRS_Met_ATP;
    re0000000162_k1 = 2500 substance;
  re0000000163: MetRS_ATP => MetRS_degraded + ATP; re0000000163_k1*MetRS_ATP;
    re0000000163_k1 = 0 substance;
  re0000000164: MetRS_Met => MetRS_degraded + Met; re0000000164_k1*MetRS_Met;
    re0000000164_k1 = 0 substance;
  re0000000165: MetRS_Met_ATP => MetRS_MetAMP_PPi; re0000000165_k1*MetRS_Met_ATP;
    re0000000165_k1 = 60 substance;
  re0000000166: MetRS_MetAMP_PPi => MetRS_Met_ATP; re0000000166_k1*MetRS_MetAMP_PPi;
    re0000000166_k1 = 150 substance;
  re0000000167: MetRS_MetAMP_PPi => MetRS_degraded + MetAMP + PPi; re0000000167_k1*MetRS_MetAMP_PPi;
    re0000000167_k1 = 0 substance;
  re0000000168: MetAMP => Met + AMP; re0000000168_k1*MetAMP;
    re0000000168_k1 = 0 substance;
  re0000000169: MetRS_AMP => MetRS_degraded + AMP; re0000000169_k1*MetRS_AMP;
    re0000000169_k1 = 0 substance;
  re0000000170: MetRS_AMP => MetRS + AMP; re0000000170_k1*MetRS_AMP;
    re0000000170_k1 = 1000 substance;
  re0000000171: MetRS + AMP => MetRS_AMP; re0000000171_k1*MetRS*AMP;
    re0000000171_k1 = 0 substance;
  re0000000172: MetRS_MetAMP => MetRS + MetAMP; re0000000172_k1*MetRS_MetAMP;
    re0000000172_k1 = 0.07 substance;
  re0000000173: MetRS + MetAMP => MetRS_MetAMP; re0000000173_k1*MetRS*MetAMP;
    re0000000173_k1 = 2.4 substance;
  re0000000174: Met + AMP => MetAMP; re0000000174_k1*Met*AMP;
    re0000000174_k1 = 0 substance;
  re0000000175: MetRS_MetAMP + PPi => MetRS_MetAMP_PPi; re0000000175_k1*MetRS_MetAMP*PPi;
    re0000000175_k1 = 0 substance;
  re0000000176: GlytRNAGlyGCC => tRNAGlyGCC + Gly; re0000000176_k1*GlytRNAGlyGCC;
    re0000000176_k1 = 0 substance;
  re0000000177: GlyRS_GlyAMP_tRNAGlyGCC => GlyRS_degraded + GlyAMP + tRNAGlyGCC; re0000000177_k1*GlyRS_GlyAMP_tRNAGlyGCC;
    re0000000177_k1 = 0 substance;
  re0000000178: GlyRS_GlyAMP_tRNAGlyGCC => GlyRS_AMP_GlytRNAGlyGCC; re0000000178_k1*GlyRS_GlyAMP_tRNAGlyGCC;
    re0000000178_k1 = 22 substance;
  re0000000179: GlyRS_AMP_GlytRNAGlyGCC => GlyRS_GlyAMP_tRNAGlyGCC; re0000000179_k1*GlyRS_AMP_GlytRNAGlyGCC;
    re0000000179_k1 = 0 substance;
  re0000000180: GlyRS_AMP_GlytRNAGlyGCC => GlyRS_GlytRNAGlyGCC + AMP; re0000000180_k1*GlyRS_AMP_GlytRNAGlyGCC;
    re0000000180_k1 = 1000 substance;
  re0000000181: GlyRS_GlytRNAGlyGCC + AMP => GlyRS_AMP_GlytRNAGlyGCC; re0000000181_k1*GlyRS_GlytRNAGlyGCC*AMP;
    re0000000181_k1 = 0 substance;
  re0000000182: GlyRS_AMP_GlytRNAGlyGCC => GlytRNAGlyGCC + GlyRS_AMP; re0000000182_k1*GlyRS_AMP_GlytRNAGlyGCC;
    re0000000182_k1 = 353 substance;
  re0000000183: GlyRS_AMP + GlytRNAGlyGCC => GlyRS_AMP_GlytRNAGlyGCC; re0000000183_k1*GlyRS_AMP*GlytRNAGlyGCC;
    re0000000183_k1 = 100 substance;
  re0000000184: GlyRS_GlytRNAGlyGCC => GlyRS + GlytRNAGlyGCC; re0000000184_k1*GlyRS_GlytRNAGlyGCC;
    re0000000184_k1 = 353 substance;
  re0000000185: GlyRS + GlytRNAGlyGCC => GlyRS_GlytRNAGlyGCC; re0000000185_k1*GlyRS*GlytRNAGlyGCC;
    re0000000185_k1 = 100 substance;
  re0000000186: GlyRS_AMP_GlytRNAGlyGCC => GlyRS_degraded + AMP + GlytRNAGlyGCC; re0000000186_k1*GlyRS_AMP_GlytRNAGlyGCC;
    re0000000186_k1 = 0 substance;
  re0000000187: GlyRS_GlytRNAGlyGCC => GlyRS_degraded + GlytRNAGlyGCC; re0000000187_k1*GlyRS_GlytRNAGlyGCC;
    re0000000187_k1 = 0 substance;
  re0000000188: GlyRS_tRNAGlyGCC + Gly => GlyRS_Gly_tRNAGlyGCC; re0000000188_k1*GlyRS_tRNAGlyGCC*Gly;
    re0000000188_k1 = 20 substance;
  re0000000189: GlyRS_GlyAMP_PPi_tRNAGlyGCC => GlyRS_GlyAMP_tRNAGlyGCC + PPi; re0000000189_k1*GlyRS_GlyAMP_PPi_tRNAGlyGCC;
    re0000000189_k1 = 1000 substance;
  re0000000190: GlyRS_Gly_tRNAGlyGCC => GlyRS_tRNAGlyGCC + Gly; re0000000190_k1*GlyRS_Gly_tRNAGlyGCC;
    re0000000190_k1 = 470 substance;
  re0000000191: GlyRS_tRNAGlyGCC + ATP => GlyRS_ATP_tRNAGlyGCC; re0000000191_k1*GlyRS_tRNAGlyGCC*ATP;
    re0000000191_k1 = 10 substance;
  re0000000192: GlyRS_ATP_tRNAGlyGCC => GlyRS_tRNAGlyGCC + ATP; re0000000192_k1*GlyRS_ATP_tRNAGlyGCC;
    re0000000192_k1 = 8900 substance;
  re0000000193: GlyRS_ATP_tRNAGlyGCC + Gly => GlyRS_Gly_ATP_tRNAGlyGCC; re0000000193_k1*GlyRS_ATP_tRNAGlyGCC*Gly;
    re0000000193_k1 = 0.024 substance;
  re0000000194: GlyRS_Gly_ATP_tRNAGlyGCC => GlyRS_ATP_tRNAGlyGCC + Gly; re0000000194_k1*GlyRS_Gly_ATP_tRNAGlyGCC;
    re0000000194_k1 = 3.2 substance;
  re0000000195: GlyRS_Gly_tRNAGlyGCC + ATP => GlyRS_Gly_ATP_tRNAGlyGCC; re0000000195_k1*GlyRS_Gly_tRNAGlyGCC*ATP;
    re0000000195_k1 = 10 substance;
  re0000000196: GlyRS_Gly_ATP_tRNAGlyGCC => GlyRS_Gly_tRNAGlyGCC + ATP; re0000000196_k1*GlyRS_Gly_ATP_tRNAGlyGCC;
    re0000000196_k1 = 4500 substance;
  re0000000197: GlyRS_Gly_ATP_tRNAGlyGCC => GlyRS_GlyAMP_PPi_tRNAGlyGCC; re0000000197_k1*GlyRS_Gly_ATP_tRNAGlyGCC;
    re0000000197_k1 = 2 substance;
  re0000000198: GlyRS_GlyAMP_PPi_tRNAGlyGCC => GlyRS_Gly_ATP_tRNAGlyGCC; re0000000198_k1*GlyRS_GlyAMP_PPi_tRNAGlyGCC;
    re0000000198_k1 = 0 substance;
  re0000000199: GlyRS + tRNAGlyGCC => GlyRS_tRNAGlyGCC; re0000000199_k1*GlyRS*tRNAGlyGCC;
    re0000000199_k1 = 376 substance;
  re0000000200: GlyRS_Gly + tRNAGlyGCC => GlyRS_Gly_tRNAGlyGCC; re0000000200_k1*GlyRS_Gly*tRNAGlyGCC;
    re0000000200_k1 = 376 substance;
  re0000000201: GlyRS_tRNAGlyGCC => GlyRS + tRNAGlyGCC; re0000000201_k1*GlyRS_tRNAGlyGCC;
    re0000000201_k1 = 100 substance;
  re0000000202: GlyRS_Gly_tRNAGlyGCC => GlyRS_Gly + tRNAGlyGCC; re0000000202_k1*GlyRS_Gly_tRNAGlyGCC;
    re0000000202_k1 = 100 substance;
  re0000000203: GlyRS_ATP + tRNAGlyGCC => GlyRS_ATP_tRNAGlyGCC; re0000000203_k1*GlyRS_ATP*tRNAGlyGCC;
    re0000000203_k1 = 376 substance;
  re0000000204: GlyRS_ATP_tRNAGlyGCC => GlyRS_ATP + tRNAGlyGCC; re0000000204_k1*GlyRS_ATP_tRNAGlyGCC;
    re0000000204_k1 = 100 substance;
  re0000000205: GlyRS_Gly_ATP + tRNAGlyGCC => GlyRS_Gly_ATP_tRNAGlyGCC; re0000000205_k1*GlyRS_Gly_ATP*tRNAGlyGCC;
    re0000000205_k1 = 376 substance;
  re0000000206: GlyRS_Gly_ATP_tRNAGlyGCC => GlyRS_Gly_ATP + tRNAGlyGCC; re0000000206_k1*GlyRS_Gly_ATP_tRNAGlyGCC;
    re0000000206_k1 = 100 substance;
  re0000000207: GlyRS_GlyAMP_PPi + tRNAGlyGCC => GlyRS_GlyAMP_PPi_tRNAGlyGCC; re0000000207_k1*GlyRS_GlyAMP_PPi*tRNAGlyGCC;
    re0000000207_k1 = 353 substance;
  re0000000208: GlyRS_GlyAMP_PPi_tRNAGlyGCC => GlyRS_GlyAMP_PPi + tRNAGlyGCC; re0000000208_k1*GlyRS_GlyAMP_PPi_tRNAGlyGCC;
    re0000000208_k1 = 100 substance;
  re0000000209: GlyRS_GlyAMP + tRNAGlyGCC => GlyRS_GlyAMP_tRNAGlyGCC; re0000000209_k1*GlyRS_GlyAMP*tRNAGlyGCC;
    re0000000209_k1 = 353 substance;
  re0000000210: GlyRS_GlyAMP_tRNAGlyGCC => GlyRS_GlyAMP + tRNAGlyGCC; re0000000210_k1*GlyRS_GlyAMP_tRNAGlyGCC;
    re0000000210_k1 = 100 substance;
  re0000000211: GlyRS_tRNAGlyGCC => GlyRS_degraded + tRNAGlyGCC; re0000000211_k1*GlyRS_tRNAGlyGCC;
    re0000000211_k1 = 0 substance;
  re0000000212: GlyRS_ATP_tRNAGlyGCC => GlyRS_degraded + tRNAGlyGCC + ATP; re0000000212_k1*GlyRS_ATP_tRNAGlyGCC;
    re0000000212_k1 = 0 substance;
  re0000000213: GlyRS_Gly_tRNAGlyGCC => GlyRS_degraded + tRNAGlyGCC + Gly; re0000000213_k1*GlyRS_Gly_tRNAGlyGCC;
    re0000000213_k1 = 0 substance;
  re0000000214: GlyRS_Gly_ATP_tRNAGlyGCC => GlyRS_degraded + tRNAGlyGCC + ATP + Gly; re0000000214_k1*GlyRS_Gly_ATP_tRNAGlyGCC;
    re0000000214_k1 = 0 substance;
  re0000000215: GlyRS_GlyAMP_PPi_tRNAGlyGCC => GlyRS_degraded + tRNAGlyGCC + GlyAMP + PPi; re0000000215_k1*GlyRS_GlyAMP_PPi_tRNAGlyGCC;
    re0000000215_k1 = 0 substance;
  re0000000216: tRNAGlyGCC + Gly => GlytRNAGlyGCC; re0000000216_k1*tRNAGlyGCC*Gly;
    re0000000216_k1 = 0 substance;
  re0000000217: GlyRS_GlyAMP_tRNAGlyGCC + PPi => GlyRS_GlyAMP_PPi_tRNAGlyGCC; re0000000217_k1*GlyRS_GlyAMP_tRNAGlyGCC*PPi;
    re0000000217_k1 = 0 substance;
  re0000000218: MettRNAfMetCAU => tRNAfMetCAU + Met; re0000000218_k1*MettRNAfMetCAU;
    re0000000218_k1 = 0 substance;
  re0000000219: MetRS_MetAMP_tRNAfMetCAU => MetRS_degraded + MetAMP + tRNAfMetCAU; re0000000219_k1*MetRS_MetAMP_tRNAfMetCAU;
    re0000000219_k1 = 0 substance;
  re0000000220: MetRS_MetAMP_tRNAfMetCAU => MetRS_AMP_MettRNAfMetCAU; re0000000220_k1*MetRS_MetAMP_tRNAfMetCAU;
    re0000000220_k1 = 13.7 substance;
  re0000000221: MetRS_AMP_MettRNAfMetCAU => MetRS_MetAMP_tRNAfMetCAU; re0000000221_k1*MetRS_AMP_MettRNAfMetCAU;
    re0000000221_k1 = 0 substance;
  re0000000222: MetRS_AMP_MettRNAfMetCAU => MetRS_MettRNAfMetCAU + AMP; re0000000222_k1*MetRS_AMP_MettRNAfMetCAU;
    re0000000222_k1 = 1000 substance;
  re0000000223: MetRS_MettRNAfMetCAU + AMP => MetRS_AMP_MettRNAfMetCAU; re0000000223_k1*MetRS_MettRNAfMetCAU*AMP;
    re0000000223_k1 = 0 substance;
  re0000000224: MetRS_AMP_MettRNAfMetCAU => MettRNAfMetCAU + MetRS_AMP; re0000000224_k1*MetRS_AMP_MettRNAfMetCAU;
    re0000000224_k1 = 1.685 substance;
  re0000000225: MetRS_AMP + MettRNAfMetCAU => MetRS_AMP_MettRNAfMetCAU; re0000000225_k1*MetRS_AMP*MettRNAfMetCAU;
    re0000000225_k1 = 5.6 substance;
  re0000000226: MetRS_MettRNAfMetCAU => MetRS + MettRNAfMetCAU; re0000000226_k1*MetRS_MettRNAfMetCAU;
    re0000000226_k1 = 1.685 substance;
  re0000000227: MetRS + MettRNAfMetCAU => MetRS_MettRNAfMetCAU; re0000000227_k1*MetRS*MettRNAfMetCAU;
    re0000000227_k1 = 5.6 substance;
  re0000000228: MetRS_AMP_MettRNAfMetCAU => MetRS_degraded + AMP + MettRNAfMetCAU; re0000000228_k1*MetRS_AMP_MettRNAfMetCAU;
    re0000000228_k1 = 0 substance;
  re0000000229: MetRS_MettRNAfMetCAU => MetRS_degraded + MettRNAfMetCAU; re0000000229_k1*MetRS_MettRNAfMetCAU;
    re0000000229_k1 = 0 substance;
  re0000000230: MetRS_tRNAfMetCAU + Met => MetRS_Met_tRNAfMetCAU; re0000000230_k1*MetRS_tRNAfMetCAU*Met;
    re0000000230_k1 = 5 substance;
  re0000000231: MetRS_MetAMP_PPi_tRNAfMetCAU => MetRS_MetAMP_tRNAfMetCAU + PPi; re0000000231_k1*MetRS_MetAMP_PPi_tRNAfMetCAU;
    re0000000231_k1 = 1000 substance;
  re0000000232: MetRS_Met_tRNAfMetCAU => MetRS_tRNAfMetCAU + Met; re0000000232_k1*MetRS_Met_tRNAfMetCAU;
    re0000000232_k1 = 350 substance;
  re0000000233: MetRS_tRNAfMetCAU + ATP => MetRS_ATP_tRNAfMetCAU; re0000000233_k1*MetRS_tRNAfMetCAU*ATP;
    re0000000233_k1 = 10 substance;
  re0000000234: MetRS_ATP_tRNAfMetCAU => MetRS_tRNAfMetCAU + ATP; re0000000234_k1*MetRS_ATP_tRNAfMetCAU;
    re0000000234_k1 = 2500 substance;
  re0000000235: MetRS_ATP_tRNAfMetCAU + Met => MetRS_Met_ATP_tRNAfMetCAU; re0000000235_k1*MetRS_ATP_tRNAfMetCAU*Met;
    re0000000235_k1 = 5 substance;
  re0000000236: MetRS_Met_ATP_tRNAfMetCAU => MetRS_ATP_tRNAfMetCAU + Met; re0000000236_k1*MetRS_Met_ATP_tRNAfMetCAU;
    re0000000236_k1 = 350 substance;
  re0000000237: MetRS_Met_tRNAfMetCAU + ATP => MetRS_Met_ATP_tRNAfMetCAU; re0000000237_k1*MetRS_Met_tRNAfMetCAU*ATP;
    re0000000237_k1 = 10 substance;
  re0000000238: MetRS_Met_ATP_tRNAfMetCAU => MetRS_Met_tRNAfMetCAU + ATP; re0000000238_k1*MetRS_Met_ATP_tRNAfMetCAU;
    re0000000238_k1 = 2500 substance;
  re0000000239: MetRS_Met_ATP_tRNAfMetCAU => MetRS_MetAMP_PPi_tRNAfMetCAU; re0000000239_k1*MetRS_Met_ATP_tRNAfMetCAU;
    re0000000239_k1 = 200 substance;
  re0000000240: MetRS_MetAMP_PPi_tRNAfMetCAU => MetRS_Met_ATP_tRNAfMetCAU; re0000000240_k1*MetRS_MetAMP_PPi_tRNAfMetCAU;
    re0000000240_k1 = 0 substance;
  re0000000241: MetRS + tRNAfMetCAU => MetRS_tRNAfMetCAU; re0000000241_k1*MetRS*tRNAfMetCAU;
    re0000000241_k1 = 50 substance;
  re0000000242: MetRS_Met + tRNAfMetCAU => MetRS_Met_tRNAfMetCAU; re0000000242_k1*MetRS_Met*tRNAfMetCAU;
    re0000000242_k1 = 50 substance;
  re0000000243: MetRS_tRNAfMetCAU => MetRS + tRNAfMetCAU; re0000000243_k1*MetRS_tRNAfMetCAU;
    re0000000243_k1 = 150 substance;
  re0000000244: MetRS_Met_tRNAfMetCAU => MetRS_Met + tRNAfMetCAU; re0000000244_k1*MetRS_Met_tRNAfMetCAU;
    re0000000244_k1 = 150 substance;
  re0000000245: MetRS_ATP + tRNAfMetCAU => MetRS_ATP_tRNAfMetCAU; re0000000245_k1*MetRS_ATP*tRNAfMetCAU;
    re0000000245_k1 = 50 substance;
  re0000000246: MetRS_ATP_tRNAfMetCAU => MetRS_ATP + tRNAfMetCAU; re0000000246_k1*MetRS_ATP_tRNAfMetCAU;
    re0000000246_k1 = 150 substance;
  re0000000247: MetRS_Met_ATP + tRNAfMetCAU => MetRS_Met_ATP_tRNAfMetCAU; re0000000247_k1*MetRS_Met_ATP*tRNAfMetCAU;
    re0000000247_k1 = 50 substance;
  re0000000248: MetRS_Met_ATP_tRNAfMetCAU => MetRS_Met_ATP + tRNAfMetCAU; re0000000248_k1*MetRS_Met_ATP_tRNAfMetCAU;
    re0000000248_k1 = 150 substance;
  re0000000249: MetRS_MetAMP_PPi + tRNAfMetCAU => MetRS_MetAMP_PPi_tRNAfMetCAU; re0000000249_k1*MetRS_MetAMP_PPi*tRNAfMetCAU;
    re0000000249_k1 = 50 substance;
  re0000000250: MetRS_MetAMP_PPi_tRNAfMetCAU => MetRS_MetAMP_PPi + tRNAfMetCAU; re0000000250_k1*MetRS_MetAMP_PPi_tRNAfMetCAU;
    re0000000250_k1 = 150 substance;
  re0000000251: MetRS_MetAMP + tRNAfMetCAU => MetRS_MetAMP_tRNAfMetCAU; re0000000251_k1*MetRS_MetAMP*tRNAfMetCAU;
    re0000000251_k1 = 50 substance;
  re0000000252: MetRS_MetAMP_tRNAfMetCAU => MetRS_MetAMP + tRNAfMetCAU; re0000000252_k1*MetRS_MetAMP_tRNAfMetCAU;
    re0000000252_k1 = 150 substance;
  re0000000253: MetRS_tRNAfMetCAU => MetRS_degraded + tRNAfMetCAU; re0000000253_k1*MetRS_tRNAfMetCAU;
    re0000000253_k1 = 0 substance;
  re0000000254: MetRS_ATP_tRNAfMetCAU => MetRS_degraded + tRNAfMetCAU + ATP; re0000000254_k1*MetRS_ATP_tRNAfMetCAU;
    re0000000254_k1 = 0 substance;
  re0000000255: MetRS_Met_tRNAfMetCAU => MetRS_degraded + tRNAfMetCAU + Met; re0000000255_k1*MetRS_Met_tRNAfMetCAU;
    re0000000255_k1 = 0 substance;
  re0000000256: MetRS_Met_ATP_tRNAfMetCAU => MetRS_degraded + tRNAfMetCAU + ATP + Met; re0000000256_k1*MetRS_Met_ATP_tRNAfMetCAU;
    re0000000256_k1 = 0 substance;
  re0000000257: MetRS_MetAMP_PPi_tRNAfMetCAU => MetRS_degraded + tRNAfMetCAU + MetAMP + PPi; re0000000257_k1*MetRS_MetAMP_PPi_tRNAfMetCAU;
    re0000000257_k1 = 0 substance;
  re0000000258: MettRNAfMetCAU => MettRNAfMetCAU_degraded; re0000000258_k1*MettRNAfMetCAU;
    re0000000258_k1 = 0 substance;
  re0000000259: tRNAfMetCAU + Met => MettRNAfMetCAU; re0000000259_k1*tRNAfMetCAU*Met;
    re0000000259_k1 = 0 substance;
  re0000000260: MetRS_MetAMP_tRNAfMetCAU + PPi => MetRS_MetAMP_PPi_tRNAfMetCAU; re0000000260_k1*MetRS_MetAMP_tRNAfMetCAU*PPi;
    re0000000260_k1 = 0 substance;
  re0000000261: EFTu + EFTs => EFTu_EFTs; re0000000261_k1*EFTu*EFTs;
    re0000000261_k1 = 10 substance;
  re0000000262: EFTu_EFTs => EFTu + EFTs; re0000000262_k1*EFTu_EFTs;
    re0000000262_k1 = 0.03 substance;
  re0000000263: EFTu_EFTs + GDP => EFTu_GDP_EFTs; re0000000263_k1*EFTu_EFTs*GDP;
    re0000000263_k1 = 14 substance;
  re0000000264: EFTu_GDP_EFTs => EFTu_EFTs + GDP; re0000000264_k1*EFTu_GDP_EFTs;
    re0000000264_k1 = 125 substance;
  re0000000265: EFTu_GDP_EFTs => EFTu_GDP + EFTs; re0000000265_k1*EFTu_GDP_EFTs;
    re0000000265_k1 = 350 substance;
  re0000000266: EFTu_GDP + EFTs => EFTu_GDP_EFTs; re0000000266_k1*EFTu_GDP*EFTs;
    re0000000266_k1 = 60 substance;
  re0000000267: EFTu_GDP => EFTu + GDP; re0000000267_k1*EFTu_GDP;
    re0000000267_k1 = 0.002 substance;
  re0000000268: EFTu + GDP => EFTu_GDP; re0000000268_k1*EFTu*GDP;
    re0000000268_k1 = 2 substance;
  re0000000269: EFTu_EFTs + GTP => EFTu_GTP_EFTs; re0000000269_k1*EFTu_EFTs*GTP;
    re0000000269_k1 = 6 substance;
  re0000000270: EFTu_GTP_EFTs => EFTu_EFTs + GTP; re0000000270_k1*EFTu_GTP_EFTs;
    re0000000270_k1 = 85 substance;
  re0000000271: EFTu_GTP_EFTs => EFTu_GTP + EFTs; re0000000271_k1*EFTu_GTP_EFTs;
    re0000000271_k1 = 60 substance;
  re0000000272: EFTu_GTP + EFTs => EFTu_GTP_EFTs; re0000000272_k1*EFTu_GTP*EFTs;
    re0000000272_k1 = 30 substance;
  re0000000273: EFTu + GTP => EFTu_GTP; re0000000273_k1*EFTu*GTP;
    re0000000273_k1 = 0.5 substance;
  re0000000274: EFTu_GTP => EFTu + GTP; re0000000274_k1*EFTu_GTP;
    re0000000274_k1 = 0.03 substance;
  re0000000275: EFTu_GTP + GlytRNAGlyGCC => EFTu_GTP_GlytRNAGlyGCC; re0000000275_k1*EFTu_GTP*GlytRNAGlyGCC;
    re0000000275_k1 = 1.5 substance;
  re0000000276: EFTu_GTP_GlytRNAGlyGCC => EFTu_GTP + GlytRNAGlyGCC; re0000000276_k1*EFTu_GTP_GlytRNAGlyGCC;
    re0000000276_k1 = 0.0013 substance;
  re0000000277: EFTs => EFTs_degraded; re0000000277_k1*EFTs;
    re0000000277_k1 = 0 substance;
  re0000000278: EFTu_GTP => EFTu_degraded + GTP; re0000000278_k1*EFTu_GTP;
    re0000000278_k1 = 0 substance;
  re0000000279: EFTu_GDP => EFTu_degraded + GDP; re0000000279_k1*EFTu_GDP;
    re0000000279_k1 = 0 substance;
  re0000000280: EFTu_EFTs => EFTu_degraded + EFTs; re0000000280_k1*EFTu_EFTs;
    re0000000280_k1 = 0 substance;
  re0000000281: EFTu_EFTs => EFTs_degraded + EFTu; re0000000281_k1*EFTu_EFTs;
    re0000000281_k1 = 0 substance;
  re0000000282: EFTu_GDP_EFTs => EFTu_degraded + EFTs + GDP; re0000000282_k1*EFTu_GDP_EFTs;
    re0000000282_k1 = 0 substance;
  re0000000283: EFTu_GDP_EFTs => EFTs_degraded + EFTu + GDP; re0000000283_k1*EFTu_GDP_EFTs;
    re0000000283_k1 = 0 substance;
  re0000000284: EFTu_GTP_EFTs => EFTu_degraded + EFTs + GTP; re0000000284_k1*EFTu_GTP_EFTs;
    re0000000284_k1 = 0 substance;
  re0000000285: EFTu_GTP_EFTs => EFTs_degraded + EFTu + GTP; re0000000285_k1*EFTu_GTP_EFTs;
    re0000000285_k1 = 0 substance;
  re0000000286: EFTu_GTP_GlytRNAGlyGCC => EFTu_degraded + GlytRNAGlyGCC + GTP; re0000000286_k1*EFTu_GTP_GlytRNAGlyGCC;
    re0000000286_k1 = 0 substance;
  re0000000287: EFTu_GTP_GlytRNAGlyGCC => GlytRNAGlyGCC_degraded + EFTu + GTP; re0000000287_k1*EFTu_GTP_GlytRNAGlyGCC;
    re0000000287_k1 = 0 substance;
  re0000000288: EFTu_GTP + MettRNAfMetCAU => EFTu_GTP_MettRNAfMetCAU; re0000000288_k1*EFTu_GTP*MettRNAfMetCAU;
    re0000000288_k1 = 1.5 substance;
  re0000000289: EFTu_GTP_MettRNAfMetCAU => EFTu_GTP + MettRNAfMetCAU; re0000000289_k1*EFTu_GTP_MettRNAfMetCAU;
    re0000000289_k1 = 0.0453 substance;
  re0000000290: EFTu_GTP_MettRNAfMetCAU => EFTu_degraded + MettRNAfMetCAU + GTP; re0000000290_k1*EFTu_GTP_MettRNAfMetCAU;
    re0000000290_k1 = 0 substance;
  re0000000291: EFTu_GTP_MettRNAfMetCAU => MettRNAfMetCAU_degraded + EFTu + GTP; re0000000291_k1*EFTu_GTP_MettRNAfMetCAU;
    re0000000291_k1 = 0 substance;
  re0000000292: EFG_GDP => EFG + GDP; re0000000292_k1*EFG_GDP;
    re0000000292_k1 = 300 substance;
  re0000000293: EFG + GDP => EFG_GDP; re0000000293_k1*EFG*GDP;
    re0000000293_k1 = 17.6 substance;
  re0000000294: EFG + GTP => EFG_GTP; re0000000294_k1*EFG*GTP;
    re0000000294_k1 = 0.58 substance;
  re0000000295: EFG_GTP => EFG + GTP; re0000000295_k1*EFG_GTP;
    re0000000295_k1 = 13 substance;
  re0000000296: EFG_GTP => EFG_degraded + GTP; re0000000296_k1*EFG_GTP;
    re0000000296_k1 = 0 substance;
  re0000000297: EFG_GDP => EFG_degraded + GDP; re0000000297_k1*EFG_GDP;
    re0000000297_k1 = 0 substance;
  re0000000298: RS50S + EFG_GTP => RS50S_EFG_GTP; re0000000298_k1*RS50S*EFG_GTP;
    re0000000298_k1 = 30 substance;
  re0000000299: RS50S_EFG_GTP => RS50S + EFG_GTP; re0000000299_k1*RS50S_EFG_GTP;
    re0000000299_k1 = 25 substance;
  re0000000300: RS70S + EFG_GTP => RS70S_EFG_GTP; re0000000300_k1*RS70S*EFG_GTP;
    re0000000300_k1 = 30 substance;
  re0000000301: RS70S_EFG_GTP => RS70S + EFG_GTP; re0000000301_k1*RS70S_EFG_GTP;
    re0000000301_k1 = 25 substance;
  re0000000302: RS50S_EFG_GTP => RS50S_EFG_GDP_PO4; re0000000302_k1*RS50S_EFG_GTP;
    re0000000302_k1 = 31 substance;
  re0000000303: RS50S_EFG_GDP_PO4 => RS50S_EFG_GTP; re0000000303_k1*RS50S_EFG_GDP_PO4;
    re0000000303_k1 = 5 substance;
  re0000000304: RS70S_EFG_GTP => RS70S_EFG_GDP_PO4; re0000000304_k1*RS70S_EFG_GTP;
    re0000000304_k1 = 31 substance;
  re0000000305: RS70S_EFG_GDP_PO4 => RS70S_EFG_GTP; re0000000305_k1*RS70S_EFG_GDP_PO4;
    re0000000305_k1 = 5 substance;
  re0000000306: RS50S_EFG_GDP_PO4 => RS50S_EFG_GDP + PO4; re0000000306_k1*RS50S_EFG_GDP_PO4;
    re0000000306_k1 = 5 substance;
  re0000000307: RS70S_EFG_GDP_PO4 => RS70S_EFG_GDP + PO4; re0000000307_k1*RS70S_EFG_GDP_PO4;
    re0000000307_k1 = 5 substance;
  re0000000308: RS50S_EFG_GDP => RS50S + EFG_GDP; re0000000308_k1*RS50S_EFG_GDP;
    re0000000308_k1 = 1000 substance;
  re0000000309: RS70S_EFG_GDP => RS70S + EFG_GDP; re0000000309_k1*RS70S_EFG_GDP;
    re0000000309_k1 = 1000 substance;
  re0000000310: RS50S_EFG_GTP => EFG_degraded + GTP + RS50S; re0000000310_k1*RS50S_EFG_GTP;
    re0000000310_k1 = 0 substance;
  re0000000311: RS50S_EFG_GTP => RS50S_degraded + GTP + EFG; re0000000311_k1*RS50S_EFG_GTP;
    re0000000311_k1 = 0 substance;
  re0000000312: RS50S_EFG_GDP_PO4 => EFG_degraded + GDP + PO4 + RS50S; re0000000312_k1*RS50S_EFG_GDP_PO4;
    re0000000312_k1 = 0 substance;
  re0000000313: RS50S_EFG_GDP_PO4 => RS50S_degraded + EFG + GDP + PO4; re0000000313_k1*RS50S_EFG_GDP_PO4;
    re0000000313_k1 = 0 substance;
  re0000000314: RS50S_EFG_GDP => EFG_degraded + GDP + RS50S; re0000000314_k1*RS50S_EFG_GDP;
    re0000000314_k1 = 0 substance;
  re0000000315: RS50S_EFG_GDP => RS50S_degraded + EFG + GDP; re0000000315_k1*RS50S_EFG_GDP;
    re0000000315_k1 = 0 substance;
  re0000000316: RS70S_EFG_GTP => EFG_degraded + RS30S + GTP + RS50S; re0000000316_k1*RS70S_EFG_GTP;
    re0000000316_k1 = 0 substance;
  re0000000317: RS70S_EFG_GTP => RS50S_degraded + EFG + GTP + RS30S; re0000000317_k1*RS70S_EFG_GTP;
    re0000000317_k1 = 0 substance;
  re0000000318: RS70S_EFG_GDP_PO4 => EFG_degraded + RS30S + GDP + PO4 + RS50S; re0000000318_k1*RS70S_EFG_GDP_PO4;
    re0000000318_k1 = 0 substance;
  re0000000319: RS70S_EFG_GDP_PO4 => RS50S_degraded + EFG + PO4 + GDP + RS30S; re0000000319_k1*RS70S_EFG_GDP_PO4;
    re0000000319_k1 = 0 substance;
  re0000000320: RS70S_EFG_GTP => RS30S_degraded + EFG + RS50S + GTP; re0000000320_k1*RS70S_EFG_GTP;
    re0000000320_k1 = 0 substance;
  re0000000321: RS70S_EFG_GDP_PO4 => RS30S_degraded + EFG + PO4 + RS50S + GDP; re0000000321_k1*RS70S_EFG_GDP_PO4;
    re0000000321_k1 = 0 substance;
  re0000000322: RS70S_EFG_GDP => RS50S_degraded + EFG + GDP + RS30S; re0000000322_k1*RS70S_EFG_GDP;
    re0000000322_k1 = 0 substance;
  re0000000323: RS70S_EFG_GDP => EFG_degraded + RS30S + GDP + RS50S; re0000000323_k1*RS70S_EFG_GDP;
    re0000000323_k1 = 0 substance;
  re0000000324: RS70S_EFG_GDP => RS30S_degraded + EFG + RS50S + GDP; re0000000324_k1*RS70S_EFG_GDP;
    re0000000324_k1 = 0 substance;
  re0000000325: RS50S_EFG_GDP + PO4 => RS50S_EFG_GDP_PO4; re0000000325_k1*RS50S_EFG_GDP*PO4;
    re0000000325_k1 = 0 substance;
  re0000000326: RS70S_EFG_GDP + PO4 => RS70S_EFG_GDP_PO4; re0000000326_k1*RS70S_EFG_GDP*PO4;
    re0000000326_k1 = 0 substance;
  re0000000327: RS50S + EFG_GDP => RS50S_EFG_GDP; re0000000327_k1*RS50S*EFG_GDP;
    re0000000327_k1 = 0 substance;
  re0000000328: RS70S + EFG_GDP => RS70S_EFG_GDP; re0000000328_k1*RS70S*EFG_GDP;
    re0000000328_k1 = 0 substance;
  re0000000329: CK => CK_degraded; re0000000329_k1*CK;
    re0000000329_k1 = 0 substance;
  re0000000330: CK + ADP => CK_ADP; re0000000330_k1*CK*ADP;
    re0000000330_k1 = 19.60784 substance;
  re0000000331: CK_ADP => CK + ADP; re0000000331_k1*CK_ADP;
    re0000000331_k1 = 1000 substance;
  re0000000332: CK + CP => CK_CP; re0000000332_k1*CK*CP;
    re0000000332_k1 = 2 substance;
  re0000000333: CK_CP => CK + CP; re0000000333_k1*CK_CP;
    re0000000333_k1 = 1000 substance;
  re0000000334: CK_CP + ADP => CK_CP_ADP; re0000000334_k1*CK_CP*ADP;
    re0000000334_k1 = 19.60784 substance;
  re0000000335: CK_CP_ADP => CK_CP + ADP; re0000000335_k1*CK_CP_ADP;
    re0000000335_k1 = 1000 substance;
  re0000000336: CK_ADP + CP => CK_CP_ADP; re0000000336_k1*CK_ADP*CP;
    re0000000336_k1 = 2 substance;
  re0000000337: CK_CP_ADP => CP + CK_ADP; re0000000337_k1*CK_CP_ADP;
    re0000000337_k1 = 1000 substance;
  re0000000338: CK_CP_ADP => CK_Cr_ATP; re0000000338_k1*CK_CP_ADP;
    re0000000338_k1 = 2.527408 substance;
  re0000000339: CK_Cr_ATP => CK_CP_ADP; re0000000339_k1*CK_Cr_ATP;
    re0000000339_k1 = 0.548808667 substance;
  re0000000340: CK_Cr_ATP => CK_Cr + ATP; re0000000340_k1*CK_Cr_ATP;
    re0000000340_k1 = 1000 substance;
  re0000000341: CK_Cr + ATP => CK_Cr_ATP; re0000000341_k1*CK_Cr*ATP;
    re0000000341_k1 = 1.369863 substance;
  re0000000342: CK_Cr_ATP => CK_ATP + Cr; re0000000342_k1*CK_Cr_ATP;
    re0000000342_k1 = 1000 substance;
  re0000000343: CK_ATP + Cr => CK_Cr_ATP; re0000000343_k1*CK_ATP*Cr;
    re0000000343_k1 = 0.204081633 substance;
  re0000000344: CK_ATP => CK + ATP; re0000000344_k1*CK_ATP;
    re0000000344_k1 = 1000 substance;
  re0000000345: CK + ATP => CK_ATP; re0000000345_k1*CK*ATP;
    re0000000345_k1 = 1.369863 substance;
  re0000000346: CK_Cr => CK + Cr; re0000000346_k1*CK_Cr;
    re0000000346_k1 = 1000 substance;
  re0000000347: CK + Cr => CK_Cr; re0000000347_k1*CK*Cr;
    re0000000347_k1 = 0.204081633 substance;
  re0000000348: CK_CP => CK_degraded + CP; re0000000348_k1*CK_CP;
    re0000000348_k1 = 0 substance;
  re0000000349: CK_ADP => CK_degraded + ADP; re0000000349_k1*CK_ADP;
    re0000000349_k1 = 0 substance;
  re0000000350: CK_CP_ADP => CK_degraded + ADP + CP; re0000000350_k1*CK_CP_ADP;
    re0000000350_k1 = 0 substance;
  re0000000351: CK_Cr_ATP => CK_degraded + ATP + Cr; re0000000351_k1*CK_Cr_ATP;
    re0000000351_k1 = 0 substance;
  re0000000352: CK_ATP => CK_degraded + ATP; re0000000352_k1*CK_ATP;
    re0000000352_k1 = 0 substance;
  re0000000353: CK_Cr => CK_degraded + Cr; re0000000353_k1*CK_Cr;
    re0000000353_k1 = 0 substance;
  re0000000354: NDK => NDK_degraded; re0000000354_k1*NDK;
    re0000000354_k1 = 0 substance;
  re0000000355: NDK + ATP => NDK_ATP; re0000000355_k1*NDK*ATP;
    re0000000355_k1 = 0.555555556 substance;
  re0000000356: NDK_ATP => NDK + ATP; re0000000356_k1*NDK_ATP;
    re0000000356_k1 = 1000 substance;
  re0000000357: NDK + GDP => NDK_GDP; re0000000357_k1*NDK*GDP;
    re0000000357_k1 = 20.40816 substance;
  re0000000358: NDK_GDP => NDK + GDP; re0000000358_k1*NDK_GDP;
    re0000000358_k1 = 1000 substance;
  re0000000359: NDK_GDP + ATP => NDK_GDP_ATP; re0000000359_k1*NDK_GDP*ATP;
    re0000000359_k1 = 0.555555556 substance;
  re0000000360: NDK_GDP_ATP => NDK_GDP + ATP; re0000000360_k1*NDK_GDP_ATP;
    re0000000360_k1 = 1000 substance;
  re0000000361: NDK_ATP + GDP => NDK_GDP_ATP; re0000000361_k1*NDK_ATP*GDP;
    re0000000361_k1 = 20.40816 substance;
  re0000000362: NDK_GDP_ATP => NDK_ATP + GDP; re0000000362_k1*NDK_GDP_ATP;
    re0000000362_k1 = 1000 substance;
  re0000000363: NDK_GDP_ATP => NDK_GTP_ADP; re0000000363_k1*NDK_GDP_ATP;
    re0000000363_k1 = 470 substance;
  re0000000364: NDK_GTP_ADP => NDK_GDP_ATP; re0000000364_k1*NDK_GTP_ADP;
    re0000000364_k1 = 0 substance;
  re0000000365: NDK_GTP_ADP => NDK_ADP + GTP; re0000000365_k1*NDK_GTP_ADP;
    re0000000365_k1 = 1000 substance;
  re0000000366: NDK_GTP_ADP => NDK_GTP + ADP; re0000000366_k1*NDK_GTP_ADP;
    re0000000366_k1 = 1000 substance;
  re0000000367: NDK_ADP => NDK + ADP; re0000000367_k1*NDK_ADP;
    re0000000367_k1 = 1000 substance;
  re0000000368: NDK_GTP => NDK + GTP; re0000000368_k1*NDK_GTP;
    re0000000368_k1 = 1000 substance;
  re0000000369: NDK_GDP => NDK_degraded + GDP; re0000000369_k1*NDK_GDP;
    re0000000369_k1 = 0 substance;
  re0000000370: NDK_ATP => NDK_degraded + ATP; re0000000370_k1*NDK_ATP;
    re0000000370_k1 = 0 substance;
  re0000000371: NDK_GDP_ATP => NDK_degraded + ATP + GDP; re0000000371_k1*NDK_GDP_ATP;
    re0000000371_k1 = 0 substance;
  re0000000372: NDK_GTP_ADP => NDK_degraded + ADP + GTP; re0000000372_k1*NDK_GTP_ADP;
    re0000000372_k1 = 0 substance;
  re0000000373: NDK_ADP => NDK_degraded + ADP; re0000000373_k1*NDK_ADP;
    re0000000373_k1 = 0 substance;
  re0000000374: NDK_GTP => NDK_degraded + GTP; re0000000374_k1*NDK_GTP;
    re0000000374_k1 = 0 substance;
  re0000000375: NDK_GTP + ADP => NDK_GTP_ADP; re0000000375_k1*NDK_GTP*ADP;
    re0000000375_k1 = 15.15152 substance;
  re0000000376: NDK_ADP + GTP => NDK_GTP_ADP; re0000000376_k1*NDK_ADP*GTP;
    re0000000376_k1 = 6.666667 substance;
  re0000000377: NDK + GTP => NDK_GTP; re0000000377_k1*NDK*GTP;
    re0000000377_k1 = 6.666667 substance;
  re0000000378: NDK + ADP => NDK_ADP; re0000000378_k1*NDK*ADP;
    re0000000378_k1 = 15.15152 substance;
  re0000000379: MK => MK_degraded; re0000000379_k1*MK;
    re0000000379_k1 = 0 substance;
  re0000000380: MK + ATP => MK_ATP; re0000000380_k1*MK*ATP;
    re0000000380_k1 = 16.66667 substance;
  re0000000381: MK_ATP => ATP + MK; re0000000381_k1*MK_ATP;
    re0000000381_k1 = 1000 substance;
  re0000000382: MK + AMP => MK_AMP; re0000000382_k1*MK*AMP;
    re0000000382_k1 = 8.333333 substance;
  re0000000383: MK_AMP => MK + AMP; re0000000383_k1*MK_AMP;
    re0000000383_k1 = 1000 substance;
  re0000000384: MK_AMP + ATP => MK_ATP_AMP; re0000000384_k1*MK_AMP*ATP;
    re0000000384_k1 = 16.66667 substance;
  re0000000385: MK_ATP_AMP => ATP + MK_AMP; re0000000385_k1*MK_ATP_AMP;
    re0000000385_k1 = 1000 substance;
  re0000000386: MK_ATP + AMP => MK_ATP_AMP; re0000000386_k1*MK_ATP*AMP;
    re0000000386_k1 = 8.333333 substance;
  re0000000387: MK_ATP_AMP => MK_ATP + AMP; re0000000387_k1*MK_ATP_AMP;
    re0000000387_k1 = 1000 substance;
  re0000000388: MK_ATP_AMP => MK_ADP_ADP; re0000000388_k1*MK_ATP_AMP;
    re0000000388_k1 = 255.6 substance;
  re0000000389: MK_ADP_ADP => MK_ATP_AMP; re0000000389_k1*MK_ADP_ADP;
    re0000000389_k1 = 345.6 substance;
  re0000000390: MK_ADP_ADP => MK_ADP_1 + ADP; re0000000390_k1*MK_ADP_ADP;
    re0000000390_k1 = 1000 substance;
  re0000000391: MK_ADP_1 + ADP => MK_ADP_ADP; re0000000391_k1*MK_ADP_1*ADP;
    re0000000391_k1 = 35.71429 substance;
  re0000000392: MK_ADP_ADP => MK_ADP_2 + ADP; re0000000392_k1*MK_ADP_ADP;
    re0000000392_k1 = 1000 substance;
  re0000000393: MK_ADP_2 + ADP => MK_ADP_ADP; re0000000393_k1*MK_ADP_2*ADP;
    re0000000393_k1 = 1.098901 substance;
  re0000000394: MK_ADP_1 => MK + ADP; re0000000394_k1*MK_ADP_1;
    re0000000394_k1 = 1000 substance;
  re0000000395: MK + ADP => MK_ADP_1; re0000000395_k1*MK*ADP;
    re0000000395_k1 = 1.098901 substance;
  re0000000396: MK_ADP_2 => ADP + MK; re0000000396_k1*MK_ADP_2;
    re0000000396_k1 = 1000 substance;
  re0000000397: MK + ADP => MK_ADP_2; re0000000397_k1*MK*ADP;
    re0000000397_k1 = 35.71429 substance;
  re0000000398: MK_AMP => MK_degraded + AMP; re0000000398_k1*MK_AMP;
    re0000000398_k1 = 0 substance;
  re0000000399: MK_ATP => MK_degraded + ATP; re0000000399_k1*MK_ATP;
    re0000000399_k1 = 0 substance;
  re0000000400: MK_ATP_AMP => MK_degraded + ATP; re0000000400_k1*MK_ATP_AMP;
    re0000000400_k1 = 0 substance;
  re0000000401: MK_ADP_ADP => MK_degraded + ADP; re0000000401_k1*MK_ADP_ADP;
    re0000000401_k1 = 0 substance;
  re0000000402: MK_ADP_1 => MK_degraded + ADP; re0000000402_k1*MK_ADP_1;
    re0000000402_k1 = 0 substance;
  re0000000403: MK_ADP_2 => MK_degraded + ADP; re0000000403_k1*MK_ADP_2;
    re0000000403_k1 = 0 substance;
  re0000000404: PPiase => PPiase_degraded; re0000000404_k1*PPiase;
    re0000000404_k1 = 0 substance;
  re0000000405: PPiase + PPi => PPiase_PPi; re0000000405_k1*PPiase*PPi;
    re0000000405_k1 = 46 substance;
  re0000000406: PPiase_PPi => PPiase + PPi; re0000000406_k1*PPiase_PPi;
    re0000000406_k1 = 200 substance;
  re0000000407: PPiase_PPi => PPiase_PO4_PO4; re0000000407_k1*PPiase_PPi;
    re0000000407_k1 = 800 substance;
  re0000000408: PPiase_PO4_PO4 => PPiase_PPi; re0000000408_k1*PPiase_PO4_PO4;
    re0000000408_k1 = 140 substance;
  re0000000409: PPiase_PO4_PO4 => PPiase_PO4 + PO4; re0000000409_k1*PPiase_PO4_PO4;
    re0000000409_k1 = 440 substance;
  re0000000410: PPiase_PO4 + PO4 => PPiase_PO4_PO4; re0000000410_k1*PPiase_PO4*PO4;
    re0000000410_k1 = 0.059 substance;
  re0000000411: PPiase_PO4 => PPiase + PO4; re0000000411_k1*PPiase_PO4;
    re0000000411_k1 = 400 substance;
  re0000000412: PPiase + PO4 => PPiase_PO4; re0000000412_k1*PPiase*PO4;
    re0000000412_k1 = 0.26 substance;
  re0000000413: PPiase_PPi => PPiase_degraded + PPi; re0000000413_k1*PPiase_PPi;
    re0000000413_k1 = 0 substance;
  re0000000414: PPiase_PO4_PO4 => PPiase_degraded + 2 PO4; re0000000414_k1*PPiase_PO4_PO4;
    re0000000414_k1 = 0 substance;
  re0000000415: PPiase_PO4 => PPiase_degraded + PO4; re0000000415_k1*PPiase_PO4;
    re0000000415_k1 = 0 substance;
  re0000000416: MTF => MTF_degraded; re0000000416_k1*MTF;
    re0000000416_k1 = 0 substance;
  re0000000417: fMettRNAfMetCAU => tRNAfMetCAU + fMet; re0000000417_k1*fMettRNAfMetCAU;
    re0000000417_k1 = 0 substance;
  re0000000418: MTF + FD => MTF_FD; re0000000418_k1*MTF*FD;
    re0000000418_k1 = 74.07407 substance;
  re0000000419: MTF_FD => MTF + FD; re0000000419_k1*MTF_FD;
    re0000000419_k1 = 1000 substance;
  re0000000420: MTF + MettRNAfMetCAU => MTF_MettRNAfMetCAU; re0000000420_k1*MTF*MettRNAfMetCAU;
    re0000000420_k1 = 2000 substance;
  re0000000421: MTF_MettRNAfMetCAU => MTF + MettRNAfMetCAU; re0000000421_k1*MTF_MettRNAfMetCAU;
    re0000000421_k1 = 1000 substance;
  re0000000422: MTF_FD + MettRNAfMetCAU => MTF_FD_MettRNAfMetCAU; re0000000422_k1*MTF_FD*MettRNAfMetCAU;
    re0000000422_k1 = 2000 substance;
  re0000000423: MTF_FD_MettRNAfMetCAU => MettRNAfMetCAU + MTF_FD; re0000000423_k1*MTF_FD_MettRNAfMetCAU;
    re0000000423_k1 = 1000 substance;
  re0000000424: MTF_MettRNAfMetCAU + FD => MTF_FD_MettRNAfMetCAU; re0000000424_k1*MTF_MettRNAfMetCAU*FD;
    re0000000424_k1 = 74.07407 substance;
  re0000000425: MTF_FD_MettRNAfMetCAU => MTF_MettRNAfMetCAU + FD; re0000000425_k1*MTF_FD_MettRNAfMetCAU;
    re0000000425_k1 = 1000 substance;
  re0000000426: MTF_FD_MettRNAfMetCAU => MTF_THF_fMettRNAfMetCAU; re0000000426_k1*MTF_FD_MettRNAfMetCAU;
    re0000000426_k1 = 37.3 substance;
  re0000000427: MTF_THF_fMettRNAfMetCAU => MTF_FD_MettRNAfMetCAU; re0000000427_k1*MTF_THF_fMettRNAfMetCAU;
    re0000000427_k1 = 0 substance;
  re0000000428: MTF_THF_fMettRNAfMetCAU => MTF_THF + fMettRNAfMetCAU; re0000000428_k1*MTF_THF_fMettRNAfMetCAU;
    re0000000428_k1 = 1000 substance;
  re0000000429: MTF_THF + fMettRNAfMetCAU => MTF_THF_fMettRNAfMetCAU; re0000000429_k1*MTF_THF*fMettRNAfMetCAU;
    re0000000429_k1 = 0 substance;
  re0000000430: MTF_THF_fMettRNAfMetCAU => MTF_fMettRNAfMetCAU + THF; re0000000430_k1*MTF_THF_fMettRNAfMetCAU;
    re0000000430_k1 = 1000 substance;
  re0000000431: MTF_fMettRNAfMetCAU + THF => MTF_THF_fMettRNAfMetCAU; re0000000431_k1*MTF_fMettRNAfMetCAU*THF;
    re0000000431_k1 = 0 substance;
  re0000000432: MTF_fMettRNAfMetCAU => MTF + fMettRNAfMetCAU; re0000000432_k1*MTF_fMettRNAfMetCAU;
    re0000000432_k1 = 1000 substance;
  re0000000433: MTF + fMettRNAfMetCAU => MTF_fMettRNAfMetCAU; re0000000433_k1*MTF*fMettRNAfMetCAU;
    re0000000433_k1 = 0 substance;
  re0000000434: MTF_THF => MTF + THF; re0000000434_k1*MTF_THF;
    re0000000434_k1 = 1000 substance;
  re0000000435: MTF + THF => MTF_THF; re0000000435_k1*MTF*THF;
    re0000000435_k1 = 0 substance;
  re0000000436: MTF_FD => MTF_degraded + FD; re0000000436_k1*MTF_FD;
    re0000000436_k1 = 0 substance;
  re0000000437: MTF_MettRNAfMetCAU => MTF_degraded + MettRNAfMetCAU; re0000000437_k1*MTF_MettRNAfMetCAU;
    re0000000437_k1 = 0 substance;
  re0000000438: MTF_FD_MettRNAfMetCAU => MTF_degraded + FD + MettRNAfMetCAU; re0000000438_k1*MTF_FD_MettRNAfMetCAU;
    re0000000438_k1 = 0 substance;
  re0000000439: MTF_THF_fMettRNAfMetCAU => MTF_degraded + THF + fMettRNAfMetCAU; re0000000439_k1*MTF_THF_fMettRNAfMetCAU;
    re0000000439_k1 = 0 substance;
  re0000000440: MTF_fMettRNAfMetCAU => MTF_degraded + fMettRNAfMetCAU; re0000000440_k1*MTF_fMettRNAfMetCAU;
    re0000000440_k1 = 0 substance;
  re0000000441: MTF_THF => MTF_degraded + THF; re0000000441_k1*MTF_THF;
    re0000000441_k1 = 0 substance;
  re0000000442: FD => THF; re0000000442_k1*FD;
    re0000000442_k1 = 0 substance;
  re0000000443: tRNAfMetCAU + fMet => fMettRNAfMetCAU; re0000000443_k1*tRNAfMetCAU*fMet;
    re0000000443_k1 = 0 substance;
  re0000000444: THF => FD; re0000000444_k1*THF;
    re0000000444_k1 = 0 substance;
  re0000000445: IF2 + GTP => IF2_GTP; re0000000445_k1*IF2*GTP;
    re0000000445_k1 = 10 substance;
  re0000000446: IF2_GTP => GTP + IF2; re0000000446_k1*IF2_GTP;
    re0000000446_k1 = 67 substance;
  re0000000447: IF2 + GDP => IF2_GDP; re0000000447_k1*IF2*GDP;
    re0000000447_k1 = 10 substance;
  re0000000448: IF2_GDP => IF2 + GDP; re0000000448_k1*IF2_GDP;
    re0000000448_k1 = 16 substance;
  re0000000449: IF2_GTP + fMettRNAfMetCAU => IF2_GTP_fMettRNAfMetCAU; re0000000449_k1*IF2_GTP*fMettRNAfMetCAU;
    re0000000449_k1 = 40 substance;
  re0000000450: IF2_GTP_fMettRNAfMetCAU => IF2_GTP + fMettRNAfMetCAU; re0000000450_k1*IF2_GTP_fMettRNAfMetCAU;
    re0000000450_k1 = 40 substance;
  re0000000451: IF2 => IF2_degraded; re0000000451_k1*IF2;
    re0000000451_k1 = 0 substance;
  re0000000452: IF2_GDP => IF2_degraded + GDP; re0000000452_k1*IF2_GDP;
    re0000000452_k1 = 0 substance;
  re0000000453: IF2_GTP => IF2_degraded + GTP; re0000000453_k1*IF2_GTP;
    re0000000453_k1 = 0 substance;
  re0000000454: IF2_GTP_fMettRNAfMetCAU => IF2_degraded + fMettRNAfMetCAU + GTP; re0000000454_k1*IF2_GTP_fMettRNAfMetCAU;
    re0000000454_k1 = 0 substance;
  re0000000455: RS70S => RS30S + RS50S; re0000000455_k1*RS70S;
    re0000000455_k1 = 0.012 substance;
  re0000000456: RS30S + RS50S => RS70S; re0000000456_k1*RS30S*RS50S;
    re0000000456_k1 = 12 substance;
  re0000000457: RS70S + IF3 => RS70S_IF3; re0000000457_k1*RS70S*IF3;
    re0000000457_k1 = 0.082 substance;
  re0000000458: RS70S_IF3 => RS70S + IF3; re0000000458_k1*RS70S_IF3;
    re0000000458_k1 = 0.26 substance;
  re0000000459: RS30S + IF3 => RS30S_IF3; re0000000459_k1*RS30S*IF3;
    re0000000459_k1 = 1160 substance;
  re0000000460: RS30S_IF3 => RS30S + IF3; re0000000460_k1*RS30S_IF3;
    re0000000460_k1 = 0.8 substance;
  re0000000461: RS70S_IF3 => RS30S_IF3 + RS50S; re0000000461_k1*RS70S_IF3;
    re0000000461_k1 = 0.0068 substance;
  re0000000462: RS30S_IF3 + RS50S => RS70S_IF3; re0000000462_k1*RS30S_IF3*RS50S;
    re0000000462_k1 = 0.18 substance;
  re0000000463: RS30S_IF3 + IF2_GTP => RS30S_IF3_IF2_GTP; re0000000463_k1*RS30S_IF3*IF2_GTP;
    re0000000463_k1 = 280 substance;
  re0000000464: RS30S_IF3_IF2_GTP => RS30S_IF3 + IF2_GTP; re0000000464_k1*RS30S_IF3_IF2_GTP;
    re0000000464_k1 = 12 substance;
  re0000000465: RS30S_IF3 + IF2_GTP_fMettRNAfMetCAU => RS30S_IF3_IF2_GTP_fMettRNAfMetCAU; re0000000465_k1*RS30S_IF3*IF2_GTP_fMettRNAfMetCAU;
    re0000000465_k1 = 280 substance;
  re0000000466: RS30S_IF3_IF2_GTP_fMettRNAfMetCAU => RS30S_IF3 + IF2_GTP_fMettRNAfMetCAU; re0000000466_k1*RS30S_IF3_IF2_GTP_fMettRNAfMetCAU;
    re0000000466_k1 = 1.5 substance;
  re0000000467: RS30S_IF3_IF2_GTP + fMettRNAfMetCAU => RS30S_IF3_IF2_GTP_fMettRNAfMetCAU; re0000000467_k1*RS30S_IF3_IF2_GTP*fMettRNAfMetCAU;
    re0000000467_k1 = 5 substance;
  re0000000468: RS30S_IF3_IF2_GTP_fMettRNAfMetCAU => RS30S_IF3_IF2_GTP + fMettRNAfMetCAU; re0000000468_k1*RS30S_IF3_IF2_GTP_fMettRNAfMetCAU;
    re0000000468_k1 = 1.5 substance;
  re0000000469: RS30S_IF3 + mRNA => RS30S_IF3_mRNA; re0000000469_k1*RS30S_IF3*mRNA;
    re0000000469_k1 = 36 substance;
  re0000000470: RS30S_IF3_mRNA => RS30S_IF3 + mRNA; re0000000470_k1*RS30S_IF3_mRNA;
    re0000000470_k1 = 0.7 substance;
  re0000000471: RS30S_IF3_mRNA + IF2_GTP => RS30S_IF3_IF2_GTP_mRNA; re0000000471_k1*RS30S_IF3_mRNA*IF2_GTP;
    re0000000471_k1 = 280 substance;
  re0000000472: RS30S_IF3_IF2_GTP_mRNA => RS30S_IF3_mRNA + IF2_GTP; re0000000472_k1*RS30S_IF3_IF2_GTP_mRNA;
    re0000000472_k1 = 12 substance;
  re0000000473: RS30S_IF3_mRNA + fMettRNAfMetCAU => RS30S_IF3_fMettRNAfMetCAU_mRNA; re0000000473_k1*RS30S_IF3_mRNA*fMettRNAfMetCAU;
    re0000000473_k1 = 5 substance;
  re0000000474: RS30S_IF3_fMettRNAfMetCAU_mRNA => RS30S_IF3_mRNA + fMettRNAfMetCAU; re0000000474_k1*RS30S_IF3_fMettRNAfMetCAU_mRNA;
    re0000000474_k1 = 1.5 substance;
  re0000000475: RS30S_IF3_mRNA + IF2_GTP_fMettRNAfMetCAU => RS30S_IF3_IF2_GTP_fMettRNAfMetCAU_mRNA; re0000000475_k1*RS30S_IF3_mRNA*IF2_GTP_fMettRNAfMetCAU;
    re0000000475_k1 = 280 substance;
  re0000000476: RS30S_IF3_IF2_GTP_fMettRNAfMetCAU_mRNA => RS30S_IF3_mRNA + IF2_GTP_fMettRNAfMetCAU; re0000000476_k1*RS30S_IF3_IF2_GTP_fMettRNAfMetCAU_mRNA;
    re0000000476_k1 = 1.5 substance;
  re0000000477: RS30S_IF3_fMettRNAfMetCAU_mRNA + IF2_GTP => RS30S_IF3_IF2_GTP_fMettRNAfMetCAU_mRNA; re0000000477_k1*RS30S_IF3_fMettRNAfMetCAU_mRNA*IF2_GTP;
    re0000000477_k1 = 280 substance;
  re0000000478: RS30S_IF3_IF2_GTP_fMettRNAfMetCAU_mRNA => RS30S_IF3_fMettRNAfMetCAU_mRNA + IF2_GTP; re0000000478_k1*RS30S_IF3_IF2_GTP_fMettRNAfMetCAU_mRNA;
    re0000000478_k1 = 12 substance;
  re0000000479: RS30S_IF3_IF2_GTP_mRNA + fMettRNAfMetCAU => RS30S_IF3_IF2_GTP_fMettRNAfMetCAU_mRNA; re0000000479_k1*RS30S_IF3_IF2_GTP_mRNA*fMettRNAfMetCAU;
    re0000000479_k1 = 5 substance;
  re0000000480: RS30S_IF3_IF2_GTP_fMettRNAfMetCAU_mRNA => RS30S_IF3_IF2_GTP_mRNA + fMettRNAfMetCAU; re0000000480_k1*RS30S_IF3_IF2_GTP_fMettRNAfMetCAU_mRNA;
    re0000000480_k1 = 1.5 substance;
  re0000000481: RS30S_IF3_IF2_GTP + mRNA => RS30S_IF3_IF2_GTP_mRNA; re0000000481_k1*RS30S_IF3_IF2_GTP*mRNA;
    re0000000481_k1 = 36 substance;
  re0000000482: RS30S_IF3_IF2_GTP_mRNA => RS30S_IF3_IF2_GTP + mRNA; re0000000482_k1*RS30S_IF3_IF2_GTP_mRNA;
    re0000000482_k1 = 0.7 substance;
  re0000000483: RS30S_IF3_IF2_GTP_fMettRNAfMetCAU + mRNA => RS30S_IF3_IF2_GTP_fMettRNAfMetCAU_mRNA; re0000000483_k1*RS30S_IF3_IF2_GTP_fMettRNAfMetCAU*mRNA;
    re0000000483_k1 = 36 substance;
  re0000000484: RS30S_IF3_IF2_GTP_fMettRNAfMetCAU_mRNA => RS30S_IF3_IF2_GTP_fMettRNAfMetCAU + mRNA; re0000000484_k1*RS30S_IF3_IF2_GTP_fMettRNAfMetCAU_mRNA;
    re0000000484_k1 = 0.7 substance;
  re0000000485: RS30S_IF3_IF2_GTP_fMettRNAfMetCAU_mRNA + RS50S => RS70S_IF3_IF2_GTP_fMettRNAfMetCAU_mRNA; re0000000485_k1*RS30S_IF3_IF2_GTP_fMettRNAfMetCAU_mRNA*RS50S;
    re0000000485_k1 = 34 substance;
  re0000000486: RS70S_IF3_IF2_GTP_fMettRNAfMetCAU_mRNA => RS30S_IF3_IF2_GTP_fMettRNAfMetCAU_mRNA + RS50S; re0000000486_k1*RS70S_IF3_IF2_GTP_fMettRNAfMetCAU_mRNA;
    re0000000486_k1 = 35 substance;
  re0000000487: RS70S_IF1 => RS30S_IF1 + RS50S; re0000000487_k1*RS70S_IF1;
    re0000000487_k1 = 0.012 substance;
  re0000000488: RS30S_IF1 + RS50S => RS70S_IF1; re0000000488_k1*RS30S_IF1*RS50S;
    re0000000488_k1 = 12 substance;
  re0000000489: RS70S_IF1 + IF3 => RS70S_IF1_IF3; re0000000489_k1*RS70S_IF1*IF3;
    re0000000489_k1 = 0.082 substance;
  re0000000490: RS70S_IF1_IF3 => RS70S_IF1 + IF3; re0000000490_k1*RS70S_IF1_IF3;
    re0000000490_k1 = 0.26 substance;
  re0000000491: RS30S_IF1 + IF3 => RS30S_IF1_IF3; re0000000491_k1*RS30S_IF1*IF3;
    re0000000491_k1 = 1100 substance;
  re0000000492: RS30S_IF1_IF3 => RS30S_IF1 + IF3; re0000000492_k1*RS30S_IF1_IF3;
    re0000000492_k1 = 0.08 substance;
  re0000000493: RS70S_IF1_IF3 => RS30S_IF1_IF3 + RS50S; re0000000493_k1*RS70S_IF1_IF3;
    re0000000493_k1 = 0.0068 substance;
  re0000000494: RS30S_IF1_IF3 + RS50S => RS70S_IF1_IF3; re0000000494_k1*RS30S_IF1_IF3*RS50S;
    re0000000494_k1 = 0.18 substance;
  re0000000495: RS30S_IF1_IF3 + IF2_GTP => RS30S_IF1_IF3_IF2_GTP; re0000000495_k1*RS30S_IF1_IF3*IF2_GTP;
    re0000000495_k1 = 220 substance;
  re0000000496: RS30S_IF1_IF3_IF2_GTP => RS30S_IF1_IF3 + IF2_GTP; re0000000496_k1*RS30S_IF1_IF3_IF2_GTP;
    re0000000496_k1 = 1 substance;
  re0000000497: RS30S_IF1_IF3 + IF2_GTP_fMettRNAfMetCAU => RS30S_IF1_IF3_IF2_GTP_fMettRNAfMetCAU; re0000000497_k1*RS30S_IF1_IF3*IF2_GTP_fMettRNAfMetCAU;
    re0000000497_k1 = 220 substance;
  re0000000498: RS30S_IF1_IF3_IF2_GTP_fMettRNAfMetCAU => RS30S_IF1_IF3 + IF2_GTP_fMettRNAfMetCAU; re0000000498_k1*RS30S_IF1_IF3_IF2_GTP_fMettRNAfMetCAU;
    re0000000498_k1 = 1 substance;
  re0000000499: RS30S_IF1_IF3_IF2_GTP + fMettRNAfMetCAU => RS30S_IF1_IF3_IF2_GTP_fMettRNAfMetCAU; re0000000499_k1*RS30S_IF1_IF3_IF2_GTP*fMettRNAfMetCAU;
    re0000000499_k1 = 5 substance;
  re0000000500: RS30S_IF1_IF3_IF2_GTP_fMettRNAfMetCAU => RS30S_IF1_IF3_IF2_GTP + fMettRNAfMetCAU; re0000000500_k1*RS30S_IF1_IF3_IF2_GTP_fMettRNAfMetCAU;
    re0000000500_k1 = 1.5 substance;
  re0000000501: RS70S + IF1 => RS70S_IF1; re0000000501_k1*RS70S*IF1;
    re0000000501_k1 = 20 substance;
  re0000000502: RS70S_IF1 => RS70S + IF1; re0000000502_k1*RS70S_IF1;
    re0000000502_k1 = 0.7 substance;
  re0000000503: RS30S + IF1 => RS30S_IF1; re0000000503_k1*RS30S*IF1;
    re0000000503_k1 = 20 substance;
  re0000000504: RS30S_IF1 => RS30S + IF1; re0000000504_k1*RS30S_IF1;
    re0000000504_k1 = 0.7 substance;
  re0000000505: RS70S_IF3 + IF1 => RS70S_IF1_IF3; re0000000505_k1*RS70S_IF3*IF1;
    re0000000505_k1 = 20 substance;
  re0000000506: RS70S_IF1_IF3 => RS70S_IF3 + IF1; re0000000506_k1*RS70S_IF1_IF3;
    re0000000506_k1 = 0.7 substance;
  re0000000507: RS30S_IF3 + IF1 => RS30S_IF1_IF3; re0000000507_k1*RS30S_IF3*IF1;
    re0000000507_k1 = 20 substance;
  re0000000508: RS30S_IF1_IF3 => RS30S_IF3 + IF1; re0000000508_k1*RS30S_IF1_IF3;
    re0000000508_k1 = 0.7 substance;
  re0000000509: RS30S_IF3_IF2_GTP + IF1 => RS30S_IF1_IF3_IF2_GTP; re0000000509_k1*RS30S_IF3_IF2_GTP*IF1;
    re0000000509_k1 = 12 substance;
  re0000000510: RS30S_IF1_IF3_IF2_GTP => RS30S_IF3_IF2_GTP + IF1; re0000000510_k1*RS30S_IF1_IF3_IF2_GTP;
    re0000000510_k1 = 0.02 substance;
  re0000000511: RS30S_IF3_IF2_GTP_fMettRNAfMetCAU + IF1 => RS30S_IF1_IF3_IF2_GTP_fMettRNAfMetCAU; re0000000511_k1*RS30S_IF3_IF2_GTP_fMettRNAfMetCAU*IF1;
    re0000000511_k1 = 12 substance;
  re0000000512: RS30S_IF1_IF3_IF2_GTP_fMettRNAfMetCAU => RS30S_IF3_IF2_GTP_fMettRNAfMetCAU + IF1; re0000000512_k1*RS30S_IF1_IF3_IF2_GTP_fMettRNAfMetCAU;
    re0000000512_k1 = 0.02 substance;
  re0000000513: RS30S_IF1_IF3 + mRNA => RS30S_IF1_IF3_mRNA; re0000000513_k1*RS30S_IF1_IF3*mRNA;
    re0000000513_k1 = 36 substance;
  re0000000514: RS30S_IF1_IF3_mRNA => RS30S_IF1_IF3 + mRNA; re0000000514_k1*RS30S_IF1_IF3_mRNA;
    re0000000514_k1 = 0.7 substance;
  re0000000515: RS30S_IF1_IF3_mRNA + IF2_GTP => RS30S_IF1_IF3_IF2_GTP_mRNA; re0000000515_k1*RS30S_IF1_IF3_mRNA*IF2_GTP;
    re0000000515_k1 = 220 substance;
  re0000000516: RS30S_IF1_IF3_IF2_GTP_mRNA => RS30S_IF1_IF3_mRNA + IF2_GTP; re0000000516_k1*RS30S_IF1_IF3_IF2_GTP_mRNA;
    re0000000516_k1 = 1 substance;
  re0000000517: RS30S_IF1_IF3_mRNA + fMettRNAfMetCAU => RS30S_IF1_IF3_fMettRNAfMetCAU_mRNA; re0000000517_k1*RS30S_IF1_IF3_mRNA*fMettRNAfMetCAU;
    re0000000517_k1 = 5 substance;
  re0000000518: RS30S_IF1_IF3_fMettRNAfMetCAU_mRNA => RS30S_IF1_IF3_mRNA + fMettRNAfMetCAU; re0000000518_k1*RS30S_IF1_IF3_fMettRNAfMetCAU_mRNA;
    re0000000518_k1 = 1.5 substance;
  re0000000519: RS30S_IF1_IF3_mRNA + IF2_GTP_fMettRNAfMetCAU => RS30S_IF1_IF3_IF2_GTP_fMettRNAfMetCAU_mRNA; re0000000519_k1*RS30S_IF1_IF3_mRNA*IF2_GTP_fMettRNAfMetCAU;
    re0000000519_k1 = 220 substance;
  re0000000520: RS30S_IF1_IF3_IF2_GTP_fMettRNAfMetCAU_mRNA => RS30S_IF1_IF3_mRNA + IF2_GTP_fMettRNAfMetCAU; re0000000520_k1*RS30S_IF1_IF3_IF2_GTP_fMettRNAfMetCAU_mRNA;
    re0000000520_k1 = 1 substance;
  re0000000521: RS30S_IF1_IF3_fMettRNAfMetCAU_mRNA + IF2_GTP => RS30S_IF1_IF3_IF2_GTP_fMettRNAfMetCAU_mRNA; re0000000521_k1*RS30S_IF1_IF3_fMettRNAfMetCAU_mRNA*IF2_GTP;
    re0000000521_k1 = 320 substance;
  re0000000522: RS30S_IF1_IF3_IF2_GTP_fMettRNAfMetCAU_mRNA => RS30S_IF1_IF3_fMettRNAfMetCAU_mRNA + IF2_GTP; re0000000522_k1*RS30S_IF1_IF3_IF2_GTP_fMettRNAfMetCAU_mRNA;
    re0000000522_k1 = 0.015 substance;
  re0000000523: RS30S_IF1_IF3_IF2_GTP_mRNA + fMettRNAfMetCAU => RS30S_IF1_IF3_IF2_GTP_fMettRNAfMetCAU_mRNA; re0000000523_k1*RS30S_IF1_IF3_IF2_GTP_mRNA*fMettRNAfMetCAU;
    re0000000523_k1 = 5 substance;
  re0000000524: RS30S_IF1_IF3_IF2_GTP_fMettRNAfMetCAU_mRNA => RS30S_IF1_IF3_IF2_GTP_mRNA + fMettRNAfMetCAU; re0000000524_k1*RS30S_IF1_IF3_IF2_GTP_fMettRNAfMetCAU_mRNA;
    re0000000524_k1 = 1.5 substance;
  re0000000525: RS30S_IF1_IF3_IF2_GTP + mRNA => RS30S_IF1_IF3_IF2_GTP_mRNA; re0000000525_k1*RS30S_IF1_IF3_IF2_GTP*mRNA;
    re0000000525_k1 = 36 substance;
  re0000000526: RS30S_IF1_IF3_IF2_GTP_mRNA => RS30S_IF1_IF3_IF2_GTP + mRNA; re0000000526_k1*RS30S_IF1_IF3_IF2_GTP_mRNA;
    re0000000526_k1 = 0.7 substance;
  re0000000527: RS30S_IF1_IF3_IF2_GTP_fMettRNAfMetCAU + mRNA => RS30S_IF1_IF3_IF2_GTP_fMettRNAfMetCAU_mRNA; re0000000527_k1*RS30S_IF1_IF3_IF2_GTP_fMettRNAfMetCAU*mRNA;
    re0000000527_k1 = 36 substance;
  re0000000528: RS30S_IF1_IF3_IF2_GTP_fMettRNAfMetCAU_mRNA => RS30S_IF1_IF3_IF2_GTP_fMettRNAfMetCAU + mRNA; re0000000528_k1*RS30S_IF1_IF3_IF2_GTP_fMettRNAfMetCAU_mRNA;
    re0000000528_k1 = 0.006 substance;
  re0000000529: RS30S_IF1_IF3_IF2_GTP_fMettRNAfMetCAU_mRNA + RS50S => RS70S_IF1_IF3_IF2_GTP_fMettRNAfMetCAU_mRNA; re0000000529_k1*RS30S_IF1_IF3_IF2_GTP_fMettRNAfMetCAU_mRNA*RS50S;
    re0000000529_k1 = 34 substance;
  re0000000530: RS70S_IF1_IF3_IF2_GTP_fMettRNAfMetCAU_mRNA => RS30S_IF1_IF3_IF2_GTP_fMettRNAfMetCAU_mRNA + RS50S; re0000000530_k1*RS70S_IF1_IF3_IF2_GTP_fMettRNAfMetCAU_mRNA;
    re0000000530_k1 = 35 substance;
  re0000000531: RS30S_IF3_mRNA + IF1 => RS30S_IF1_IF3_mRNA; re0000000531_k1*RS30S_IF3_mRNA*IF1;
    re0000000531_k1 = 20 substance;
  re0000000532: RS30S_IF1_IF3_mRNA => RS30S_IF3_mRNA + IF1; re0000000532_k1*RS30S_IF1_IF3_mRNA;
    re0000000532_k1 = 0.7 substance;
  re0000000533: RS30S_IF3_fMettRNAfMetCAU_mRNA + IF1 => RS30S_IF1_IF3_fMettRNAfMetCAU_mRNA; re0000000533_k1*RS30S_IF3_fMettRNAfMetCAU_mRNA*IF1;
    re0000000533_k1 = 20 substance;
  re0000000534: RS30S_IF1_IF3_fMettRNAfMetCAU_mRNA => RS30S_IF3_fMettRNAfMetCAU_mRNA + IF1; re0000000534_k1*RS30S_IF1_IF3_fMettRNAfMetCAU_mRNA;
    re0000000534_k1 = 0.7 substance;
  re0000000535: RS30S_IF3_IF2_GTP_mRNA + IF1 => RS30S_IF1_IF3_IF2_GTP_mRNA; re0000000535_k1*RS30S_IF3_IF2_GTP_mRNA*IF1;
    re0000000535_k1 = 12 substance;
  re0000000536: RS30S_IF1_IF3_IF2_GTP_mRNA => RS30S_IF3_IF2_GTP_mRNA + IF1; re0000000536_k1*RS30S_IF1_IF3_IF2_GTP_mRNA;
    re0000000536_k1 = 0.02 substance;
  re0000000537: RS30S_IF3_IF2_GTP_fMettRNAfMetCAU_mRNA + IF1 => RS30S_IF1_IF3_IF2_GTP_fMettRNAfMetCAU_mRNA; re0000000537_k1*RS30S_IF3_IF2_GTP_fMettRNAfMetCAU_mRNA*IF1;
    re0000000537_k1 = 16 substance;
  re0000000538: RS30S_IF1_IF3_IF2_GTP_fMettRNAfMetCAU_mRNA => RS30S_IF3_IF2_GTP_fMettRNAfMetCAU_mRNA + IF1; re0000000538_k1*RS30S_IF1_IF3_IF2_GTP_fMettRNAfMetCAU_mRNA;
    re0000000538_k1 = 0.0025 substance;
  re0000000539: RS70S_IF3_IF2_GTP_fMettRNAfMetCAU_mRNA + IF1 => RS70S_IF1_IF3_IF2_GTP_fMettRNAfMetCAU_mRNA; re0000000539_k1*RS70S_IF3_IF2_GTP_fMettRNAfMetCAU_mRNA*IF1;
    re0000000539_k1 = 16 substance;
  re0000000540: RS70S_IF1_IF3_IF2_GTP_fMettRNAfMetCAU_mRNA => RS70S_IF3_IF2_GTP_fMettRNAfMetCAU_mRNA + IF1; re0000000540_k1*RS70S_IF1_IF3_IF2_GTP_fMettRNAfMetCAU_mRNA;
    re0000000540_k1 = 0.0025 substance;
  re0000000541: IF1 => IF1_degraded; re0000000541_k1*IF1;
    re0000000541_k1 = 0 substance;
  re0000000542: IF3 => IF3_degraded; re0000000542_k1*IF3;
    re0000000542_k1 = 0 substance;
  re0000000543: RS70S => RS30S_degraded + RS50S; re0000000543_k1*RS70S;
    re0000000543_k1 = 0 substance;
  re0000000544: RS70S => RS50S_degraded + RS30S; re0000000544_k1*RS70S;
    re0000000544_k1 = 0 substance;
  re0000000545: RS30S_IF1 => IF1_degraded + RS30S; re0000000545_k1*RS30S_IF1;
    re0000000545_k1 = 0 substance;
  re0000000546: RS30S_IF1 => RS30S_degraded + IF1; re0000000546_k1*RS30S_IF1;
    re0000000546_k1 = 0 substance;
  re0000000547: RS30S_IF3 => IF3_degraded + RS30S; re0000000547_k1*RS30S_IF3;
    re0000000547_k1 = 0 substance;
  re0000000548: RS30S_IF3 => RS30S_degraded + IF3; re0000000548_k1*RS30S_IF3;
    re0000000548_k1 = 0 substance;
  re0000000549: RS30S_IF3_mRNA => IF3_degraded + mRNA + RS30S; re0000000549_k1*RS30S_IF3_mRNA;
    re0000000549_k1 = 0 substance;
  re0000000550: RS30S_IF3_mRNA => RS30S_degraded + mRNA + IF3; re0000000550_k1*RS30S_IF3_mRNA;
    re0000000550_k1 = 0 substance;
  re0000000551: RS30S_IF3_fMettRNAfMetCAU_mRNA => IF3_degraded + mRNA + fMettRNAfMetCAU + RS30S; re0000000551_k1*RS30S_IF3_fMettRNAfMetCAU_mRNA;
    re0000000551_k1 = 0 substance;
  re0000000552: RS30S_IF3_fMettRNAfMetCAU_mRNA => RS30S_degraded + mRNA + IF3 + fMettRNAfMetCAU; re0000000552_k1*RS30S_IF3_fMettRNAfMetCAU_mRNA;
    re0000000552_k1 = 0 substance;
  re0000000553: RS70S_IF3 => RS30S_degraded + RS50S + IF3; re0000000553_k1*RS70S_IF3;
    re0000000553_k1 = 0 substance;
  re0000000554: RS70S_IF3 => RS50S_degraded + RS30S + IF3; re0000000554_k1*RS70S_IF3;
    re0000000554_k1 = 0 substance;
  re0000000555: RS70S_IF3 => IF3_degraded + RS50S + RS30S; re0000000555_k1*RS70S_IF3;
    re0000000555_k1 = 0 substance;
  re0000000556: RS70S_IF1 => RS30S_degraded + RS50S + IF1; re0000000556_k1*RS70S_IF1;
    re0000000556_k1 = 0 substance;
  re0000000557: RS70S_IF1 => RS50S_degraded + RS30S + IF1; re0000000557_k1*RS70S_IF1;
    re0000000557_k1 = 0 substance;
  re0000000558: RS70S_IF1 => IF1_degraded + RS50S + RS30S; re0000000558_k1*RS70S_IF1;
    re0000000558_k1 = 0 substance;
  re0000000559: RS30S_IF1_IF3 => IF3_degraded + RS30S + IF1; re0000000559_k1*RS30S_IF1_IF3;
    re0000000559_k1 = 0 substance;
  re0000000560: RS30S_IF1_IF3 => RS30S_degraded + IF3 + IF1; re0000000560_k1*RS30S_IF1_IF3;
    re0000000560_k1 = 0 substance;
  re0000000561: RS30S_IF1_IF3 => IF1_degraded + RS30S + IF3; re0000000561_k1*RS30S_IF1_IF3;
    re0000000561_k1 = 0 substance;
  re0000000562: RS30S_IF3_IF2_GTP => RS30S_degraded + GTP + IF2 + IF3; re0000000562_k1*RS30S_IF3_IF2_GTP;
    re0000000562_k1 = 0 substance;
  re0000000563: RS30S_IF3_IF2_GTP => IF2_degraded + RS30S + GTP + IF3; re0000000563_k1*RS30S_IF3_IF2_GTP;
    re0000000563_k1 = 0 substance;
  re0000000564: RS30S_IF3_IF2_GTP => IF3_degraded + GTP + IF2 + RS30S; re0000000564_k1*RS30S_IF3_IF2_GTP;
    re0000000564_k1 = 0 substance;
  re0000000565: RS30S_IF3_IF2_GTP_fMettRNAfMetCAU => RS30S_degraded + fMettRNAfMetCAU + GTP + IF3 + IF2; re0000000565_k1*RS30S_IF3_IF2_GTP_fMettRNAfMetCAU;
    re0000000565_k1 = 0 substance;
  re0000000566: RS30S_IF3_IF2_GTP_fMettRNAfMetCAU => IF2_degraded + GTP + fMettRNAfMetCAU + RS30S + IF3; re0000000566_k1*RS30S_IF3_IF2_GTP_fMettRNAfMetCAU;
    re0000000566_k1 = 0 substance;
  re0000000567: RS30S_IF3_IF2_GTP_fMettRNAfMetCAU => IF3_degraded + GTP + fMettRNAfMetCAU + IF2 + RS30S; re0000000567_k1*RS30S_IF3_IF2_GTP_fMettRNAfMetCAU;
    re0000000567_k1 = 0 substance;
  re0000000568: RS30S_IF1_IF3_mRNA => IF3_degraded + mRNA + IF1 + RS30S; re0000000568_k1*RS30S_IF1_IF3_mRNA;
    re0000000568_k1 = 0 substance;
  re0000000569: RS30S_IF1_IF3_mRNA => RS30S_degraded + mRNA + IF3 + IF1; re0000000569_k1*RS30S_IF1_IF3_mRNA;
    re0000000569_k1 = 0 substance;
  re0000000570: RS30S_IF1_IF3_mRNA => IF1_degraded + mRNA + RS30S + IF3; re0000000570_k1*RS30S_IF1_IF3_mRNA;
    re0000000570_k1 = 0 substance;
  re0000000571: RS30S_IF3_IF2_GTP_mRNA => RS30S_degraded + mRNA + GTP + IF3 + IF2; re0000000571_k1*RS30S_IF3_IF2_GTP_mRNA;
    re0000000571_k1 = 0 substance;
  re0000000572: RS30S_IF3_IF2_GTP_mRNA => IF3_degraded + GTP + mRNA + IF2 + RS30S; re0000000572_k1*RS30S_IF3_IF2_GTP_mRNA;
    re0000000572_k1 = 0 substance;
  re0000000573: RS30S_IF3_IF2_GTP_mRNA => IF2_degraded + mRNA + GTP + RS30S + IF3; re0000000573_k1*RS30S_IF3_IF2_GTP_mRNA;
    re0000000573_k1 = 0 substance;
  re0000000574: RS30S_IF1_IF3_fMettRNAfMetCAU_mRNA => IF3_degraded + mRNA + fMettRNAfMetCAU + RS30S + IF1; re0000000574_k1*RS30S_IF1_IF3_fMettRNAfMetCAU_mRNA;
    re0000000574_k1 = 0 substance;
  re0000000575: RS30S_IF1_IF3_fMettRNAfMetCAU_mRNA => RS30S_degraded + mRNA + fMettRNAfMetCAU + IF3 + IF1; re0000000575_k1*RS30S_IF1_IF3_fMettRNAfMetCAU_mRNA;
    re0000000575_k1 = 0 substance;
  re0000000576: RS30S_IF1_IF3_fMettRNAfMetCAU_mRNA => IF1_degraded + fMettRNAfMetCAU + RS30S + mRNA + IF3; re0000000576_k1*RS30S_IF1_IF3_fMettRNAfMetCAU_mRNA;
    re0000000576_k1 = 0 substance;
  re0000000577: RS30S_IF3_IF2_GTP_fMettRNAfMetCAU_mRNA => RS30S_degraded + mRNA + fMettRNAfMetCAU + IF3 + IF2 + GTP; re0000000577_k1*RS30S_IF3_IF2_GTP_fMettRNAfMetCAU_mRNA;
    re0000000577_k1 = 0 substance;
  re0000000578: RS30S_IF3_IF2_GTP_fMettRNAfMetCAU_mRNA => IF2_degraded + mRNA + fMettRNAfMetCAU + GTP + RS30S + IF3; re0000000578_k1*RS30S_IF3_IF2_GTP_fMettRNAfMetCAU_mRNA;
    re0000000578_k1 = 0 substance;
  re0000000579: RS30S_IF3_IF2_GTP_fMettRNAfMetCAU_mRNA => IF3_degraded + GTP + IF2 + fMettRNAfMetCAU + mRNA + RS30S; re0000000579_k1*RS30S_IF3_IF2_GTP_fMettRNAfMetCAU_mRNA;
    re0000000579_k1 = 0 substance;
  re0000000580: RS70S_IF1_IF3 => IF3_degraded + RS50S + RS30S + IF1; re0000000580_k1*RS70S_IF1_IF3;
    re0000000580_k1 = 0 substance;
  re0000000581: RS70S_IF1_IF3 => RS50S_degraded + RS30S + IF3 + IF1; re0000000581_k1*RS70S_IF1_IF3;
    re0000000581_k1 = 0 substance;
  re0000000582: RS70S_IF1_IF3 => IF1_degraded + RS50S + RS30S + IF3; re0000000582_k1*RS70S_IF1_IF3;
    re0000000582_k1 = 0 substance;
  re0000000583: RS70S_IF1_IF3 => RS30S_degraded + RS50S + IF3 + IF1; re0000000583_k1*RS70S_IF1_IF3;
    re0000000583_k1 = 0 substance;
  re0000000584: RS30S_IF1_IF3_IF2_GTP => IF3_degraded + GTP + IF2 + RS30S + IF1; re0000000584_k1*RS30S_IF1_IF3_IF2_GTP;
    re0000000584_k1 = 0 substance;
  re0000000585: RS30S_IF1_IF3_IF2_GTP => IF2_degraded + RS30S + GTP + IF3 + IF1; re0000000585_k1*RS30S_IF1_IF3_IF2_GTP;
    re0000000585_k1 = 0 substance;
  re0000000586: RS30S_IF1_IF3_IF2_GTP => IF1_degraded + GTP + IF2 + IF3 + RS30S; re0000000586_k1*RS30S_IF1_IF3_IF2_GTP;
    re0000000586_k1 = 0 substance;
  re0000000587: RS30S_IF1_IF3_IF2_GTP => RS30S_degraded + GTP + IF2 + IF3 + IF1; re0000000587_k1*RS30S_IF1_IF3_IF2_GTP;
    re0000000587_k1 = 0 substance;
  re0000000588: RS30S_IF1_IF3_IF2_GTP_fMettRNAfMetCAU => IF3_degraded + GTP + fMettRNAfMetCAU + IF2 + IF1 + RS30S; re0000000588_k1*RS30S_IF1_IF3_IF2_GTP_fMettRNAfMetCAU;
    re0000000588_k1 = 0 substance;
  re0000000589: RS30S_IF1_IF3_IF2_GTP_fMettRNAfMetCAU => IF2_degraded + RS30S + fMettRNAfMetCAU + GTP + IF3 + IF1; re0000000589_k1*RS30S_IF1_IF3_IF2_GTP_fMettRNAfMetCAU;
    re0000000589_k1 = 0 substance;
  re0000000590: RS30S_IF1_IF3_IF2_GTP_fMettRNAfMetCAU => IF1_degraded + GTP + IF2 + RS30S + IF3 + fMettRNAfMetCAU; re0000000590_k1*RS30S_IF1_IF3_IF2_GTP_fMettRNAfMetCAU;
    re0000000590_k1 = 0 substance;
  re0000000591: RS30S_IF1_IF3_IF2_GTP_fMettRNAfMetCAU => RS30S_degraded + GTP + fMettRNAfMetCAU + IF2 + IF3 + IF1; re0000000591_k1*RS30S_IF1_IF3_IF2_GTP_fMettRNAfMetCAU;
    re0000000591_k1 = 0 substance;
  re0000000592: RS30S_IF1_IF3_IF2_GTP_mRNA => IF3_degraded + mRNA + IF2 + GTP + IF1 + RS30S; re0000000592_k1*RS30S_IF1_IF3_IF2_GTP_mRNA;
    re0000000592_k1 = 0 substance;
  re0000000593: RS30S_IF1_IF3_IF2_GTP_mRNA => RS30S_degraded + IF3 + mRNA + GTP + IF2 + IF1; re0000000593_k1*RS30S_IF1_IF3_IF2_GTP_mRNA;
    re0000000593_k1 = 0 substance;
  re0000000594: RS30S_IF1_IF3_IF2_GTP_mRNA => IF2_degraded + RS30S + mRNA + GTP + IF3 + IF1; re0000000594_k1*RS30S_IF1_IF3_IF2_GTP_mRNA;
    re0000000594_k1 = 0 substance;
  re0000000595: RS30S_IF1_IF3_IF2_GTP_mRNA => IF1_degraded + mRNA + IF2 + GTP + RS30S + IF3; re0000000595_k1*RS30S_IF1_IF3_IF2_GTP_mRNA;
    re0000000595_k1 = 0 substance;
  re0000000596: RS30S_IF1_IF3_IF2_GTP_fMettRNAfMetCAU_mRNA => IF3_degraded + mRNA + fMettRNAfMetCAU + IF2 + GTP + IF1 + RS30S; re0000000596_k1*RS30S_IF1_IF3_IF2_GTP_fMettRNAfMetCAU_mRNA;
    re0000000596_k1 = 0 substance;
  re0000000597: RS30S_IF1_IF3_IF2_GTP_fMettRNAfMetCAU_mRNA => RS30S_degraded + mRNA + GTP + fMettRNAfMetCAU + IF2 + IF3 + IF1; re0000000597_k1*RS30S_IF1_IF3_IF2_GTP_fMettRNAfMetCAU_mRNA;
    re0000000597_k1 = 0 substance;
  re0000000598: RS30S_IF1_IF3_IF2_GTP_fMettRNAfMetCAU_mRNA => IF2_degraded + RS30S + mRNA + fMettRNAfMetCAU + GTP + IF3 + IF1; re0000000598_k1*RS30S_IF1_IF3_IF2_GTP_fMettRNAfMetCAU_mRNA;
    re0000000598_k1 = 0 substance;
  re0000000599: RS30S_IF1_IF3_IF2_GTP_fMettRNAfMetCAU_mRNA => IF1_degraded + fMettRNAfMetCAU + GTP + mRNA + IF2 + RS30S + IF3; re0000000599_k1*RS30S_IF1_IF3_IF2_GTP_fMettRNAfMetCAU_mRNA;
    re0000000599_k1 = 0 substance;
  re0000000600: RS70S_IF3_IF2_GTP_fMettRNAfMetCAU_mRNA => IF2_degraded + mRNA + GTP + fMettRNAfMetCAU + RS50S + RS30S + IF3; re0000000600_k1*RS70S_IF3_IF2_GTP_fMettRNAfMetCAU_mRNA;
    re0000000600_k1 = 0 substance;
  re0000000601: RS70S_IF3_IF2_GTP_fMettRNAfMetCAU_mRNA => RS50S_degraded + IF2 + mRNA + fMettRNAfMetCAU + GTP + RS30S + IF3; re0000000601_k1*RS70S_IF3_IF2_GTP_fMettRNAfMetCAU_mRNA;
    re0000000601_k1 = 0 substance;
  re0000000602: RS70S_IF3_IF2_GTP_fMettRNAfMetCAU_mRNA => IF3_degraded + GTP + fMettRNAfMetCAU + mRNA + RS30S + RS50S + IF2; re0000000602_k1*RS70S_IF3_IF2_GTP_fMettRNAfMetCAU_mRNA;
    re0000000602_k1 = 0 substance;
  re0000000603: RS70S_IF3_IF2_GTP_fMettRNAfMetCAU_mRNA => RS30S_degraded + RS50S + mRNA + fMettRNAfMetCAU + IF2 + IF3 + GTP; re0000000603_k1*RS70S_IF3_IF2_GTP_fMettRNAfMetCAU_mRNA;
    re0000000603_k1 = 0 substance;
  re0000000604: RS70S_IF1_IF3_IF2_GTP_fMettRNAfMetCAU_mRNA => RS30S_degraded + RS50S + GTP + mRNA + fMettRNAfMetCAU + IF2 + IF3 + IF1; re0000000604_k1*RS70S_IF1_IF3_IF2_GTP_fMettRNAfMetCAU_mRNA;
    re0000000604_k1 = 0 substance;
  re0000000605: RS70S_IF1_IF3_IF2_GTP_fMettRNAfMetCAU_mRNA => IF2_degraded + mRNA + GTP + fMettRNAfMetCAU + RS50S + RS30S + IF3 + IF1; re0000000605_k1*RS70S_IF1_IF3_IF2_GTP_fMettRNAfMetCAU_mRNA;
    re0000000605_k1 = 0 substance;
  re0000000606: RS70S_IF1_IF3_IF2_GTP_fMettRNAfMetCAU_mRNA => RS50S_degraded + mRNA + IF2 + GTP + fMettRNAfMetCAU + RS30S + IF3 + IF1; re0000000606_k1*RS70S_IF1_IF3_IF2_GTP_fMettRNAfMetCAU_mRNA;
    re0000000606_k1 = 0 substance;
  re0000000607: RS70S_IF1_IF3_IF2_GTP_fMettRNAfMetCAU_mRNA => IF1_degraded + mRNA + GTP + fMettRNAfMetCAU + IF2 + RS30S + IF3 + RS50S; re0000000607_k1*RS70S_IF1_IF3_IF2_GTP_fMettRNAfMetCAU_mRNA;
    re0000000607_k1 = 0 substance;
  re0000000608: RS70S_IF1_IF3_IF2_GTP_fMettRNAfMetCAU_mRNA => IF3_degraded + RS50S + RS30S + IF1 + mRNA + IF2 + fMettRNAfMetCAU + GTP; re0000000608_k1*RS70S_IF1_IF3_IF2_GTP_fMettRNAfMetCAU_mRNA;
    re0000000608_k1 = 0 substance;
  re0000000609: RS30S + IF2_GTP => RS30S_IF2_GTP; re0000000609_k1*RS30S*IF2_GTP;
    re0000000609_k1 = 280 substance;
  re0000000610: RS30S_IF2_GTP => IF2_GTP + RS30S; re0000000610_k1*RS30S_IF2_GTP;
    re0000000610_k1 = 12 substance;
  re0000000611: RS30S + IF2_GTP_fMettRNAfMetCAU => RS30S_IF2_GTP_fMettRNAfMetCAU; re0000000611_k1*RS30S*IF2_GTP_fMettRNAfMetCAU;
    re0000000611_k1 = 280 substance;
  re0000000612: RS30S_IF2_GTP_fMettRNAfMetCAU => IF2_GTP_fMettRNAfMetCAU + RS30S; re0000000612_k1*RS30S_IF2_GTP_fMettRNAfMetCAU;
    re0000000612_k1 = 1.5 substance;
  re0000000613: RS30S_IF2_GTP + fMettRNAfMetCAU => RS30S_IF2_GTP_fMettRNAfMetCAU; re0000000613_k1*RS30S_IF2_GTP*fMettRNAfMetCAU;
    re0000000613_k1 = 5 substance;
  re0000000614: RS30S_IF2_GTP_fMettRNAfMetCAU => fMettRNAfMetCAU + RS30S_IF2_GTP; re0000000614_k1*RS30S_IF2_GTP_fMettRNAfMetCAU;
    re0000000614_k1 = 1.5 substance;
  re0000000615: RS30S_IF2_GTP + IF3 => RS30S_IF3_IF2_GTP; re0000000615_k1*RS30S_IF2_GTP*IF3;
    re0000000615_k1 = 1160 substance;
  re0000000616: RS30S_IF3_IF2_GTP => IF3 + RS30S_IF2_GTP; re0000000616_k1*RS30S_IF3_IF2_GTP;
    re0000000616_k1 = 0.8 substance;
  re0000000617: RS30S_IF2_GTP_fMettRNAfMetCAU + IF3 => RS30S_IF3_IF2_GTP_fMettRNAfMetCAU; re0000000617_k1*RS30S_IF2_GTP_fMettRNAfMetCAU*IF3;
    re0000000617_k1 = 1160 substance;
  re0000000618: RS30S_IF3_IF2_GTP_fMettRNAfMetCAU => IF3 + RS30S_IF2_GTP_fMettRNAfMetCAU; re0000000618_k1*RS30S_IF3_IF2_GTP_fMettRNAfMetCAU;
    re0000000618_k1 = 0.8 substance;
  re0000000619: mRNA + RS30S => RS30S_mRNA; re0000000619_k1*mRNA*RS30S;
    re0000000619_k1 = 36 substance;
  re0000000620: RS30S_mRNA => RS30S + mRNA; re0000000620_k1*RS30S_mRNA;
    re0000000620_k1 = 0.7 substance;
  re0000000621: RS30S_mRNA + fMettRNAfMetCAU => RS30S_fMettRNAfMetCAU_mRNA; re0000000621_k1*RS30S_mRNA*fMettRNAfMetCAU;
    re0000000621_k1 = 5 substance;
  re0000000622: RS30S_fMettRNAfMetCAU_mRNA => fMettRNAfMetCAU + RS30S_mRNA; re0000000622_k1*RS30S_fMettRNAfMetCAU_mRNA;
    re0000000622_k1 = 1.5 substance;
  re0000000623: RS30S_mRNA + IF2_GTP_fMettRNAfMetCAU => RS30S_IF2_GTP_fMettRNAfMetCAU_mRNA; re0000000623_k1*RS30S_mRNA*IF2_GTP_fMettRNAfMetCAU;
    re0000000623_k1 = 280 substance;
  re0000000624: RS30S_IF2_GTP_fMettRNAfMetCAU_mRNA => IF2_GTP_fMettRNAfMetCAU + RS30S_mRNA; re0000000624_k1*RS30S_IF2_GTP_fMettRNAfMetCAU_mRNA;
    re0000000624_k1 = 1.5 substance;
  re0000000625: RS30S_mRNA + IF2_GTP => RS30S_IF2_GTP_mRNA; re0000000625_k1*RS30S_mRNA*IF2_GTP;
    re0000000625_k1 = 280 substance;
  re0000000626: RS30S_IF2_GTP_mRNA => IF2_GTP + RS30S_mRNA; re0000000626_k1*RS30S_IF2_GTP_mRNA;
    re0000000626_k1 = 12 substance;
  re0000000627: RS30S_fMettRNAfMetCAU_mRNA + IF2_GTP => RS30S_IF2_GTP_fMettRNAfMetCAU_mRNA; re0000000627_k1*RS30S_fMettRNAfMetCAU_mRNA*IF2_GTP;
    re0000000627_k1 = 280 substance;
  re0000000628: RS30S_IF2_GTP_fMettRNAfMetCAU_mRNA => IF2_GTP + RS30S_fMettRNAfMetCAU_mRNA; re0000000628_k1*RS30S_IF2_GTP_fMettRNAfMetCAU_mRNA;
    re0000000628_k1 = 12 substance;
  re0000000629: RS30S_IF2_GTP_mRNA + fMettRNAfMetCAU => RS30S_IF2_GTP_fMettRNAfMetCAU_mRNA; re0000000629_k1*RS30S_IF2_GTP_mRNA*fMettRNAfMetCAU;
    re0000000629_k1 = 5 substance;
  re0000000630: RS30S_IF2_GTP_fMettRNAfMetCAU_mRNA => fMettRNAfMetCAU + RS30S_IF2_GTP_mRNA; re0000000630_k1*RS30S_IF2_GTP_fMettRNAfMetCAU_mRNA;
    re0000000630_k1 = 1.5 substance;
  re0000000631: mRNA + RS30S_IF2_GTP => RS30S_IF2_GTP_mRNA; re0000000631_k1*mRNA*RS30S_IF2_GTP;
    re0000000631_k1 = 36 substance;
  re0000000632: RS30S_IF2_GTP_mRNA => RS30S_IF2_GTP + mRNA; re0000000632_k1*RS30S_IF2_GTP_mRNA;
    re0000000632_k1 = 0.7 substance;
  re0000000633: mRNA + RS30S_IF2_GTP_fMettRNAfMetCAU => RS30S_IF2_GTP_fMettRNAfMetCAU_mRNA; re0000000633_k1*mRNA*RS30S_IF2_GTP_fMettRNAfMetCAU;
    re0000000633_k1 = 36 substance;
  re0000000634: RS30S_IF2_GTP_fMettRNAfMetCAU_mRNA => RS30S_IF2_GTP_fMettRNAfMetCAU + mRNA; re0000000634_k1*RS30S_IF2_GTP_fMettRNAfMetCAU_mRNA;
    re0000000634_k1 = 0.7 substance;
  re0000000635: RS30S_mRNA + IF3 => RS30S_IF3_mRNA; re0000000635_k1*RS30S_mRNA*IF3;
    re0000000635_k1 = 1160 substance;
  re0000000636: RS30S_IF3_mRNA => IF3 + RS30S_mRNA; re0000000636_k1*RS30S_IF3_mRNA;
    re0000000636_k1 = 0.8 substance;
  re0000000637: RS30S_fMettRNAfMetCAU_mRNA + IF3 => RS30S_IF3_fMettRNAfMetCAU_mRNA; re0000000637_k1*RS30S_fMettRNAfMetCAU_mRNA*IF3;
    re0000000637_k1 = 1160 substance;
  re0000000638: RS30S_IF3_fMettRNAfMetCAU_mRNA => IF3 + RS30S_fMettRNAfMetCAU_mRNA; re0000000638_k1*RS30S_IF3_fMettRNAfMetCAU_mRNA;
    re0000000638_k1 = 0.8 substance;
  re0000000639: RS30S_IF2_GTP_mRNA + IF3 => RS30S_IF3_IF2_GTP_mRNA; re0000000639_k1*RS30S_IF2_GTP_mRNA*IF3;
    re0000000639_k1 = 1160 substance;
  re0000000640: RS30S_IF3_IF2_GTP_mRNA => IF3 + RS30S_IF2_GTP_mRNA; re0000000640_k1*RS30S_IF3_IF2_GTP_mRNA;
    re0000000640_k1 = 0.8 substance;
  re0000000641: RS30S_IF2_GTP_fMettRNAfMetCAU_mRNA + IF3 => RS30S_IF3_IF2_GTP_fMettRNAfMetCAU_mRNA; re0000000641_k1*RS30S_IF2_GTP_fMettRNAfMetCAU_mRNA*IF3;
    re0000000641_k1 = 1160 substance;
  re0000000642: RS30S_IF3_IF2_GTP_fMettRNAfMetCAU_mRNA => IF3 + RS30S_IF2_GTP_fMettRNAfMetCAU_mRNA; re0000000642_k1*RS30S_IF3_IF2_GTP_fMettRNAfMetCAU_mRNA;
    re0000000642_k1 = 0.8 substance;
  re0000000643: RS30S_IF1 + IF2_GTP => RS30S_IF1_IF2_GTP; re0000000643_k1*RS30S_IF1*IF2_GTP;
    re0000000643_k1 = 220 substance;
  re0000000644: RS30S_IF1_IF2_GTP => IF2_GTP + RS30S_IF1; re0000000644_k1*RS30S_IF1_IF2_GTP;
    re0000000644_k1 = 1 substance;
  re0000000645: RS30S_IF1 + IF2_GTP_fMettRNAfMetCAU => RS30S_IF1_IF2_GTP_fMettRNAfMetCAU; re0000000645_k1*RS30S_IF1*IF2_GTP_fMettRNAfMetCAU;
    re0000000645_k1 = 220 substance;
  re0000000646: RS30S_IF1_IF2_GTP_fMettRNAfMetCAU => IF2_GTP_fMettRNAfMetCAU + RS30S_IF1; re0000000646_k1*RS30S_IF1_IF2_GTP_fMettRNAfMetCAU;
    re0000000646_k1 = 1 substance;
  re0000000647: RS30S_IF1_IF2_GTP + fMettRNAfMetCAU => RS30S_IF1_IF2_GTP_fMettRNAfMetCAU; re0000000647_k1*RS30S_IF1_IF2_GTP*fMettRNAfMetCAU;
    re0000000647_k1 = 5 substance;
  re0000000648: RS30S_IF1_IF2_GTP_fMettRNAfMetCAU => fMettRNAfMetCAU + RS30S_IF1_IF2_GTP; re0000000648_k1*RS30S_IF1_IF2_GTP_fMettRNAfMetCAU;
    re0000000648_k1 = 1.5 substance;
  re0000000649: IF1 + RS30S_IF2_GTP => RS30S_IF1_IF2_GTP; re0000000649_k1*IF1*RS30S_IF2_GTP;
    re0000000649_k1 = 20 substance;
  re0000000650: RS30S_IF1_IF2_GTP => IF1 + RS30S_IF2_GTP; re0000000650_k1*RS30S_IF1_IF2_GTP;
    re0000000650_k1 = 0.7 substance;
  re0000000651: RS30S_IF2_GTP_fMettRNAfMetCAU + IF1 => RS30S_IF1_IF2_GTP_fMettRNAfMetCAU; re0000000651_k1*RS30S_IF2_GTP_fMettRNAfMetCAU*IF1;
    re0000000651_k1 = 20 substance;
  re0000000652: RS30S_IF1_IF2_GTP_fMettRNAfMetCAU => IF1 + RS30S_IF2_GTP_fMettRNAfMetCAU; re0000000652_k1*RS30S_IF1_IF2_GTP_fMettRNAfMetCAU;
    re0000000652_k1 = 0.7 substance;
  re0000000653: RS30S_IF1_IF2_GTP + IF3 => RS30S_IF1_IF3_IF2_GTP; re0000000653_k1*RS30S_IF1_IF2_GTP*IF3;
    re0000000653_k1 = 1100 substance;
  re0000000654: RS30S_IF1_IF3_IF2_GTP => IF3 + RS30S_IF1_IF2_GTP; re0000000654_k1*RS30S_IF1_IF3_IF2_GTP;
    re0000000654_k1 = 0.08 substance;
  re0000000655: RS30S_IF1_IF2_GTP_fMettRNAfMetCAU + IF3 => RS30S_IF1_IF3_IF2_GTP_fMettRNAfMetCAU; re0000000655_k1*RS30S_IF1_IF2_GTP_fMettRNAfMetCAU*IF3;
    re0000000655_k1 = 1100 substance;
  re0000000656: RS30S_IF1_IF3_IF2_GTP_fMettRNAfMetCAU => IF3 + RS30S_IF1_IF2_GTP_fMettRNAfMetCAU; re0000000656_k1*RS30S_IF1_IF3_IF2_GTP_fMettRNAfMetCAU;
    re0000000656_k1 = 0.08 substance;
  re0000000657: RS30S_IF1_mRNA + IF2_GTP => RS30S_IF1_IF2_GTP_mRNA; re0000000657_k1*RS30S_IF1_mRNA*IF2_GTP;
    re0000000657_k1 = 220 substance;
  re0000000658: RS30S_IF1_IF2_GTP_mRNA => RS30S_IF1_mRNA + IF2_GTP; re0000000658_k1*RS30S_IF1_IF2_GTP_mRNA;
    re0000000658_k1 = 1 substance;
  re0000000659: RS30S_IF1_mRNA + fMettRNAfMetCAU => RS30S_IF1_fMettRNAfMetCAU_mRNA; re0000000659_k1*RS30S_IF1_mRNA*fMettRNAfMetCAU;
    re0000000659_k1 = 5 substance;
  re0000000660: RS30S_IF1_fMettRNAfMetCAU_mRNA => fMettRNAfMetCAU + RS30S_IF1_mRNA; re0000000660_k1*RS30S_IF1_fMettRNAfMetCAU_mRNA;
    re0000000660_k1 = 1.5 substance;
  re0000000661: RS30S_IF1_IF2_GTP_mRNA + fMettRNAfMetCAU => RS30S_IF1_IF2_GTP_fMettRNAfMetCAU_mRNA; re0000000661_k1*RS30S_IF1_IF2_GTP_mRNA*fMettRNAfMetCAU;
    re0000000661_k1 = 5 substance;
  re0000000662: RS30S_IF1_IF2_GTP_fMettRNAfMetCAU_mRNA => fMettRNAfMetCAU + RS30S_IF1_IF2_GTP_mRNA; re0000000662_k1*RS30S_IF1_IF2_GTP_fMettRNAfMetCAU_mRNA;
    re0000000662_k1 = 1.5 substance;
  re0000000663: RS30S_IF1_fMettRNAfMetCAU_mRNA + IF2_GTP => RS30S_IF1_IF2_GTP_fMettRNAfMetCAU_mRNA; re0000000663_k1*RS30S_IF1_fMettRNAfMetCAU_mRNA*IF2_GTP;
    re0000000663_k1 = 220 substance;
  re0000000664: RS30S_IF1_IF2_GTP_fMettRNAfMetCAU_mRNA => IF2_GTP + RS30S_IF1_fMettRNAfMetCAU_mRNA; re0000000664_k1*RS30S_IF1_IF2_GTP_fMettRNAfMetCAU_mRNA;
    re0000000664_k1 = 1 substance;
  re0000000665: RS30S_IF1_mRNA + IF2_GTP_fMettRNAfMetCAU => RS30S_IF1_IF2_GTP_fMettRNAfMetCAU_mRNA; re0000000665_k1*RS30S_IF1_mRNA*IF2_GTP_fMettRNAfMetCAU;
    re0000000665_k1 = 220 substance;
  re0000000666: RS30S_IF1_IF2_GTP_fMettRNAfMetCAU_mRNA => IF2_GTP_fMettRNAfMetCAU + RS30S_IF1_mRNA; re0000000666_k1*RS30S_IF1_IF2_GTP_fMettRNAfMetCAU_mRNA;
    re0000000666_k1 = 1 substance;
  re0000000667: RS30S_IF1_mRNA + IF3 => RS30S_IF1_IF3_mRNA; re0000000667_k1*RS30S_IF1_mRNA*IF3;
    re0000000667_k1 = 1100 substance;
  re0000000668: RS30S_IF1_IF3_mRNA => IF3 + RS30S_IF1_mRNA; re0000000668_k1*RS30S_IF1_IF3_mRNA;
    re0000000668_k1 = 0.08 substance;
  re0000000669: RS30S_IF1_fMettRNAfMetCAU_mRNA + IF3 => RS30S_IF1_IF3_fMettRNAfMetCAU_mRNA; re0000000669_k1*RS30S_IF1_fMettRNAfMetCAU_mRNA*IF3;
    re0000000669_k1 = 1100 substance;
  re0000000670: RS30S_IF1_IF3_fMettRNAfMetCAU_mRNA => IF3 + RS30S_IF1_fMettRNAfMetCAU_mRNA; re0000000670_k1*RS30S_IF1_IF3_fMettRNAfMetCAU_mRNA;
    re0000000670_k1 = 0.08 substance;
  re0000000671: RS30S_IF1_IF2_GTP_mRNA + IF3 => RS30S_IF1_IF3_IF2_GTP_mRNA; re0000000671_k1*RS30S_IF1_IF2_GTP_mRNA*IF3;
    re0000000671_k1 = 1100 substance;
  re0000000672: RS30S_IF1_IF3_IF2_GTP_mRNA => IF3 + RS30S_IF1_IF2_GTP_mRNA; re0000000672_k1*RS30S_IF1_IF3_IF2_GTP_mRNA;
    re0000000672_k1 = 0.08 substance;
  re0000000673: RS30S_IF1_IF2_GTP_fMettRNAfMetCAU_mRNA + IF3 => RS30S_IF1_IF3_IF2_GTP_fMettRNAfMetCAU_mRNA; re0000000673_k1*RS30S_IF1_IF2_GTP_fMettRNAfMetCAU_mRNA*IF3;
    re0000000673_k1 = 1100 substance;
  re0000000674: RS30S_IF1_IF3_IF2_GTP_fMettRNAfMetCAU_mRNA => IF3 + RS30S_IF1_IF2_GTP_fMettRNAfMetCAU_mRNA; re0000000674_k1*RS30S_IF1_IF3_IF2_GTP_fMettRNAfMetCAU_mRNA;
    re0000000674_k1 = 0.08 substance;
  re0000000675: RS30S_IF1 + mRNA => RS30S_IF1_mRNA; re0000000675_k1*RS30S_IF1*mRNA;
    re0000000675_k1 = 36 substance;
  re0000000676: RS30S_IF1_mRNA => RS30S_IF1 + mRNA; re0000000676_k1*RS30S_IF1_mRNA;
    re0000000676_k1 = 0.7 substance;
  re0000000677: RS30S_mRNA + IF1 => RS30S_IF1_mRNA; re0000000677_k1*RS30S_mRNA*IF1;
    re0000000677_k1 = 20 substance;
  re0000000678: RS30S_IF1_mRNA => RS30S_mRNA + IF1; re0000000678_k1*RS30S_IF1_mRNA;
    re0000000678_k1 = 0.7 substance;
  re0000000679: RS30S_IF2_GTP_mRNA + IF1 => RS30S_IF1_IF2_GTP_mRNA; re0000000679_k1*RS30S_IF2_GTP_mRNA*IF1;
    re0000000679_k1 = 20 substance;
  re0000000680: RS30S_IF1_IF2_GTP_mRNA => RS30S_IF2_GTP_mRNA + IF1; re0000000680_k1*RS30S_IF1_IF2_GTP_mRNA;
    re0000000680_k1 = 0.7 substance;
  re0000000681: RS30S_IF1_IF2_GTP + mRNA => RS30S_IF1_IF2_GTP_mRNA; re0000000681_k1*RS30S_IF1_IF2_GTP*mRNA;
    re0000000681_k1 = 36 substance;
  re0000000682: RS30S_IF1_IF2_GTP_mRNA => RS30S_IF1_IF2_GTP + mRNA; re0000000682_k1*RS30S_IF1_IF2_GTP_mRNA;
    re0000000682_k1 = 0.7 substance;
  re0000000683: RS30S_fMettRNAfMetCAU_mRNA + IF1 => RS30S_IF1_fMettRNAfMetCAU_mRNA; re0000000683_k1*RS30S_fMettRNAfMetCAU_mRNA*IF1;
    re0000000683_k1 = 20 substance;
  re0000000684: RS30S_IF1_fMettRNAfMetCAU_mRNA => RS30S_fMettRNAfMetCAU_mRNA + IF1; re0000000684_k1*RS30S_IF1_fMettRNAfMetCAU_mRNA;
    re0000000684_k1 = 0.7 substance;
  re0000000685: IF1 + RS30S_IF2_GTP_fMettRNAfMetCAU_mRNA => RS30S_IF1_IF2_GTP_fMettRNAfMetCAU_mRNA; re0000000685_k1*IF1*RS30S_IF2_GTP_fMettRNAfMetCAU_mRNA;
    re0000000685_k1 = 20 substance;
  re0000000686: RS30S_IF1_IF2_GTP_fMettRNAfMetCAU_mRNA => RS30S_IF2_GTP_fMettRNAfMetCAU_mRNA + IF1; re0000000686_k1*RS30S_IF1_IF2_GTP_fMettRNAfMetCAU_mRNA;
    re0000000686_k1 = 0.7 substance;
  re0000000687: RS30S_IF1_IF2_GTP_fMettRNAfMetCAU + mRNA => RS30S_IF1_IF2_GTP_fMettRNAfMetCAU_mRNA; re0000000687_k1*RS30S_IF1_IF2_GTP_fMettRNAfMetCAU*mRNA;
    re0000000687_k1 = 36 substance;
  re0000000688: RS30S_IF1_IF2_GTP_fMettRNAfMetCAU_mRNA => RS30S_IF1_IF2_GTP_fMettRNAfMetCAU + mRNA; re0000000688_k1*RS30S_IF1_IF2_GTP_fMettRNAfMetCAU_mRNA;
    re0000000688_k1 = 0.7 substance;
  re0000000689: RS30S_IF2_GTP => RS30S_degraded + IF2 + GTP; re0000000689_k1*RS30S_IF2_GTP;
    re0000000689_k1 = 0 substance;
  re0000000690: RS30S_IF2_GTP => IF2_degraded + GTP + RS30S; re0000000690_k1*RS30S_IF2_GTP;
    re0000000690_k1 = 0 substance;
  re0000000691: RS30S_IF2_GTP_fMettRNAfMetCAU => RS30S_degraded + IF2 + GTP + fMettRNAfMetCAU; re0000000691_k1*RS30S_IF2_GTP_fMettRNAfMetCAU;
    re0000000691_k1 = 0 substance;
  re0000000692: RS30S_IF2_GTP_fMettRNAfMetCAU => IF2_degraded + fMettRNAfMetCAU + RS30S + GTP; re0000000692_k1*RS30S_IF2_GTP_fMettRNAfMetCAU;
    re0000000692_k1 = 0 substance;
  re0000000693: RS30S_mRNA => RS30S_degraded + mRNA; re0000000693_k1*RS30S_mRNA;
    re0000000693_k1 = 0 substance;
  re0000000694: RS30S_fMettRNAfMetCAU_mRNA => RS30S_degraded + fMettRNAfMetCAU + mRNA; re0000000694_k1*RS30S_fMettRNAfMetCAU_mRNA;
    re0000000694_k1 = 0 substance;
  re0000000695: RS30S_IF2_GTP_mRNA => RS30S_degraded + IF2 + GTP + mRNA; re0000000695_k1*RS30S_IF2_GTP_mRNA;
    re0000000695_k1 = 0 substance;
  re0000000696: RS30S_IF2_GTP_mRNA => IF2_degraded + mRNA + RS30S + GTP; re0000000696_k1*RS30S_IF2_GTP_mRNA;
    re0000000696_k1 = 0 substance;
  re0000000697: RS30S_IF2_GTP_fMettRNAfMetCAU_mRNA => RS30S_degraded + IF2 + GTP + fMettRNAfMetCAU + mRNA; re0000000697_k1*RS30S_IF2_GTP_fMettRNAfMetCAU_mRNA;
    re0000000697_k1 = 0 substance;
  re0000000698: RS30S_IF2_GTP_fMettRNAfMetCAU_mRNA => IF2_degraded + fMettRNAfMetCAU + mRNA + RS30S + GTP; re0000000698_k1*RS30S_IF2_GTP_fMettRNAfMetCAU_mRNA;
    re0000000698_k1 = 0 substance;
  re0000000699: RS30S_IF1_IF2_GTP => RS30S_degraded + IF2 + GTP + IF1; re0000000699_k1*RS30S_IF1_IF2_GTP;
    re0000000699_k1 = 0 substance;
  re0000000700: RS30S_IF1_IF2_GTP => IF2_degraded + GTP + RS30S + IF1; re0000000700_k1*RS30S_IF1_IF2_GTP;
    re0000000700_k1 = 0 substance;
  re0000000701: RS30S_IF1_IF2_GTP => IF1_degraded + RS30S + IF2 + GTP; re0000000701_k1*RS30S_IF1_IF2_GTP;
    re0000000701_k1 = 0 substance;
  re0000000702: RS30S_IF1_IF2_GTP_fMettRNAfMetCAU => RS30S_degraded + IF2 + GTP + IF1 + fMettRNAfMetCAU; re0000000702_k1*RS30S_IF1_IF2_GTP_fMettRNAfMetCAU;
    re0000000702_k1 = 0 substance;
  re0000000703: RS30S_IF1_IF2_GTP_fMettRNAfMetCAU => IF2_degraded + GTP + RS30S + IF1 + fMettRNAfMetCAU; re0000000703_k1*RS30S_IF1_IF2_GTP_fMettRNAfMetCAU;
    re0000000703_k1 = 0 substance;
  re0000000704: RS30S_IF1_IF2_GTP_fMettRNAfMetCAU => IF1_degraded + RS30S + fMettRNAfMetCAU + IF2 + GTP; re0000000704_k1*RS30S_IF1_IF2_GTP_fMettRNAfMetCAU;
    re0000000704_k1 = 0 substance;
  re0000000705: RS30S_IF1_mRNA => RS30S_degraded + IF1 + mRNA; re0000000705_k1*RS30S_IF1_mRNA;
    re0000000705_k1 = 0 substance;
  re0000000706: RS30S_IF1_mRNA => IF1_degraded + mRNA + RS30S; re0000000706_k1*RS30S_IF1_mRNA;
    re0000000706_k1 = 0 substance;
  re0000000707: RS30S_IF1_fMettRNAfMetCAU_mRNA => RS30S_degraded + IF1 + fMettRNAfMetCAU + mRNA; re0000000707_k1*RS30S_IF1_fMettRNAfMetCAU_mRNA;
    re0000000707_k1 = 0 substance;
  re0000000708: RS30S_IF1_fMettRNAfMetCAU_mRNA => IF1_degraded + mRNA + fMettRNAfMetCAU + RS30S; re0000000708_k1*RS30S_IF1_fMettRNAfMetCAU_mRNA;
    re0000000708_k1 = 0 substance;
  re0000000709: RS30S_IF1_IF2_GTP_mRNA => RS30S_degraded + IF2 + GTP + IF1 + mRNA; re0000000709_k1*RS30S_IF1_IF2_GTP_mRNA;
    re0000000709_k1 = 0 substance;
  re0000000710: RS30S_IF1_IF2_GTP_mRNA => IF2_degraded + mRNA + RS30S + IF1 + GTP; re0000000710_k1*RS30S_IF1_IF2_GTP_mRNA;
    re0000000710_k1 = 0 substance;
  re0000000711: RS30S_IF1_IF2_GTP_mRNA => IF1_degraded + RS30S + mRNA + IF2 + GTP; re0000000711_k1*RS30S_IF1_IF2_GTP_mRNA;
    re0000000711_k1 = 0 substance;
  re0000000712: RS30S_IF1_IF2_GTP_fMettRNAfMetCAU_mRNA => RS30S_degraded + mRNA + fMettRNAfMetCAU + IF2 + GTP + IF1; re0000000712_k1*RS30S_IF1_IF2_GTP_fMettRNAfMetCAU_mRNA;
    re0000000712_k1 = 0 substance;
  re0000000713: RS30S_IF1_IF2_GTP_fMettRNAfMetCAU_mRNA => IF2_degraded + mRNA + fMettRNAfMetCAU + RS30S + IF1 + GTP; re0000000713_k1*RS30S_IF1_IF2_GTP_fMettRNAfMetCAU_mRNA;
    re0000000713_k1 = 0 substance;
  re0000000714: RS30S_IF1_IF2_GTP_fMettRNAfMetCAU_mRNA => IF1_degraded + GTP + IF2 + RS30S + fMettRNAfMetCAU + mRNA; re0000000714_k1*RS30S_IF1_IF2_GTP_fMettRNAfMetCAU_mRNA;
    re0000000714_k1 = 0 substance;
  re0000000715: RS70S_IF3_IF2_GTP_fMettRNAfMetCAU_mRNA => RS70S_IF3_IF2_GDP_PO4_fMettRNAfMetCAU_mRNA; re0000000715_k1*RS70S_IF3_IF2_GTP_fMettRNAfMetCAU_mRNA;
    re0000000715_k1 = 2.3 substance;
  re0000000716: RS70S_IF3_IF2_GDP_PO4_fMettRNAfMetCAU_mRNA => RS70S_IF3_IF2_GTP_fMettRNAfMetCAU_mRNA; re0000000716_k1*RS70S_IF3_IF2_GDP_PO4_fMettRNAfMetCAU_mRNA;
    re0000000716_k1 = 2.1 substance;
  re0000000717: RS70S_IF1_IF3_IF2_GTP_fMettRNAfMetCAU_mRNA => RS70S_IF1_IF3_IF2_GDP_PO4_fMettRNAfMetCAU_mRNA; re0000000717_k1*RS70S_IF1_IF3_IF2_GTP_fMettRNAfMetCAU_mRNA;
    re0000000717_k1 = 2.3 substance;
  re0000000718: RS70S_IF1_IF3_IF2_GDP_PO4_fMettRNAfMetCAU_mRNA => RS70S_IF1_IF3_IF2_GTP_fMettRNAfMetCAU_mRNA; re0000000718_k1*RS70S_IF1_IF3_IF2_GDP_PO4_fMettRNAfMetCAU_mRNA;
    re0000000718_k1 = 2.1 substance;
  re0000000719: RS70S_IF3_IF2_GDP_PO4_fMettRNAfMetCAU_mRNA + IF1 => RS70S_IF1_IF3_IF2_GDP_PO4_fMettRNAfMetCAU_mRNA; re0000000719_k1*RS70S_IF3_IF2_GDP_PO4_fMettRNAfMetCAU_mRNA*IF1;
    re0000000719_k1 = 16 substance;
  re0000000720: RS70S_IF1_IF3_IF2_GDP_PO4_fMettRNAfMetCAU_mRNA => RS70S_IF3_IF2_GDP_PO4_fMettRNAfMetCAU_mRNA + IF1; re0000000720_k1*RS70S_IF1_IF3_IF2_GDP_PO4_fMettRNAfMetCAU_mRNA;
    re0000000720_k1 = 0.0025 substance;
  re0000000721: RS70S_IF3_IF2_GDP_PO4_fMettRNAfMetCAU_mRNA => RS70S_IF3_IF2_GDP_fMettRNAfMetCAU_mRNA + PO4; re0000000721_k1*RS70S_IF3_IF2_GDP_PO4_fMettRNAfMetCAU_mRNA;
    re0000000721_k1 = 12 substance;
  re0000000722: RS70S_IF1_IF3_IF2_GDP_PO4_fMettRNAfMetCAU_mRNA => RS70S_IF1_IF3_IF2_GDP_fMettRNAfMetCAU_mRNA + PO4; re0000000722_k1*RS70S_IF1_IF3_IF2_GDP_PO4_fMettRNAfMetCAU_mRNA;
    re0000000722_k1 = 12 substance;
  re0000000723: RS70S_IF3_IF2_GDP_fMettRNAfMetCAU_mRNA + IF1 => RS70S_IF1_IF3_IF2_GDP_fMettRNAfMetCAU_mRNA; re0000000723_k1*RS70S_IF3_IF2_GDP_fMettRNAfMetCAU_mRNA*IF1;
    re0000000723_k1 = 16 substance;
  re0000000724: RS70S_IF1_IF3_IF2_GDP_fMettRNAfMetCAU_mRNA => RS70S_IF3_IF2_GDP_fMettRNAfMetCAU_mRNA + IF1; re0000000724_k1*RS70S_IF1_IF3_IF2_GDP_fMettRNAfMetCAU_mRNA;
    re0000000724_k1 = 0.0025 substance;
  re0000000725: RS70S_IF3_IF2_GDP_fMettRNAfMetCAU_mRNA => RS70S_IF3_fMettRNAfMetCAU_mRNA + IF2_GDP; re0000000725_k1*RS70S_IF3_IF2_GDP_fMettRNAfMetCAU_mRNA;
    re0000000725_k1 = 4 substance;
  re0000000726: RS70S_IF2_GDP_fMettRNAfMetCAU_mRNA => elRS70SAGGU0002_fMettRNAfMetCAU + IF2_GDP; re0000000726_k1*RS70S_IF2_GDP_fMettRNAfMetCAU_mRNA;
    re0000000726_k1 = 4 substance;
  re0000000727: RS70S_IF3_IF2_GDP_fMettRNAfMetCAU_mRNA => IF2_degraded + mRNA + GDP + fMettRNAfMetCAU + RS50S + RS30S + IF3; re0000000727_k1*RS70S_IF3_IF2_GDP_fMettRNAfMetCAU_mRNA;
    re0000000727_k1 = 0 substance;
  re0000000728: RS70S_IF3_IF2_GDP_fMettRNAfMetCAU_mRNA => RS50S_degraded + IF2 + mRNA + fMettRNAfMetCAU + GDP + RS30S + IF3; re0000000728_k1*RS70S_IF3_IF2_GDP_fMettRNAfMetCAU_mRNA;
    re0000000728_k1 = 0 substance;
  re0000000729: RS70S_IF3_IF2_GDP_fMettRNAfMetCAU_mRNA => IF3_degraded + GDP + fMettRNAfMetCAU + mRNA + RS30S + RS50S + IF2; re0000000729_k1*RS70S_IF3_IF2_GDP_fMettRNAfMetCAU_mRNA;
    re0000000729_k1 = 0 substance;
  re0000000730: RS70S_IF3_IF2_GDP_fMettRNAfMetCAU_mRNA => RS30S_degraded + RS50S + mRNA + fMettRNAfMetCAU + IF2 + IF3 + GDP; re0000000730_k1*RS70S_IF3_IF2_GDP_fMettRNAfMetCAU_mRNA;
    re0000000730_k1 = 0 substance;
  re0000000731: RS70S_IF1_IF3_IF2_GDP_fMettRNAfMetCAU_mRNA => RS30S_degraded + RS50S + GDP + mRNA + fMettRNAfMetCAU + IF2 + IF3 + IF1; re0000000731_k1*RS70S_IF1_IF3_IF2_GDP_fMettRNAfMetCAU_mRNA;
    re0000000731_k1 = 0 substance;
  re0000000732: RS70S_IF1_IF3_IF2_GDP_fMettRNAfMetCAU_mRNA => IF2_degraded + mRNA + GDP + fMettRNAfMetCAU + RS50S + RS30S + IF3 + IF1; re0000000732_k1*RS70S_IF1_IF3_IF2_GDP_fMettRNAfMetCAU_mRNA;
    re0000000732_k1 = 0 substance;
  re0000000733: RS70S_IF1_IF3_IF2_GDP_fMettRNAfMetCAU_mRNA => RS50S_degraded + mRNA + IF2 + GDP + fMettRNAfMetCAU + RS30S + IF3 + IF1; re0000000733_k1*RS70S_IF1_IF3_IF2_GDP_fMettRNAfMetCAU_mRNA;
    re0000000733_k1 = 0 substance;
  re0000000734: RS70S_IF1_IF3_IF2_GDP_fMettRNAfMetCAU_mRNA => IF1_degraded + mRNA + GDP + fMettRNAfMetCAU + IF2 + RS30S + IF3 + RS50S; re0000000734_k1*RS70S_IF1_IF3_IF2_GDP_fMettRNAfMetCAU_mRNA;
    re0000000734_k1 = 0 substance;
  re0000000735: RS70S_IF1_IF3_IF2_GDP_fMettRNAfMetCAU_mRNA => IF3_degraded + RS50S + RS30S + IF1 + mRNA + IF2 + fMettRNAfMetCAU + GDP; re0000000735_k1*RS70S_IF1_IF3_IF2_GDP_fMettRNAfMetCAU_mRNA;
    re0000000735_k1 = 0 substance;
  re0000000736: RS70S_IF3_IF2_GDP_PO4_fMettRNAfMetCAU_mRNA => IF2_degraded + mRNA + GDP + fMettRNAfMetCAU + RS50S + RS30S + IF3 + PO4; re0000000736_k1*RS70S_IF3_IF2_GDP_PO4_fMettRNAfMetCAU_mRNA;
    re0000000736_k1 = 0 substance;
  re0000000737: RS70S_IF3_IF2_GDP_PO4_fMettRNAfMetCAU_mRNA => RS50S_degraded + IF2 + mRNA + fMettRNAfMetCAU + GDP + RS30S + IF3 + PO4; re0000000737_k1*RS70S_IF3_IF2_GDP_PO4_fMettRNAfMetCAU_mRNA;
    re0000000737_k1 = 0 substance;
  re0000000738: RS70S_IF3_IF2_GDP_PO4_fMettRNAfMetCAU_mRNA => IF3_degraded + GDP + fMettRNAfMetCAU + mRNA + RS30S + RS50S + IF2 + PO4; re0000000738_k1*RS70S_IF3_IF2_GDP_PO4_fMettRNAfMetCAU_mRNA;
    re0000000738_k1 = 0 substance;
  re0000000739: RS70S_IF3_IF2_GDP_PO4_fMettRNAfMetCAU_mRNA => RS30S_degraded + RS50S + mRNA + fMettRNAfMetCAU + IF2 + IF3 + GDP + PO4; re0000000739_k1*RS70S_IF3_IF2_GDP_PO4_fMettRNAfMetCAU_mRNA;
    re0000000739_k1 = 0 substance;
  re0000000740: RS70S_IF1_IF3_IF2_GDP_PO4_fMettRNAfMetCAU_mRNA => RS30S_degraded + RS50S + GDP + mRNA + fMettRNAfMetCAU + IF2 + IF3 + IF1 + PO4; re0000000740_k1*RS70S_IF1_IF3_IF2_GDP_PO4_fMettRNAfMetCAU_mRNA;
    re0000000740_k1 = 0 substance;
  re0000000741: RS70S_IF1_IF3_IF2_GDP_PO4_fMettRNAfMetCAU_mRNA => IF2_degraded + mRNA + GDP + fMettRNAfMetCAU + RS50S + RS30S + IF3 + IF1 + PO4; re0000000741_k1*RS70S_IF1_IF3_IF2_GDP_PO4_fMettRNAfMetCAU_mRNA;
    re0000000741_k1 = 0 substance;
  re0000000742: RS70S_IF1_IF3_IF2_GDP_PO4_fMettRNAfMetCAU_mRNA => RS50S_degraded + mRNA + IF2 + GDP + fMettRNAfMetCAU + RS30S + IF3 + IF1 + PO4; re0000000742_k1*RS70S_IF1_IF3_IF2_GDP_PO4_fMettRNAfMetCAU_mRNA;
    re0000000742_k1 = 0 substance;
  re0000000743: RS70S_IF1_IF3_IF2_GDP_PO4_fMettRNAfMetCAU_mRNA => IF1_degraded + mRNA + GDP + fMettRNAfMetCAU + IF2 + RS30S + IF3 + RS50S + PO4; re0000000743_k1*RS70S_IF1_IF3_IF2_GDP_PO4_fMettRNAfMetCAU_mRNA;
    re0000000743_k1 = 0 substance;
  re0000000744: RS70S_IF1_IF3_IF2_GDP_PO4_fMettRNAfMetCAU_mRNA => IF3_degraded + RS50S + RS30S + IF1 + mRNA + IF2 + fMettRNAfMetCAU + GDP + PO4; re0000000744_k1*RS70S_IF1_IF3_IF2_GDP_PO4_fMettRNAfMetCAU_mRNA;
    re0000000744_k1 = 0 substance;
  re0000000745: RS70S_IF3_IF2_GDP_fMettRNAfMetCAU_mRNA + PO4 => RS70S_IF3_IF2_GDP_PO4_fMettRNAfMetCAU_mRNA; re0000000745_k1*RS70S_IF3_IF2_GDP_fMettRNAfMetCAU_mRNA*PO4;
    re0000000745_k1 = 0 substance;
  re0000000746: RS70S_IF1_IF3_IF2_GDP_fMettRNAfMetCAU_mRNA + PO4 => RS70S_IF1_IF3_IF2_GDP_PO4_fMettRNAfMetCAU_mRNA; re0000000746_k1*RS70S_IF1_IF3_IF2_GDP_fMettRNAfMetCAU_mRNA*PO4;
    re0000000746_k1 = 0 substance;
  re0000000747: RS70S_IF1_IF3_IF2_GDP_fMettRNAfMetCAU_mRNA => RS70S_IF1_IF2_GDP_fMettRNAfMetCAU_mRNA + IF3; re0000000747_k1*RS70S_IF1_IF3_IF2_GDP_fMettRNAfMetCAU_mRNA;
    re0000000747_k1 = 1000 substance;
  re0000000748: RS70S_IF1_IF2_GDP_fMettRNAfMetCAU_mRNA + IF3 => RS70S_IF1_IF3_IF2_GDP_fMettRNAfMetCAU_mRNA; re0000000748_k1*RS70S_IF1_IF2_GDP_fMettRNAfMetCAU_mRNA*IF3;
    re0000000748_k1 = 0 substance;
  re0000000749: RS70S_IF1_IF3_IF2_GDP_fMettRNAfMetCAU_mRNA => RS70S_IF1_IF3_fMettRNAfMetCAU_mRNA + IF2_GDP; re0000000749_k1*RS70S_IF1_IF3_IF2_GDP_fMettRNAfMetCAU_mRNA;
    re0000000749_k1 = 4 substance;
  re0000000750: RS70S_IF1_IF3_fMettRNAfMetCAU_mRNA + IF2_GDP => RS70S_IF1_IF3_IF2_GDP_fMettRNAfMetCAU_mRNA; re0000000750_k1*RS70S_IF1_IF3_fMettRNAfMetCAU_mRNA*IF2_GDP;
    re0000000750_k1 = 200 substance;
  re0000000751: RS70S_IF3_fMettRNAfMetCAU_mRNA + IF2_GDP => RS70S_IF3_IF2_GDP_fMettRNAfMetCAU_mRNA; re0000000751_k1*RS70S_IF3_fMettRNAfMetCAU_mRNA*IF2_GDP;
    re0000000751_k1 = 200 substance;
  re0000000752: elRS70SAGGU0002_fMettRNAfMetCAU + IF2_GDP => RS70S_IF2_GDP_fMettRNAfMetCAU_mRNA; re0000000752_k1*elRS70SAGGU0002_fMettRNAfMetCAU*IF2_GDP;
    re0000000752_k1 = 200 substance;
  re0000000753: RS70S_IF1_IF3_fMettRNAfMetCAU_mRNA => RS70S_IF3_fMettRNAfMetCAU_mRNA + IF1; re0000000753_k1*RS70S_IF1_IF3_fMettRNAfMetCAU_mRNA;
    re0000000753_k1 = 1000 substance;
  re0000000754: RS70S_IF3_fMettRNAfMetCAU_mRNA + IF1 => RS70S_IF1_IF3_fMettRNAfMetCAU_mRNA; re0000000754_k1*RS70S_IF3_fMettRNAfMetCAU_mRNA*IF1;
    re0000000754_k1 = 0 substance;
  re0000000755: RS70S_IF3_IF2_GDP_fMettRNAfMetCAU_mRNA => RS70S_IF2_GDP_fMettRNAfMetCAU_mRNA + IF3; re0000000755_k1*RS70S_IF3_IF2_GDP_fMettRNAfMetCAU_mRNA;
    re0000000755_k1 = 1000 substance;
  re0000000756: RS70S_IF2_GDP_fMettRNAfMetCAU_mRNA + IF3 => RS70S_IF3_IF2_GDP_fMettRNAfMetCAU_mRNA; re0000000756_k1*RS70S_IF2_GDP_fMettRNAfMetCAU_mRNA*IF3;
    re0000000756_k1 = 0 substance;
  re0000000757: RS70S_IF1_IF2_GDP_fMettRNAfMetCAU_mRNA => RS70S_IF2_GDP_fMettRNAfMetCAU_mRNA + IF1; re0000000757_k1*RS70S_IF1_IF2_GDP_fMettRNAfMetCAU_mRNA;
    re0000000757_k1 = 1000 substance;
  re0000000758: RS70S_IF2_GDP_fMettRNAfMetCAU_mRNA + IF1 => RS70S_IF1_IF2_GDP_fMettRNAfMetCAU_mRNA; re0000000758_k1*RS70S_IF2_GDP_fMettRNAfMetCAU_mRNA*IF1;
    re0000000758_k1 = 0 substance;
  re0000000759: RS70S_IF1_IF2_GDP_fMettRNAfMetCAU_mRNA => RS70S_IF1_fMettRNAfMetCAU_mRNA + IF2_GDP; re0000000759_k1*RS70S_IF1_IF2_GDP_fMettRNAfMetCAU_mRNA;
    re0000000759_k1 = 4 substance;
  re0000000760: RS70S_IF1_fMettRNAfMetCAU_mRNA + IF2_GDP => RS70S_IF1_IF2_GDP_fMettRNAfMetCAU_mRNA; re0000000760_k1*RS70S_IF1_fMettRNAfMetCAU_mRNA*IF2_GDP;
    re0000000760_k1 = 200 substance;
  re0000000761: RS70S_IF1_IF3_fMettRNAfMetCAU_mRNA => RS70S_IF1_fMettRNAfMetCAU_mRNA + IF3; re0000000761_k1*RS70S_IF1_IF3_fMettRNAfMetCAU_mRNA;
    re0000000761_k1 = 1000 substance;
  re0000000762: RS70S_IF1_fMettRNAfMetCAU_mRNA + IF3 => RS70S_IF1_IF3_fMettRNAfMetCAU_mRNA; re0000000762_k1*RS70S_IF1_fMettRNAfMetCAU_mRNA*IF3;
    re0000000762_k1 = 0 substance;
  re0000000763: RS70S_IF3_fMettRNAfMetCAU_mRNA => elRS70SAGGU0002_fMettRNAfMetCAU + IF3; re0000000763_k1*RS70S_IF3_fMettRNAfMetCAU_mRNA;
    re0000000763_k1 = 1000 substance;
  re0000000764: elRS70SAGGU0002_fMettRNAfMetCAU + IF3 => RS70S_IF3_fMettRNAfMetCAU_mRNA; re0000000764_k1*elRS70SAGGU0002_fMettRNAfMetCAU*IF3;
    re0000000764_k1 = 0 substance;
  re0000000765: RS70S_IF1_fMettRNAfMetCAU_mRNA => elRS70SAGGU0002_fMettRNAfMetCAU + IF1; re0000000765_k1*RS70S_IF1_fMettRNAfMetCAU_mRNA;
    re0000000765_k1 = 1000 substance;
  re0000000766: elRS70SAGGU0002_fMettRNAfMetCAU + IF1 => RS70S_IF1_fMettRNAfMetCAU_mRNA; re0000000766_k1*elRS70SAGGU0002_fMettRNAfMetCAU*IF1;
    re0000000766_k1 = 0 substance;
  re0000000767: RS70S_IF2_GDP_fMettRNAfMetCAU_mRNA => RS30S_degraded + RS50S + GDP + mRNA + fMettRNAfMetCAU + IF2; re0000000767_k1*RS70S_IF2_GDP_fMettRNAfMetCAU_mRNA;
    re0000000767_k1 = 0 substance;
  re0000000768: RS70S_IF2_GDP_fMettRNAfMetCAU_mRNA => IF2_degraded + mRNA + GDP + fMettRNAfMetCAU + RS50S + RS30S; re0000000768_k1*RS70S_IF2_GDP_fMettRNAfMetCAU_mRNA;
    re0000000768_k1 = 0 substance;
  re0000000769: RS70S_IF2_GDP_fMettRNAfMetCAU_mRNA => RS50S_degraded + mRNA + IF2 + GDP + fMettRNAfMetCAU + RS30S; re0000000769_k1*RS70S_IF2_GDP_fMettRNAfMetCAU_mRNA;
    re0000000769_k1 = 0 substance;
  re0000000770: RS70S_IF3_fMettRNAfMetCAU_mRNA => RS30S_degraded + RS50S + mRNA + fMettRNAfMetCAU + IF3; re0000000770_k1*RS70S_IF3_fMettRNAfMetCAU_mRNA;
    re0000000770_k1 = 0 substance;
  re0000000771: RS70S_IF3_fMettRNAfMetCAU_mRNA => RS50S_degraded + mRNA + fMettRNAfMetCAU + RS30S + IF3; re0000000771_k1*RS70S_IF3_fMettRNAfMetCAU_mRNA;
    re0000000771_k1 = 0 substance;
  re0000000772: RS70S_IF3_fMettRNAfMetCAU_mRNA => IF3_degraded + RS50S + RS30S + mRNA + fMettRNAfMetCAU; re0000000772_k1*RS70S_IF3_fMettRNAfMetCAU_mRNA;
    re0000000772_k1 = 0 substance;
  re0000000773: RS70S_IF1_IF3_fMettRNAfMetCAU_mRNA => RS30S_degraded + RS50S + mRNA + fMettRNAfMetCAU + IF3 + IF1; re0000000773_k1*RS70S_IF1_IF3_fMettRNAfMetCAU_mRNA;
    re0000000773_k1 = 0 substance;
  re0000000774: RS70S_IF1_IF3_fMettRNAfMetCAU_mRNA => RS50S_degraded + mRNA + fMettRNAfMetCAU + RS30S + IF3 + IF1; re0000000774_k1*RS70S_IF1_IF3_fMettRNAfMetCAU_mRNA;
    re0000000774_k1 = 0 substance;
  re0000000775: RS70S_IF1_IF3_fMettRNAfMetCAU_mRNA => IF1_degraded + mRNA + fMettRNAfMetCAU + RS30S + IF3 + RS50S; re0000000775_k1*RS70S_IF1_IF3_fMettRNAfMetCAU_mRNA;
    re0000000775_k1 = 0 substance;
  re0000000776: RS70S_IF1_IF3_fMettRNAfMetCAU_mRNA => IF3_degraded + RS50S + RS30S + IF1 + mRNA + fMettRNAfMetCAU; re0000000776_k1*RS70S_IF1_IF3_fMettRNAfMetCAU_mRNA;
    re0000000776_k1 = 0 substance;
  re0000000777: RS70S_IF1_fMettRNAfMetCAU_mRNA => RS30S_degraded + RS50S + mRNA + fMettRNAfMetCAU + IF1; re0000000777_k1*RS70S_IF1_fMettRNAfMetCAU_mRNA;
    re0000000777_k1 = 0 substance;
  re0000000778: RS70S_IF1_fMettRNAfMetCAU_mRNA => RS50S_degraded + mRNA + fMettRNAfMetCAU + RS30S + IF1; re0000000778_k1*RS70S_IF1_fMettRNAfMetCAU_mRNA;
    re0000000778_k1 = 0 substance;
  re0000000779: RS70S_IF1_fMettRNAfMetCAU_mRNA => IF1_degraded + mRNA + fMettRNAfMetCAU + RS30S + RS50S; re0000000779_k1*RS70S_IF1_fMettRNAfMetCAU_mRNA;
    re0000000779_k1 = 0 substance;
  re0000000780: RS70S_IF1_IF2_GDP_fMettRNAfMetCAU_mRNA => RS30S_degraded + RS50S + GDP + mRNA + fMettRNAfMetCAU + IF2 + IF1; re0000000780_k1*RS70S_IF1_IF2_GDP_fMettRNAfMetCAU_mRNA;
    re0000000780_k1 = 0 substance;
  re0000000781: RS70S_IF1_IF2_GDP_fMettRNAfMetCAU_mRNA => IF2_degraded + mRNA + GDP + fMettRNAfMetCAU + RS50S + RS30S + IF1; re0000000781_k1*RS70S_IF1_IF2_GDP_fMettRNAfMetCAU_mRNA;
    re0000000781_k1 = 0 substance;
  re0000000782: RS70S_IF1_IF2_GDP_fMettRNAfMetCAU_mRNA => RS50S_degraded + mRNA + IF2 + GDP + fMettRNAfMetCAU + RS30S + IF1; re0000000782_k1*RS70S_IF1_IF2_GDP_fMettRNAfMetCAU_mRNA;
    re0000000782_k1 = 0 substance;
  re0000000783: RS70S_IF1_IF2_GDP_fMettRNAfMetCAU_mRNA => IF1_degraded + mRNA + GDP + fMettRNAfMetCAU + IF2 + RS30S + RS50S; re0000000783_k1*RS70S_IF1_IF2_GDP_fMettRNAfMetCAU_mRNA;
    re0000000783_k1 = 0 substance;
  re0000000784: ATP => ADP + PO4; re0000000784_k1*ATP;
    re0000000784_k1 = 0 substance;
  re0000000785: ADP => AMP + PO4; re0000000785_k1*ADP;
    re0000000785_k1 = 0 substance;
  re0000000786: ATP => AMP + PPi; re0000000786_k1*ATP;
    re0000000786_k1 = 0 substance;
  re0000000787: GTP => GDP + PO4; re0000000787_k1*GTP;
    re0000000787_k1 = 0 substance;
  re0000000788: GDP => GMP + PO4; re0000000788_k1*GDP;
    re0000000788_k1 = 0 substance;
  re0000000789: GTP => GMP + PPi; re0000000789_k1*GTP;
    re0000000789_k1 = 0 substance;
  re0000000790: PO4 + ADP => ATP; re0000000790_k1*PO4*ADP;
    re0000000790_k1 = 0 substance;
  re0000000791: AMP + PO4 => ADP; re0000000791_k1*AMP*PO4;
    re0000000791_k1 = 0 substance;
  re0000000792: AMP + PPi => ATP; re0000000792_k1*AMP*PPi;
    re0000000792_k1 = 0 substance;
  re0000000793: PO4 + GDP => GTP; re0000000793_k1*PO4*GDP;
    re0000000793_k1 = 0 substance;
  re0000000794: GMP + PO4 => GDP; re0000000794_k1*GMP*PO4;
    re0000000794_k1 = 0 substance;
  re0000000795: GMP + PPi => GTP; re0000000795_k1*GMP*PPi;
    re0000000795_k1 = 0 substance;
  re0000000796: elRS70SAUAA0004_Pept0003tRNAGlyGCC + RF1 => elRS70SAUAA0004_Pept0003tRNAGlyGCC_RF1; re0000000796_k1*elRS70SAUAA0004_Pept0003tRNAGlyGCC*RF1;
    re0000000796_k1 = 60 substance;
  re0000000797: elRS70SAUAA0004_Pept0003tRNAGlyGCC_RF1 => elRS70SAUAA0004_Pept0003tRNAGlyGCC + RF1; re0000000797_k1*elRS70SAUAA0004_Pept0003tRNAGlyGCC_RF1;
    re0000000797_k1 = 0.0028 substance;
  re0000000798: elRS70SAUAA0004_Pept0003tRNAGlyGCC_RF1 => termRS70SUAA0004_tRNAGlyGCC_RF1 + Pept0003; re0000000798_k1*elRS70SAUAA0004_Pept0003tRNAGlyGCC_RF1;
    re0000000798_k1 = 0.5 substance;
  re0000000799: termRS70SUAA0004_tRNAGlyGCC_RF1 => termRS70SUAA0004_tRNAGlyGCC + RF1; re0000000799_k1*termRS70SUAA0004_tRNAGlyGCC_RF1;
    re0000000799_k1 = 0.0028 substance;
  re0000000800: termRS70SUAA0004_tRNAGlyGCC + RF1 => termRS70SUAA0004_tRNAGlyGCC_RF1; re0000000800_k1*termRS70SUAA0004_tRNAGlyGCC*RF1;
    re0000000800_k1 = 60 substance;
  re0000000801: elRS70SAUAA0004_Pept0003tRNAGlyGCC_RF1 => RS30S_degraded + mRNA + Pept0003tRNAGlyGCC + RS50S + RF1; re0000000801_k1*elRS70SAUAA0004_Pept0003tRNAGlyGCC_RF1;
    re0000000801_k1 = 0 substance;
  re0000000802: elRS70SAUAA0004_Pept0003tRNAGlyGCC_RF1 => RS50S_degraded + mRNA + Pept0003tRNAGlyGCC + RS30S + RF1; re0000000802_k1*elRS70SAUAA0004_Pept0003tRNAGlyGCC_RF1;
    re0000000802_k1 = 0 substance;
  re0000000803: RF1 => RF1_degraded; re0000000803_k1*RF1;
    re0000000803_k1 = 0 substance;
  re0000000804: elRS70SAUAA0004_Pept0003tRNAGlyGCC_RF1 => RF1_degraded + RS50S + RS30S + mRNA + Pept0003tRNAGlyGCC; re0000000804_k1*elRS70SAUAA0004_Pept0003tRNAGlyGCC_RF1;
    re0000000804_k1 = 0 substance;
  re0000000805: termRS70SUAA0004_tRNAGlyGCC_RF1 => RS30S_degraded + mRNA + tRNAGlyGCC + RS50S + RF1; re0000000805_k1*termRS70SUAA0004_tRNAGlyGCC_RF1;
    re0000000805_k1 = 0 substance;
  re0000000806: termRS70SUAA0004_tRNAGlyGCC_RF1 => RS50S_degraded + mRNA + tRNAGlyGCC + RS30S + RF1; re0000000806_k1*termRS70SUAA0004_tRNAGlyGCC_RF1;
    re0000000806_k1 = 0 substance;
  re0000000807: termRS70SUAA0004_tRNAGlyGCC_RF1 => RF1_degraded + RS50S + RS30S + mRNA + tRNAGlyGCC; re0000000807_k1*termRS70SUAA0004_tRNAGlyGCC_RF1;
    re0000000807_k1 = 0 substance;
  re0000000808: termRS70SUAA0004_tRNAGlyGCC => RS30S_degraded + mRNA + tRNAGlyGCC + RS50S; re0000000808_k1*termRS70SUAA0004_tRNAGlyGCC;
    re0000000808_k1 = 0 substance;
  re0000000809: termRS70SUAA0004_tRNAGlyGCC => RS50S_degraded + mRNA + tRNAGlyGCC + RS30S; re0000000809_k1*termRS70SUAA0004_tRNAGlyGCC;
    re0000000809_k1 = 0 substance;
  re0000000810: termRS70SUAA0004_tRNAGlyGCC_RF1 + Pept0003 => elRS70SAUAA0004_Pept0003tRNAGlyGCC_RF1; re0000000810_k1*termRS70SUAA0004_tRNAGlyGCC_RF1*Pept0003;
    re0000000810_k1 = 0 substance;
  re0000000811: elRS70SAUAA0004_Pept0003tRNAGlyGCC + RF2 => elRS70SAUAA0004_Pept0003tRNAGlyGCC_RF2; re0000000811_k1*elRS70SAUAA0004_Pept0003tRNAGlyGCC*RF2;
    re0000000811_k1 = 23 substance;
  re0000000812: elRS70SAUAA0004_Pept0003tRNAGlyGCC_RF2 => elRS70SAUAA0004_Pept0003tRNAGlyGCC + RF2; re0000000812_k1*elRS70SAUAA0004_Pept0003tRNAGlyGCC_RF2;
    re0000000812_k1 = 0.016 substance;
  re0000000813: elRS70SAUAA0004_Pept0003tRNAGlyGCC_RF2 => termRS70SUAA0004_tRNAGlyGCC_RF2 + Pept0003; re0000000813_k1*elRS70SAUAA0004_Pept0003tRNAGlyGCC_RF2;
    re0000000813_k1 = 1.5 substance;
  re0000000814: termRS70SUAA0004_tRNAGlyGCC_RF2 => termRS70SUAA0004_tRNAGlyGCC + RF2; re0000000814_k1*termRS70SUAA0004_tRNAGlyGCC_RF2;
    re0000000814_k1 = 0.016 substance;
  re0000000815: termRS70SUAA0004_tRNAGlyGCC + RF2 => termRS70SUAA0004_tRNAGlyGCC_RF2; re0000000815_k1*termRS70SUAA0004_tRNAGlyGCC*RF2;
    re0000000815_k1 = 23 substance;
  re0000000816: elRS70SAUAA0004_Pept0003tRNAGlyGCC_RF2 => RS30S_degraded + mRNA + Pept0003tRNAGlyGCC + RS50S + RF2; re0000000816_k1*elRS70SAUAA0004_Pept0003tRNAGlyGCC_RF2;
    re0000000816_k1 = 0 substance;
  re0000000817: elRS70SAUAA0004_Pept0003tRNAGlyGCC_RF2 => RS50S_degraded + mRNA + Pept0003tRNAGlyGCC + RS30S + RF2; re0000000817_k1*elRS70SAUAA0004_Pept0003tRNAGlyGCC_RF2;
    re0000000817_k1 = 0 substance;
  re0000000818: RF2 => RF2_degraded; re0000000818_k1*RF2;
    re0000000818_k1 = 0 substance;
  re0000000819: elRS70SAUAA0004_Pept0003tRNAGlyGCC_RF2 => RF2_degraded + RS50S + RS30S + mRNA + Pept0003tRNAGlyGCC; re0000000819_k1*elRS70SAUAA0004_Pept0003tRNAGlyGCC_RF2;
    re0000000819_k1 = 0 substance;
  re0000000820: termRS70SUAA0004_tRNAGlyGCC_RF2 => RS30S_degraded + mRNA + tRNAGlyGCC + RS50S + RF2; re0000000820_k1*termRS70SUAA0004_tRNAGlyGCC_RF2;
    re0000000820_k1 = 0 substance;
  re0000000821: termRS70SUAA0004_tRNAGlyGCC_RF2 => RS50S_degraded + mRNA + tRNAGlyGCC + RS30S + RF2; re0000000821_k1*termRS70SUAA0004_tRNAGlyGCC_RF2;
    re0000000821_k1 = 0 substance;
  re0000000822: termRS70SUAA0004_tRNAGlyGCC_RF2 => RF2_degraded + RS50S + RS30S + mRNA + tRNAGlyGCC; re0000000822_k1*termRS70SUAA0004_tRNAGlyGCC_RF2;
    re0000000822_k1 = 0 substance;
  re0000000823: termRS70SUAA0004_tRNAGlyGCC_RF2 + Pept0003 => elRS70SAUAA0004_Pept0003tRNAGlyGCC_RF2; re0000000823_k1*termRS70SUAA0004_tRNAGlyGCC_RF2*Pept0003;
    re0000000823_k1 = 0 substance;
  re0000000824: RF3 => RF3_degraded; re0000000824_k1*RF3;
    re0000000824_k1 = 0 substance;
  re0000000825: RF3_GDP => GDP + RF3; re0000000825_k1*RF3_GDP;
    re0000000825_k1 = 0.032 substance;
  re0000000826: RF3 + GDP => RF3_GDP; re0000000826_k1*RF3*GDP;
    re0000000826_k1 = 5.82 substance;
  re0000000827: RF3 + GTP => RF3_GTP; re0000000827_k1*RF3*GTP;
    re0000000827_k1 = 10 substance;
  re0000000828: RF3_GTP => RF3 + GTP; re0000000828_k1*RF3_GTP;
    re0000000828_k1 = 25 substance;
  re0000000829: RF3_GDP + termRS70SUAA0004_tRNAGlyGCC_RF1 => termRS70SUAA0004_tRNAGlyGCC_RF1_RF3_GDP; re0000000829_k1*RF3_GDP*termRS70SUAA0004_tRNAGlyGCC_RF1;
    re0000000829_k1 = 30 substance;
  re0000000830: termRS70SUAA0004_tRNAGlyGCC_RF1_RF3_GDP => termRS70SUAA0004_tRNAGlyGCC_RF1 + RF3_GDP; re0000000830_k1*termRS70SUAA0004_tRNAGlyGCC_RF1_RF3_GDP;
    re0000000830_k1 = 25 substance;
  re0000000831: termRS70SUAA0004_tRNAGlyGCC_RF1 + RF3_GTP => termRS70SUAA0004_tRNAGlyGCC_RF1_RF3_GTP; re0000000831_k1*termRS70SUAA0004_tRNAGlyGCC_RF1*RF3_GTP;
    re0000000831_k1 = 30 substance;
  re0000000832: termRS70SUAA0004_tRNAGlyGCC_RF1_RF3_GTP => termRS70SUAA0004_tRNAGlyGCC_RF1 + RF3_GTP; re0000000832_k1*termRS70SUAA0004_tRNAGlyGCC_RF1_RF3_GTP;
    re0000000832_k1 = 25 substance;
  re0000000833: termRS70SUAA0004_tRNAGlyGCC_RF1 + RF3 => termRS70SUAA0004_tRNAGlyGCC_RF1_RF3; re0000000833_k1*termRS70SUAA0004_tRNAGlyGCC_RF1*RF3;
    re0000000833_k1 = 30 substance;
  re0000000834: termRS70SUAA0004_tRNAGlyGCC_RF1_RF3 => termRS70SUAA0004_tRNAGlyGCC_RF1 + RF3; re0000000834_k1*termRS70SUAA0004_tRNAGlyGCC_RF1_RF3;
    re0000000834_k1 = 25 substance;
  re0000000835: termRS70SUAA0004_tRNAGlyGCC_RF1_RF3_GTP => RS30S_degraded + mRNA + RF1 + tRNAGlyGCC + RS50S + RF3 + GTP; re0000000835_k1*termRS70SUAA0004_tRNAGlyGCC_RF1_RF3_GTP;
    re0000000835_k1 = 0 substance;
  re0000000836: termRS70SUAA0004_tRNAGlyGCC_RF1_RF3_GTP => RS50S_degraded + mRNA + RF1 + tRNAGlyGCC + RS30S + RF3 + GTP; re0000000836_k1*termRS70SUAA0004_tRNAGlyGCC_RF1_RF3_GTP;
    re0000000836_k1 = 0 substance;
  re0000000837: termRS70SUAA0004_tRNAGlyGCC_RF1_RF3_GTP => RF1_degraded + RS50S + RS30S + tRNAGlyGCC + mRNA + GTP + RF3; re0000000837_k1*termRS70SUAA0004_tRNAGlyGCC_RF1_RF3_GTP;
    re0000000837_k1 = 0 substance;
  re0000000838: termRS70SUAA0004_tRNAGlyGCC_RF1_RF3_GTP => termRS70SUAA0004_tRNAGlyGCC_RF3_GTP + RF1; re0000000838_k1*termRS70SUAA0004_tRNAGlyGCC_RF1_RF3_GTP;
    re0000000838_k1 = 0.3 substance;
  re0000000839: termRS70SUAA0004_tRNAGlyGCC_RF3_GTP + RF1 => termRS70SUAA0004_tRNAGlyGCC_RF1_RF3_GTP; re0000000839_k1*termRS70SUAA0004_tRNAGlyGCC_RF3_GTP*RF1;
    re0000000839_k1 = 60 substance;
  re0000000840: termRS70SUAA0004_tRNAGlyGCC_RF3_GTP => termRS70SUAA0004_tRNAGlyGCC_RF3_GDP_PO4; re0000000840_k1*termRS70SUAA0004_tRNAGlyGCC_RF3_GTP;
    re0000000840_k1 = 31 substance;
  re0000000841: termRS70SUAA0004_tRNAGlyGCC_RF3_GDP_PO4 => termRS70SUAA0004_tRNAGlyGCC_RF3_GTP; re0000000841_k1*termRS70SUAA0004_tRNAGlyGCC_RF3_GDP_PO4;
    re0000000841_k1 = 5 substance;
  re0000000842: termRS70SUAA0004_tRNAGlyGCC_RF3_GDP_PO4 => termRS70SUAA0004_tRNAGlyGCC_RF3_GDP + PO4; re0000000842_k1*termRS70SUAA0004_tRNAGlyGCC_RF3_GDP_PO4;
    re0000000842_k1 = 5 substance;
  re0000000843: termRS70SUAA0004_tRNAGlyGCC_RF1_RF3_GDP => termRS70SUAA0004_tRNAGlyGCC_RF1_RF3 + GDP; re0000000843_k1*termRS70SUAA0004_tRNAGlyGCC_RF1_RF3_GDP;
    re0000000843_k1 = 10.5 substance;
  re0000000844: termRS70SUAA0004_tRNAGlyGCC_RF1_RF3 + GDP => termRS70SUAA0004_tRNAGlyGCC_RF1_RF3_GDP; re0000000844_k1*termRS70SUAA0004_tRNAGlyGCC_RF1_RF3*GDP;
    re0000000844_k1 = 5.82 substance;
  re0000000845: termRS70SUAA0004_tRNAGlyGCC_RF1_RF3_GTP => termRS70SUAA0004_tRNAGlyGCC_RF1_RF3 + GTP; re0000000845_k1*termRS70SUAA0004_tRNAGlyGCC_RF1_RF3_GTP;
    re0000000845_k1 = 10 substance;
  re0000000846: termRS70SUAA0004_tRNAGlyGCC_RF1_RF3 + GTP => termRS70SUAA0004_tRNAGlyGCC_RF1_RF3_GTP; re0000000846_k1*termRS70SUAA0004_tRNAGlyGCC_RF1_RF3*GTP;
    re0000000846_k1 = 25 substance;
  re0000000847: termRS70SUAA0004_tRNAGlyGCC_RF3_GDP => termRS70SUAA0004_tRNAGlyGCC + RF3_GDP; re0000000847_k1*termRS70SUAA0004_tRNAGlyGCC_RF3_GDP;
    re0000000847_k1 = 1000 substance;
  re0000000848: RF3_GDP => RF3_degraded + GDP; re0000000848_k1*RF3_GDP;
    re0000000848_k1 = 0 substance;
  re0000000849: RF3_GTP => RF3_degraded + GTP; re0000000849_k1*RF3_GTP;
    re0000000849_k1 = 0 substance;
  re0000000850: termRS70SUAA0004_tRNAGlyGCC_RF1_RF3_GTP => RF3_degraded + mRNA + tRNAGlyGCC + RF1 + RS30S + RS50S + GTP; re0000000850_k1*termRS70SUAA0004_tRNAGlyGCC_RF1_RF3_GTP;
    re0000000850_k1 = 0 substance;
  re0000000851: termRS70SUAA0004_tRNAGlyGCC_RF1_RF3_GDP => RS30S_degraded + mRNA + RF1 + tRNAGlyGCC + RS50S + RF3 + GDP; re0000000851_k1*termRS70SUAA0004_tRNAGlyGCC_RF1_RF3_GDP;
    re0000000851_k1 = 0 substance;
  re0000000852: termRS70SUAA0004_tRNAGlyGCC_RF1_RF3_GDP => RS50S_degraded + mRNA + RF1 + tRNAGlyGCC + RS30S + RF3 + GDP; re0000000852_k1*termRS70SUAA0004_tRNAGlyGCC_RF1_RF3_GDP;
    re0000000852_k1 = 0 substance;
  re0000000853: termRS70SUAA0004_tRNAGlyGCC_RF1_RF3_GDP => RF1_degraded + RS50S + RS30S + tRNAGlyGCC + mRNA + GDP + RF3; re0000000853_k1*termRS70SUAA0004_tRNAGlyGCC_RF1_RF3_GDP;
    re0000000853_k1 = 0 substance;
  re0000000854: termRS70SUAA0004_tRNAGlyGCC_RF1_RF3_GDP => RF3_degraded + mRNA + tRNAGlyGCC + RF1 + RS30S + RS50S + GDP; re0000000854_k1*termRS70SUAA0004_tRNAGlyGCC_RF1_RF3_GDP;
    re0000000854_k1 = 0 substance;
  re0000000855: termRS70SUAA0004_tRNAGlyGCC_RF1_RF3 => RS30S_degraded + mRNA + RF1 + tRNAGlyGCC + RS50S + RF3; re0000000855_k1*termRS70SUAA0004_tRNAGlyGCC_RF1_RF3;
    re0000000855_k1 = 0 substance;
  re0000000856: termRS70SUAA0004_tRNAGlyGCC_RF1_RF3 => RS50S_degraded + mRNA + RF1 + tRNAGlyGCC + RS30S + RF3; re0000000856_k1*termRS70SUAA0004_tRNAGlyGCC_RF1_RF3;
    re0000000856_k1 = 0 substance;
  re0000000857: termRS70SUAA0004_tRNAGlyGCC_RF1_RF3 => RF1_degraded + RS50S + RS30S + tRNAGlyGCC + mRNA + RF3; re0000000857_k1*termRS70SUAA0004_tRNAGlyGCC_RF1_RF3;
    re0000000857_k1 = 0 substance;
  re0000000858: termRS70SUAA0004_tRNAGlyGCC_RF1_RF3 => RF3_degraded + mRNA + tRNAGlyGCC + RF1 + RS30S + RS50S; re0000000858_k1*termRS70SUAA0004_tRNAGlyGCC_RF1_RF3;
    re0000000858_k1 = 0 substance;
  re0000000859: termRS70SUAA0004_tRNAGlyGCC_RF3_GTP => RS30S_degraded + mRNA + tRNAGlyGCC + RS50S + RF3 + GTP; re0000000859_k1*termRS70SUAA0004_tRNAGlyGCC_RF3_GTP;
    re0000000859_k1 = 0 substance;
  re0000000860: termRS70SUAA0004_tRNAGlyGCC_RF3_GTP => RS50S_degraded + mRNA + tRNAGlyGCC + RS30S + RF3 + GTP; re0000000860_k1*termRS70SUAA0004_tRNAGlyGCC_RF3_GTP;
    re0000000860_k1 = 0 substance;
  re0000000861: termRS70SUAA0004_tRNAGlyGCC_RF3_GTP => RF3_degraded + RS50S + RS30S + tRNAGlyGCC + mRNA + GTP; re0000000861_k1*termRS70SUAA0004_tRNAGlyGCC_RF3_GTP;
    re0000000861_k1 = 0 substance;
  re0000000862: termRS70SUAA0004_tRNAGlyGCC_RF3_GDP_PO4 => RS30S_degraded + mRNA + tRNAGlyGCC + RS50S + RF3 + GDP + PO4; re0000000862_k1*termRS70SUAA0004_tRNAGlyGCC_RF3_GDP_PO4;
    re0000000862_k1 = 0 substance;
  re0000000863: termRS70SUAA0004_tRNAGlyGCC_RF3_GDP_PO4 => RS50S_degraded + mRNA + tRNAGlyGCC + RS30S + RF3 + GDP + PO4; re0000000863_k1*termRS70SUAA0004_tRNAGlyGCC_RF3_GDP_PO4;
    re0000000863_k1 = 0 substance;
  re0000000864: termRS70SUAA0004_tRNAGlyGCC_RF3_GDP_PO4 => RF3_degraded + RS50S + RS30S + tRNAGlyGCC + mRNA + GDP + PO4; re0000000864_k1*termRS70SUAA0004_tRNAGlyGCC_RF3_GDP_PO4;
    re0000000864_k1 = 0 substance;
  re0000000865: termRS70SUAA0004_tRNAGlyGCC_RF3_GDP => RS30S_degraded + mRNA + tRNAGlyGCC + RS50S + RF3 + GDP; re0000000865_k1*termRS70SUAA0004_tRNAGlyGCC_RF3_GDP;
    re0000000865_k1 = 0 substance;
  re0000000866: termRS70SUAA0004_tRNAGlyGCC_RF3_GDP => RS50S_degraded + mRNA + tRNAGlyGCC + RS30S + RF3 + GDP; re0000000866_k1*termRS70SUAA0004_tRNAGlyGCC_RF3_GDP;
    re0000000866_k1 = 0 substance;
  re0000000867: termRS70SUAA0004_tRNAGlyGCC_RF3_GDP => RF3_degraded + RS50S + RS30S + tRNAGlyGCC + mRNA + GDP; re0000000867_k1*termRS70SUAA0004_tRNAGlyGCC_RF3_GDP;
    re0000000867_k1 = 0 substance;
  re0000000868: termRS70SUAA0004_tRNAGlyGCC_RF3_GDP + PO4 => termRS70SUAA0004_tRNAGlyGCC_RF3_GDP_PO4; re0000000868_k1*termRS70SUAA0004_tRNAGlyGCC_RF3_GDP*PO4;
    re0000000868_k1 = 0 substance;
  re0000000869: RF3_GDP + termRS70SUAA0004_tRNAGlyGCC => termRS70SUAA0004_tRNAGlyGCC_RF3_GDP; re0000000869_k1*RF3_GDP*termRS70SUAA0004_tRNAGlyGCC;
    re0000000869_k1 = 0 substance;
  re0000000870: RF3_GDP + termRS70SUAA0004_tRNAGlyGCC_RF2 => termRS70SUAA0004_tRNAGlyGCC_RF2_RF3_GDP; re0000000870_k1*RF3_GDP*termRS70SUAA0004_tRNAGlyGCC_RF2;
    re0000000870_k1 = 30 substance;
  re0000000871: termRS70SUAA0004_tRNAGlyGCC_RF2_RF3_GDP => termRS70SUAA0004_tRNAGlyGCC_RF2 + RF3_GDP; re0000000871_k1*termRS70SUAA0004_tRNAGlyGCC_RF2_RF3_GDP;
    re0000000871_k1 = 25 substance;
  re0000000872: termRS70SUAA0004_tRNAGlyGCC_RF2 + RF3_GTP => termRS70SUAA0004_tRNAGlyGCC_RF2_RF3_GTP; re0000000872_k1*termRS70SUAA0004_tRNAGlyGCC_RF2*RF3_GTP;
    re0000000872_k1 = 30 substance;
  re0000000873: termRS70SUAA0004_tRNAGlyGCC_RF2_RF3_GTP => termRS70SUAA0004_tRNAGlyGCC_RF2 + RF3_GTP; re0000000873_k1*termRS70SUAA0004_tRNAGlyGCC_RF2_RF3_GTP;
    re0000000873_k1 = 25 substance;
  re0000000874: termRS70SUAA0004_tRNAGlyGCC_RF2 + RF3 => termRS70SUAA0004_tRNAGlyGCC_RF2_RF3; re0000000874_k1*termRS70SUAA0004_tRNAGlyGCC_RF2*RF3;
    re0000000874_k1 = 30 substance;
  re0000000875: termRS70SUAA0004_tRNAGlyGCC_RF2_RF3 => termRS70SUAA0004_tRNAGlyGCC_RF2 + RF3; re0000000875_k1*termRS70SUAA0004_tRNAGlyGCC_RF2_RF3;
    re0000000875_k1 = 25 substance;
  re0000000876: termRS70SUAA0004_tRNAGlyGCC_RF2_RF3_GTP => RS30S_degraded + mRNA + RF2 + tRNAGlyGCC + RS50S + RF3 + GTP; re0000000876_k1*termRS70SUAA0004_tRNAGlyGCC_RF2_RF3_GTP;
    re0000000876_k1 = 0 substance;
  re0000000877: termRS70SUAA0004_tRNAGlyGCC_RF2_RF3_GTP => RS50S_degraded + mRNA + RF2 + tRNAGlyGCC + RS30S + RF3 + GTP; re0000000877_k1*termRS70SUAA0004_tRNAGlyGCC_RF2_RF3_GTP;
    re0000000877_k1 = 0 substance;
  re0000000878: termRS70SUAA0004_tRNAGlyGCC_RF2_RF3_GTP => RF2_degraded + RS50S + RS30S + tRNAGlyGCC + mRNA + GTP + RF3; re0000000878_k1*termRS70SUAA0004_tRNAGlyGCC_RF2_RF3_GTP;
    re0000000878_k1 = 0 substance;
  re0000000879: termRS70SUAA0004_tRNAGlyGCC_RF2_RF3_GTP => termRS70SUAA0004_tRNAGlyGCC_RF3_GTP + RF2; re0000000879_k1*termRS70SUAA0004_tRNAGlyGCC_RF2_RF3_GTP;
    re0000000879_k1 = 0.77 substance;
  re0000000880: termRS70SUAA0004_tRNAGlyGCC_RF3_GTP + RF2 => termRS70SUAA0004_tRNAGlyGCC_RF2_RF3_GTP; re0000000880_k1*termRS70SUAA0004_tRNAGlyGCC_RF3_GTP*RF2;
    re0000000880_k1 = 23 substance;
  re0000000881: termRS70SUAA0004_tRNAGlyGCC_RF2_RF3_GDP => termRS70SUAA0004_tRNAGlyGCC_RF2_RF3 + GDP; re0000000881_k1*termRS70SUAA0004_tRNAGlyGCC_RF2_RF3_GDP;
    re0000000881_k1 = 10.5 substance;
  re0000000882: termRS70SUAA0004_tRNAGlyGCC_RF2_RF3 + GDP => termRS70SUAA0004_tRNAGlyGCC_RF2_RF3_GDP; re0000000882_k1*termRS70SUAA0004_tRNAGlyGCC_RF2_RF3*GDP;
    re0000000882_k1 = 5.82 substance;
  re0000000883: termRS70SUAA0004_tRNAGlyGCC_RF2_RF3_GTP => termRS70SUAA0004_tRNAGlyGCC_RF2_RF3 + GTP; re0000000883_k1*termRS70SUAA0004_tRNAGlyGCC_RF2_RF3_GTP;
    re0000000883_k1 = 10 substance;
  re0000000884: termRS70SUAA0004_tRNAGlyGCC_RF2_RF3 + GTP => termRS70SUAA0004_tRNAGlyGCC_RF2_RF3_GTP; re0000000884_k1*termRS70SUAA0004_tRNAGlyGCC_RF2_RF3*GTP;
    re0000000884_k1 = 25 substance;
  re0000000885: termRS70SUAA0004_tRNAGlyGCC_RF2_RF3_GTP => RF3_degraded + mRNA + tRNAGlyGCC + RF2 + RS30S + RS50S + GTP; re0000000885_k1*termRS70SUAA0004_tRNAGlyGCC_RF2_RF3_GTP;
    re0000000885_k1 = 0 substance;
  re0000000886: termRS70SUAA0004_tRNAGlyGCC_RF2_RF3_GDP => RS30S_degraded + mRNA + RF2 + tRNAGlyGCC + RS50S + RF3 + GDP; re0000000886_k1*termRS70SUAA0004_tRNAGlyGCC_RF2_RF3_GDP;
    re0000000886_k1 = 0 substance;
  re0000000887: termRS70SUAA0004_tRNAGlyGCC_RF2_RF3_GDP => RS50S_degraded + mRNA + RF2 + tRNAGlyGCC + RS30S + RF3 + GDP; re0000000887_k1*termRS70SUAA0004_tRNAGlyGCC_RF2_RF3_GDP;
    re0000000887_k1 = 0 substance;
  re0000000888: termRS70SUAA0004_tRNAGlyGCC_RF2_RF3_GDP => RF2_degraded + RS50S + RS30S + tRNAGlyGCC + mRNA + GDP + RF3; re0000000888_k1*termRS70SUAA0004_tRNAGlyGCC_RF2_RF3_GDP;
    re0000000888_k1 = 0 substance;
  re0000000889: termRS70SUAA0004_tRNAGlyGCC_RF2_RF3_GDP => RF3_degraded + mRNA + tRNAGlyGCC + RF2 + RS30S + RS50S + GDP; re0000000889_k1*termRS70SUAA0004_tRNAGlyGCC_RF2_RF3_GDP;
    re0000000889_k1 = 0 substance;
  re0000000890: termRS70SUAA0004_tRNAGlyGCC_RF2_RF3 => RS30S_degraded + mRNA + RF2 + tRNAGlyGCC + RS50S + RF3; re0000000890_k1*termRS70SUAA0004_tRNAGlyGCC_RF2_RF3;
    re0000000890_k1 = 0 substance;
  re0000000891: termRS70SUAA0004_tRNAGlyGCC_RF2_RF3 => RS50S_degraded + mRNA + RF2 + tRNAGlyGCC + RS30S + RF3; re0000000891_k1*termRS70SUAA0004_tRNAGlyGCC_RF2_RF3;
    re0000000891_k1 = 0 substance;
  re0000000892: termRS70SUAA0004_tRNAGlyGCC_RF2_RF3 => RF2_degraded + RS50S + RS30S + tRNAGlyGCC + mRNA + RF3; re0000000892_k1*termRS70SUAA0004_tRNAGlyGCC_RF2_RF3;
    re0000000892_k1 = 0 substance;
  re0000000893: termRS70SUAA0004_tRNAGlyGCC_RF2_RF3 => RF3_degraded + mRNA + tRNAGlyGCC + RF2 + RS30S + RS50S; re0000000893_k1*termRS70SUAA0004_tRNAGlyGCC_RF2_RF3;
    re0000000893_k1 = 0 substance;
  re0000000894: RRF => RRF_degraded; re0000000894_k1*RRF;
    re0000000894_k1 = 0 substance;
  re0000000895: termRS70SUAA0004_tRNAGlyGCC_RRF + EFG_GTP => termRS70SUAA0004_tRNAGlyGCC_RRF_EFG_GTP; re0000000895_k1*termRS70SUAA0004_tRNAGlyGCC_RRF*EFG_GTP;
    re0000000895_k1 = 31 substance;
  re0000000896: termRS70SUAA0004_tRNAGlyGCC_RRF_EFG_GTP => termRS70SUAA0004_tRNAGlyGCC_RRF + EFG_GTP; re0000000896_k1*termRS70SUAA0004_tRNAGlyGCC_RRF_EFG_GTP;
    re0000000896_k1 = 2.4 substance;
  re0000000897: termRS70SUAA0004_tRNAGlyGCC_RRF_EFG_GTP => RS30S_degraded + mRNA + RRF + tRNAGlyGCC + RS50S + EFG + GTP; re0000000897_k1*termRS70SUAA0004_tRNAGlyGCC_RRF_EFG_GTP;
    re0000000897_k1 = 0 substance;
  re0000000898: termRS70SUAA0004_tRNAGlyGCC_RRF_EFG_GTP => RS50S_degraded + mRNA + RRF + tRNAGlyGCC + RS30S + EFG + GTP; re0000000898_k1*termRS70SUAA0004_tRNAGlyGCC_RRF_EFG_GTP;
    re0000000898_k1 = 0 substance;
  re0000000899: termRS70SUAA0004_tRNAGlyGCC_RRF_EFG_GTP => RRF_degraded + RS50S + RS30S + tRNAGlyGCC + mRNA + GTP + EFG; re0000000899_k1*termRS70SUAA0004_tRNAGlyGCC_RRF_EFG_GTP;
    re0000000899_k1 = 0 substance;
  re0000000900: termRS70SUAA0004_tRNAGlyGCC_RRF_EFG_GTP => termRS70SUAA0004_tRNAGlyGCC_EFG_GTP + RRF; re0000000900_k1*termRS70SUAA0004_tRNAGlyGCC_RRF_EFG_GTP;
    re0000000900_k1 = 0.6 substance;
  re0000000901: termRS70SUAA0004_tRNAGlyGCC_EFG_GTP + RRF => termRS70SUAA0004_tRNAGlyGCC_RRF_EFG_GTP; re0000000901_k1*termRS70SUAA0004_tRNAGlyGCC_EFG_GTP*RRF;
    re0000000901_k1 = 3.1 substance;
  re0000000902: termRS70SUAA0004_tRNAGlyGCC_RRF_EFG_GDP_PO4 => termRS70SUAA0004_tRNAGlyGCC_RRF_EFG_GDP + PO4; re0000000902_k1*termRS70SUAA0004_tRNAGlyGCC_RRF_EFG_GDP_PO4;
    re0000000902_k1 = 5 substance;
  re0000000903: termRS70SUAA0004_tRNAGlyGCC_RRF_EFG_GTP => EFG_degraded + mRNA + tRNAGlyGCC + RRF + RS30S + RS50S + GTP; re0000000903_k1*termRS70SUAA0004_tRNAGlyGCC_RRF_EFG_GTP;
    re0000000903_k1 = 0 substance;
  re0000000904: termRS70SUAA0004_tRNAGlyGCC + RRF => termRS70SUAA0004_tRNAGlyGCC_RRF; re0000000904_k1*termRS70SUAA0004_tRNAGlyGCC*RRF;
    re0000000904_k1 = 3.1 substance;
  re0000000905: termRS70SUAA0004_tRNAGlyGCC_RRF => termRS70SUAA0004_tRNAGlyGCC + RRF; re0000000905_k1*termRS70SUAA0004_tRNAGlyGCC_RRF;
    re0000000905_k1 = 0.6 substance;
  re0000000906: termRS70SUAA0004_tRNAGlyGCC + EFG_GTP => termRS70SUAA0004_tRNAGlyGCC_EFG_GTP; re0000000906_k1*termRS70SUAA0004_tRNAGlyGCC*EFG_GTP;
    re0000000906_k1 = 31 substance;
  re0000000907: termRS70SUAA0004_tRNAGlyGCC_EFG_GTP => termRS70SUAA0004_tRNAGlyGCC + EFG_GTP; re0000000907_k1*termRS70SUAA0004_tRNAGlyGCC_EFG_GTP;
    re0000000907_k1 = 2.4 substance;
  re0000000908: termRS70SUAA0004_tRNAGlyGCC_RRF_EFG_GTP => termRS70SUAA0004_tRNAGlyGCC_RRF_EFG_GDP_PO4; re0000000908_k1*termRS70SUAA0004_tRNAGlyGCC_RRF_EFG_GTP;
    re0000000908_k1 = 31 substance;
  re0000000909: termRS70SUAA0004_tRNAGlyGCC_RRF_EFG_GDP_PO4 => termRS70SUAA0004_tRNAGlyGCC_RRF_EFG_GTP; re0000000909_k1*termRS70SUAA0004_tRNAGlyGCC_RRF_EFG_GDP_PO4;
    re0000000909_k1 = 5 substance;
  re0000000910: termRS70SUAA0004_tRNAGlyGCC_RRF_EFG_GDP => RS50S_tRNAGlyGCC_RRF_EFG_GDP + termRS30S_mRNA; re0000000910_k1*termRS70SUAA0004_tRNAGlyGCC_RRF_EFG_GDP;
    re0000000910_k1 = 1000 substance;
  re0000000911: termRS30S_mRNA => RS30S + mRNA; re0000000911_k1*termRS30S_mRNA;
    re0000000911_k1 = 1000 substance;
  re0000000912: RS30S + mRNA => termRS30S_mRNA; re0000000912_k1*RS30S*mRNA;
    re0000000912_k1 = 0 substance;
  re0000000913: RS50S_tRNAGlyGCC_RRF_EFG_GDP => RS50S_tRNAGlyGCC_RRF + EFG_GDP; re0000000913_k1*RS50S_tRNAGlyGCC_RRF_EFG_GDP;
    re0000000913_k1 = 1000 substance;
  re0000000914: RS50S_tRNAGlyGCC_RRF_EFG_GDP => RS50S_tRNAGlyGCC_EFG_GDP + RRF; re0000000914_k1*RS50S_tRNAGlyGCC_RRF_EFG_GDP;
    re0000000914_k1 = 1000 substance;
  re0000000915: RS50S_tRNAGlyGCC_RRF_EFG_GDP => RS50S_RRF_EFG_GDP + tRNAGlyGCC; re0000000915_k1*RS50S_tRNAGlyGCC_RRF_EFG_GDP;
    re0000000915_k1 = 1000 substance;
  re0000000916: RS50S_tRNAGlyGCC_RRF => RS50S_RRF + tRNAGlyGCC; re0000000916_k1*RS50S_tRNAGlyGCC_RRF;
    re0000000916_k1 = 1000 substance;
  re0000000917: RS50S_tRNAGlyGCC_RRF => RS50S_tRNAGlyGCC + RRF; re0000000917_k1*RS50S_tRNAGlyGCC_RRF;
    re0000000917_k1 = 1000 substance;
  re0000000918: RS50S_RRF => RS50S + RRF; re0000000918_k1*RS50S_RRF;
    re0000000918_k1 = 1000 substance;
  re0000000919: RS50S_tRNAGlyGCC => tRNAGlyGCC + RS50S; re0000000919_k1*RS50S_tRNAGlyGCC;
    re0000000919_k1 = 1000 substance;
  re0000000920: RS50S_tRNAGlyGCC_EFG_GDP => EFG_GDP + RS50S_tRNAGlyGCC; re0000000920_k1*RS50S_tRNAGlyGCC_EFG_GDP;
    re0000000920_k1 = 1000 substance;
  re0000000921: RS50S_tRNAGlyGCC_EFG_GDP => RS50S_EFG_GDP + tRNAGlyGCC; re0000000921_k1*RS50S_tRNAGlyGCC_EFG_GDP;
    re0000000921_k1 = 1000 substance;
  re0000000922: RS50S_RRF_EFG_GDP => RS50S_RRF + EFG_GDP; re0000000922_k1*RS50S_RRF_EFG_GDP;
    re0000000922_k1 = 1000 substance;
  re0000000923: RS50S_RRF_EFG_GDP => RS50S_EFG_GDP + RRF; re0000000923_k1*RS50S_RRF_EFG_GDP;
    re0000000923_k1 = 1000 substance;
  re0000000924: RS50S_tRNAGlyGCC => RS50S_degraded + tRNAGlyGCC; re0000000924_k1*RS50S_tRNAGlyGCC;
    re0000000924_k1 = 0 substance;
  re0000000925: RS50S_RRF => RS50S_degraded + RRF; re0000000925_k1*RS50S_RRF;
    re0000000925_k1 = 0 substance;
  re0000000926: termRS30S_mRNA => RS30S_degraded + mRNA; re0000000926_k1*termRS30S_mRNA;
    re0000000926_k1 = 0 substance;
  re0000000927: RS50S_tRNAGlyGCC => tRNAGlyGCC_degraded + RS50S; re0000000927_k1*RS50S_tRNAGlyGCC;
    re0000000927_k1 = 0 substance;
  re0000000928: RS50S_RRF => RRF_degraded + RS50S; re0000000928_k1*RS50S_RRF;
    re0000000928_k1 = 0 substance;
  re0000000929: RS50S_tRNAGlyGCC_RRF => tRNAGlyGCC_degraded + RS50S + RRF; re0000000929_k1*RS50S_tRNAGlyGCC_RRF;
    re0000000929_k1 = 0 substance;
  re0000000930: RS50S_tRNAGlyGCC_RRF => RS50S_degraded + RRF + tRNAGlyGCC; re0000000930_k1*RS50S_tRNAGlyGCC_RRF;
    re0000000930_k1 = 0 substance;
  re0000000931: RS50S_tRNAGlyGCC_RRF => RRF_degraded + RS50S + tRNAGlyGCC; re0000000931_k1*RS50S_tRNAGlyGCC_RRF;
    re0000000931_k1 = 0 substance;
  re0000000932: RS50S_tRNAGlyGCC_EFG_GDP => tRNAGlyGCC_degraded + RS50S + EFG + GDP; re0000000932_k1*RS50S_tRNAGlyGCC_EFG_GDP;
    re0000000932_k1 = 0 substance;
  re0000000933: RS50S_tRNAGlyGCC_EFG_GDP => RS50S_degraded + EFG + tRNAGlyGCC + GDP; re0000000933_k1*RS50S_tRNAGlyGCC_EFG_GDP;
    re0000000933_k1 = 0 substance;
  re0000000934: RS50S_tRNAGlyGCC_EFG_GDP => EFG_degraded + RS50S + tRNAGlyGCC + GDP; re0000000934_k1*RS50S_tRNAGlyGCC_EFG_GDP;
    re0000000934_k1 = 0 substance;
  re0000000935: RS50S_RRF_EFG_GDP => RRF_degraded + RS50S + EFG + GDP; re0000000935_k1*RS50S_RRF_EFG_GDP;
    re0000000935_k1 = 0 substance;
  re0000000936: RS50S_RRF_EFG_GDP => RS50S_degraded + EFG + RRF + GDP; re0000000936_k1*RS50S_RRF_EFG_GDP;
    re0000000936_k1 = 0 substance;
  re0000000937: RS50S_RRF_EFG_GDP => EFG_degraded + RS50S + RRF + GDP; re0000000937_k1*RS50S_RRF_EFG_GDP;
    re0000000937_k1 = 0 substance;
  re0000000938: termRS70SUAA0004_tRNAGlyGCC_RRF => RS30S_degraded + mRNA + RRF + tRNAGlyGCC + RS50S; re0000000938_k1*termRS70SUAA0004_tRNAGlyGCC_RRF;
    re0000000938_k1 = 0 substance;
  re0000000939: termRS70SUAA0004_tRNAGlyGCC_RRF => RS50S_degraded + mRNA + RRF + tRNAGlyGCC + RS30S; re0000000939_k1*termRS70SUAA0004_tRNAGlyGCC_RRF;
    re0000000939_k1 = 0 substance;
  re0000000940: termRS70SUAA0004_tRNAGlyGCC_RRF => RRF_degraded + RS50S + RS30S + tRNAGlyGCC + mRNA; re0000000940_k1*termRS70SUAA0004_tRNAGlyGCC_RRF;
    re0000000940_k1 = 0 substance;
  re0000000941: termRS70SUAA0004_tRNAGlyGCC_EFG_GTP => RS30S_degraded + mRNA + tRNAGlyGCC + RS50S + EFG + GTP; re0000000941_k1*termRS70SUAA0004_tRNAGlyGCC_EFG_GTP;
    re0000000941_k1 = 0 substance;
  re0000000942: termRS70SUAA0004_tRNAGlyGCC_EFG_GTP => RS50S_degraded + mRNA + tRNAGlyGCC + RS30S + EFG + GTP; re0000000942_k1*termRS70SUAA0004_tRNAGlyGCC_EFG_GTP;
    re0000000942_k1 = 0 substance;
  re0000000943: termRS70SUAA0004_tRNAGlyGCC_EFG_GTP => EFG_degraded + RS50S + RS30S + tRNAGlyGCC + mRNA + GTP; re0000000943_k1*termRS70SUAA0004_tRNAGlyGCC_EFG_GTP;
    re0000000943_k1 = 0 substance;
  re0000000944: termRS70SUAA0004_tRNAGlyGCC_RRF_EFG_GDP => RS30S_degraded + mRNA + RRF + tRNAGlyGCC + RS50S + EFG + GDP; re0000000944_k1*termRS70SUAA0004_tRNAGlyGCC_RRF_EFG_GDP;
    re0000000944_k1 = 0 substance;
  re0000000945: termRS70SUAA0004_tRNAGlyGCC_RRF_EFG_GDP => RS50S_degraded + mRNA + RRF + tRNAGlyGCC + RS30S + EFG + GDP; re0000000945_k1*termRS70SUAA0004_tRNAGlyGCC_RRF_EFG_GDP;
    re0000000945_k1 = 0 substance;
  re0000000946: termRS70SUAA0004_tRNAGlyGCC_RRF_EFG_GDP => RRF_degraded + RS50S + RS30S + tRNAGlyGCC + mRNA + GDP + EFG; re0000000946_k1*termRS70SUAA0004_tRNAGlyGCC_RRF_EFG_GDP;
    re0000000946_k1 = 0 substance;
  re0000000947: termRS70SUAA0004_tRNAGlyGCC_RRF_EFG_GDP => EFG_degraded + mRNA + tRNAGlyGCC + RRF + RS30S + RS50S + GDP; re0000000947_k1*termRS70SUAA0004_tRNAGlyGCC_RRF_EFG_GDP;
    re0000000947_k1 = 0 substance;
  re0000000948: termRS70SUAA0004_tRNAGlyGCC_RRF_EFG_GDP_PO4 => RS30S_degraded + mRNA + RRF + tRNAGlyGCC + RS50S + EFG + GDP + PO4; re0000000948_k1*termRS70SUAA0004_tRNAGlyGCC_RRF_EFG_GDP_PO4;
    re0000000948_k1 = 0 substance;
  re0000000949: termRS70SUAA0004_tRNAGlyGCC_RRF_EFG_GDP_PO4 => RS50S_degraded + mRNA + RRF + tRNAGlyGCC + RS30S + EFG + GDP + PO4; re0000000949_k1*termRS70SUAA0004_tRNAGlyGCC_RRF_EFG_GDP_PO4;
    re0000000949_k1 = 0 substance;
  re0000000950: termRS70SUAA0004_tRNAGlyGCC_RRF_EFG_GDP_PO4 => RRF_degraded + RS50S + RS30S + tRNAGlyGCC + mRNA + GDP + EFG + PO4; re0000000950_k1*termRS70SUAA0004_tRNAGlyGCC_RRF_EFG_GDP_PO4;
    re0000000950_k1 = 0 substance;
  re0000000951: termRS70SUAA0004_tRNAGlyGCC_RRF_EFG_GDP_PO4 => EFG_degraded + mRNA + tRNAGlyGCC + RRF + RS30S + RS50S + GDP + PO4; re0000000951_k1*termRS70SUAA0004_tRNAGlyGCC_RRF_EFG_GDP_PO4;
    re0000000951_k1 = 0 substance;
  re0000000952: RS50S_tRNAGlyGCC_RRF_EFG_GDP => tRNAGlyGCC_degraded + RS50S + EFG + GDP + RRF; re0000000952_k1*RS50S_tRNAGlyGCC_RRF_EFG_GDP;
    re0000000952_k1 = 0 substance;
  re0000000953: RS50S_tRNAGlyGCC_RRF_EFG_GDP => RS50S_degraded + EFG + tRNAGlyGCC + GDP + RRF; re0000000953_k1*RS50S_tRNAGlyGCC_RRF_EFG_GDP;
    re0000000953_k1 = 0 substance;
  re0000000954: RS50S_tRNAGlyGCC_RRF_EFG_GDP => EFG_degraded + RS50S + tRNAGlyGCC + GDP + RRF; re0000000954_k1*RS50S_tRNAGlyGCC_RRF_EFG_GDP;
    re0000000954_k1 = 0 substance;
  re0000000955: RS50S_tRNAGlyGCC_RRF_EFG_GDP => RRF_degraded + tRNAGlyGCC + EFG + GDP + RS50S; re0000000955_k1*RS50S_tRNAGlyGCC_RRF_EFG_GDP;
    re0000000955_k1 = 0 substance;
  re0000000956: PO4 + termRS70SUAA0004_tRNAGlyGCC_RRF_EFG_GDP => termRS70SUAA0004_tRNAGlyGCC_RRF_EFG_GDP_PO4; re0000000956_k1*PO4*termRS70SUAA0004_tRNAGlyGCC_RRF_EFG_GDP;
    re0000000956_k1 = 0 substance;
  re0000000957: RS50S_tRNAGlyGCC_RRF_EFG_GDP + termRS30S_mRNA => termRS70SUAA0004_tRNAGlyGCC_RRF_EFG_GDP; re0000000957_k1*RS50S_tRNAGlyGCC_RRF_EFG_GDP*termRS30S_mRNA;
    re0000000957_k1 = 0 substance;
  re0000000958: RRF + RS50S_tRNAGlyGCC_EFG_GDP => RS50S_tRNAGlyGCC_RRF_EFG_GDP; re0000000958_k1*RRF*RS50S_tRNAGlyGCC_EFG_GDP;
    re0000000958_k1 = 0 substance;
  re0000000959: EFG_GDP + RS50S_tRNAGlyGCC_RRF => RS50S_tRNAGlyGCC_RRF_EFG_GDP; re0000000959_k1*EFG_GDP*RS50S_tRNAGlyGCC_RRF;
    re0000000959_k1 = 0 substance;
  re0000000960: tRNAGlyGCC + RS50S_RRF_EFG_GDP => RS50S_tRNAGlyGCC_RRF_EFG_GDP; re0000000960_k1*tRNAGlyGCC*RS50S_RRF_EFG_GDP;
    re0000000960_k1 = 0 substance;
  re0000000961: EFG_GDP + RS50S_tRNAGlyGCC => RS50S_tRNAGlyGCC_EFG_GDP; re0000000961_k1*EFG_GDP*RS50S_tRNAGlyGCC;
    re0000000961_k1 = 0 substance;
  re0000000962: RRF + RS50S_tRNAGlyGCC => RS50S_tRNAGlyGCC_RRF; re0000000962_k1*RRF*RS50S_tRNAGlyGCC;
    re0000000962_k1 = 0 substance;
  re0000000963: tRNAGlyGCC + RS50S_EFG_GDP => RS50S_tRNAGlyGCC_EFG_GDP; re0000000963_k1*tRNAGlyGCC*RS50S_EFG_GDP;
    re0000000963_k1 = 0 substance;
  re0000000964: RRF + RS50S_EFG_GDP => RS50S_RRF_EFG_GDP; re0000000964_k1*RRF*RS50S_EFG_GDP;
    re0000000964_k1 = 0 substance;
  re0000000965: tRNAGlyGCC + RS50S_RRF => RS50S_tRNAGlyGCC_RRF; re0000000965_k1*tRNAGlyGCC*RS50S_RRF;
    re0000000965_k1 = 0 substance;
  re0000000966: EFG_GDP + RS50S_RRF => RS50S_RRF_EFG_GDP; re0000000966_k1*EFG_GDP*RS50S_RRF;
    re0000000966_k1 = 0 substance;
  re0000000967: tRNAGlyGCC + RS50S => RS50S_tRNAGlyGCC; re0000000967_k1*tRNAGlyGCC*RS50S;
    re0000000967_k1 = 0 substance;
  re0000000968: RRF + RS50S => RS50S_RRF; re0000000968_k1*RRF*RS50S;
    re0000000968_k1 = 0 substance;
end
